# footer: © В.Северілов, Т.Боровська
# Варіанти завдань, група 2
# Зразки виконання  - файли TAYRGZ1_2ZrazokVers1.mcd
# TAYRGZ1_2ZrazokVers2.mcd
# РГЗ 1.2. Методи синтезу неперервних САУ.
# Завдання № 1
# 1. Визначити параметри регулятора, що забезпечує задані вимоги до перехідного процесу.
# 2. Перевірити синтезовану САУ на стійкість (будь-яким методом)  ORIGIN := 1
# 3. Скласти структурну схему САУ (скалярну)
# 4. Побудувати графіки перехідних  процесів
# Дано: об'єкт d/dt(X) == A*X + B*u ; Параметри об'єкта A := [0, 1; -1, 2.5] ;  B := [0; 1] ; X == [X[1]; X[2]]Вимоги до перехідного процесу: тривалість:  Tpz := 2 с ,  викид (не більше) :  hmz := 0
# Довідкові дані - в "зразках виконання"
# Завдання № 2
# 1. Визначити параметри регулятора, що забезпечує задані вимоги до перехідного процесу.
# 2. Перевірити синтезовану САУ на стійкість (будь-яким методом)  ORIGIN := 1
# 3. Скласти структурну схему САУ (скалярну)
# 4. Побудувати графіки перехідних  процесів
# Дано: об'єкт d/dt(X) == A*X + B*u ; Параметри об'єкта A := [0, 1; -1, 2.5] ;  B := [0; 1] ; X == [X[1]; X[2]] Вимоги до перехідного процесу: тривалість: Tpz := 2.5 с , викид (не більше):  hmz := 8
# Довідкові дані - в "зразках виконання"
# Завдання № 3
# 1. Визначити параметри регулятора, що забезпечує задані вимоги до перехідного процесу.
# 2. Перевірити синтезовану САУ на стійкість (будь-яким методом)  ORIGIN := 1
# 3. Скласти структурну схему САУ (скалярну)
# 4. Побудувати графіки перехідних  процесів
# Дано: об'єкт d/dt(X) == A*X + B*u ; Параметри об'єкта A := [0, 1; 2, -0.5] ;  B := [0; 1] ; X == [X[1]; X[2]] Вимоги до перехідного процесу: тривалість: Tpz := 1.5 с , викид (не більше):  hmz := 16
# Довідкові дані - в "зразках виконання"
# Завдання № 4
# 1. Визначити параметри регулятора, що забезпечує задані вимоги до перехідного процесу.
# 2. Перевірити синтезовану САУ на стійкість (будь-яким методом)  ORIGIN := 1
# 3. Скласти структурну схему САУ  (скалярну)
# 4. Побудувати графіки перехідних  процесів
# Дано: об'єкт d/dt(X) == A*X + B*u ; Параметри об'єкта A := [0, 1; 2, 1] ;  B := [0; 1] ; X == [X[1]; X[2]] Вимоги до перехідного процесу: тривалість: Tpz := 3.5 с , викид (не більше):  hmz := 16
# Довідкові дані - в "зразках виконання"
# Завдання № 5
# 1. Визначити параметри регулятора, що забезпечує задані вимоги до перехідного процесу.
# 2. Перевірити синтезовану САУ на стійкість (будь-яким методом)  ORIGIN := 1
# 3. Скласти структурну схему САУ  (скалярну)
# 4. Побудувати графіки перехідних  процесів
# Дано: об'єкт d/dt(X) == A*X + B*u ; Параметри об'єкта A := [0.1, -0.2; 0.1, -0.1] ;  B := [0; 1] ; X == [X[1]; X[2]] Вимоги до ПП: тривалість: Tpz := 2.5 с , викид (не більше):  hmz := 8
# Довідкові дані - в "зразках виконання"
# Завдання № 6
# 1. Визначити параметри регулятора, що забезпечує задані вимоги до перехідного процесу.
# 2. Перевірити синтезовану САУ на стійкість (будь-яким методом)  ORIGIN := 1
# 3. Скласти структурну схему САУ  (скалярну)
# 4. Побудувати графіки перехідних  процесів
# Дано: об'єкт d/dt(X) == A*X + B*u ; Параметри об'єкта A := [1.1, 0.1; 1.2, 0.2] ;  B := [0; 1] ; X == [X[1]; X[2]] Вимоги до ПП: тривалість: Tpz := 1.5 с , викид (не більше):  hmz := 10
# Довідкові дані - в "зразках виконання"
# Завдання № 7
# 1. Визначити параметри регулятора, що забезпечує задані вимоги до перехідного процесу.
# 2. Перевірити синтезовану САУ на стійкість (будь-яким методом)  ORIGIN := 1
# 3. Скласти структурну схему САУ  (скалярну)
# Дано: об'єкт d/dt(X) == A*X + B*u ; Параметри об'єкта A := [-0.2, -2; -0.3, -1] ;  B := [0; 1] ; X == [X[1]; X[2]] Вимоги до ПП: тривалість: Tpz := 3.5 с , викид (не більше):  hmz := 6
# Довідкові дані - в "зразках виконання"
# Завдання № 8
# 1. Визначити параметри регулятора, що забезпечує задані вимоги до перехідного процесу.
# 2. Перевірити синтезовану САУ на стійкість (будь-яким методом)  ORIGIN := 1
# 3. Скласти структурну схему САУ  (скалярну)
# 4. Побудувати графіки перехідних  процесів
# Дано: об'єкт d/dt(X) == A*X + B*u ; Параметри об'єкта A := [1.1, 0.1; 1.2, 0.2] ;  B := [0; 1] ; X == [X[1]; X[2]] Вимоги до ПП: тривалість: Tpz := 1.5 с , викид (не більше):  hmz := 16
# Довідкові дані - в "зразках виконання"
# Завдання № 9
# 1. Визначити параметри регулятора, що забезпечує задані вимоги до перехідного процесу.
# 2. Перевірити синтезовану САУ на стійкість (будь-яким методом)  ORIGIN := 1
# 3. Скласти структурну схему САУ  (скалярну)
# 4. Побудувати графіки перехідних  процесів
# Дано: об'єкт d/dt(X) == A*X + B*u ; Параметри об'єкта A := [-0.2, -2; -0.3, -1] ;  B := [0; 1] ; X == [X[1]; X[2]] Вимоги до ПП: тривалість: Tpz := 3.5 с , викид (не більше):  hmz := 0
# Довідкові дані - в "зразках виконання"
# Завдання № 10
# 1. Визначити параметри регулятора, що забезпечує задані вимоги до перехідного процесу.
# 2. Перевірити синтезовану САУ на стійкість (будь-яким методом)  ORIGIN := 1
# 3. Скласти структурну схему САУ (скалярну)
# 4. Побудувати графіки перехідних  процесів
# Дано: об'єкт d/dt(X) == A*X + B*u ; Параметри об'єкта A := [0, 1; -1, 2.5] ;  B := [0; 1] ; X == [X[1]; X[2]]Вимоги до перехідного процесу: тривалість:  Tpz := 2 с ,  викид (не більше) :  hmz := 0
# Довідкові дані - в "зразках виконання"
# Завдання № 11
# 1. Визначити параметри регулятора, що забезпечує задані вимоги до перехідного процесу.
# 2. Перевірити синтезовану САУ на стійкість (будь-яким методом)  ORIGIN := 1
# 3. Скласти структурну схему САУ (скалярну)
# 4. Побудувати графіки перехідних  процесів
# Дано: об'єкт d/dt(X) == A*X + B*u ; Параметри об'єкта A := [0, 1; -1, 2.5] ;  B := [0; 1] ; X == [X[1]; X[2]] Вимоги до перехідного процесу: тривалість: Tpz := 1.0 с , викид (не більше):  hmz := 8
# Довідкові дані - в "зразках виконання"
# Завдання № 12
# 1. Визначити параметри регулятора, що забезпечує задані вимоги до перехідного процесу.
# 2. Перевірити синтезовану САУ на стійкість (будь-яким методом)  ORIGIN := 1
# 3. Скласти структурну схему САУ (скалярну)
# 4. Побудувати графіки перехідних  процесів
# Дано: об'єкт d/dt(X) == A*X + B*u ; Параметри об'єкта A := [0, 1; -2, -0.5] ;  B := [0; 1] ; X == [X[1]; X[2]] Вимоги до ПП: тривалість: Tpz := 1.5 с , викид (не більше):  hmz := 16
# Довідкові дані - в "зразках виконання"
# Завдання № 13
# 1. Визначити параметри регулятора, що забезпечує задані вимоги до перехідного процесу.
# 2. Перевірити синтезовану САУ на стійкість (будь-яким методом)  ORIGIN := 1
# 3. Скласти структурну схему САУ  (скалярну)
# 4. Побудувати графіки перехідних  процесів
# Дано: об'єкт d/dt(X) == A*X + B*u ; Параметри об'єкта A := [0, 1; 2, -1.5] ;  B := [0; 1] ; X == [X[1]; X[2]] Вимоги до ПП: тривалість: Tpz := 3.5 с , викид (не більше):  hmz := 6
# Довідкові дані - в "зразках виконання"
# Завдання № 14
# 1. Визначити параметри регулятора, що забезпечує задані вимоги до перехідного процесу.
# 2. Перевірити синтезовану САУ на стійкість (будь-яким методом)  ORIGIN := 1
# 3. Скласти структурну схему САУ (скалярну)
# 4. Побудувати графіки перехідних  процесів
# Дано: об'єкт d/dt(X) == A*X + B*u ; Параметри об'єкта A := [0, 1; -1, -2.5] ; B := [0; 1] ; X == [X[1]; X[2]] Вимоги до ПП: тривалість:  Tpz := 2 с ,  викид (не більше) :  hmz := 0
# Довідкові дані - в "зразках виконання"
# Завдання № 15
# 1. Визначити параметри регулятора, що забезпечує задані вимоги до перехідного процесу.
# 2. Перевірити синтезовану САУ на стійкість (будь-яким методом)  ORIGIN := 1
# 3. Скласти структурну схему САУ (скалярну)
# 4. Побудувати графіки перехідних  процесів
# Дано: об'єкт d/dt(X) == A*X + B*u ; Параметри об'єкта A := [0, 1; -1, 2.5] ;  B := [0; 1] ; X == [X[1]; X[2]] Вимоги до перехідного процесу: тривалість: Tpz := 4.5 с , викид (не більше):  hmz := 8
# Довідкові дані - в "зразках виконання"
# Завдання № 15
# 1. Визначити параметри регулятора, що забезпечує задані вимоги до перехідного процесу.
# 2. Перевірити синтезовану САУ на стійкість (будь-яким методом)  ORIGIN := 1
# 3. Скласти структурну схему САУ (скалярну)
# 4. Побудувати графіки перехідних  процесів
# Дано: об'єкт d/dt(X) == A*X + B*u ; Параметри об'єкта A := [0, 1; -2, -0.5] ;  B := [0; 1] ; X == [X[1]; X[2]] Вимоги до ПП: тривалість: Tpz := 5 с , викид (не більше):  hmz := 10
# Довідкові дані - в "зразках виконання"
# Завдання № 16
# 1. Визначити параметри регулятора, що забезпечує задані вимоги до перехідного процесу.
# 2. Перевірити синтезовану САУ на стійкість (будь-яким методом)  ORIGIN := 1
# 3. Скласти структурну схему САУ  (скалярну)
# 4. Побудувати графіки перехідних  процесів
# Дано: об'єкт d/dt(X) == A*X + B*u ; Параметри об'єкта A := [0, 1; 2, 0.5] ;  B := [0; 1] ; X == [X[1]; X[2]] Вимоги до ПП: тривалість: Tpz := 3.5 с , викид (не більше):  hmz := 6
# Довідкові дані - в "зразках виконання"
# Завдання № 17
# 1. Визначити параметри регулятора, що забезпечує задані вимоги до перехідного процесу.
# 2. Перевірити синтезовану САУ на стійкість (будь-яким методом)  ORIGIN := 1
# 3. Скласти структурну схему САУ (скалярну)
# 4. Побудувати графіки перехідних  процесів
# Дано: об'єкт d/dt(X) == A*X + B*u ; Параметри об'єкта A := [0, 1; -1, -2.5] ; B := [0; 1] ; X == [X[1]; X[2]] Вимоги до ПП: тривалість:  Tpz := 2 с ,  викид (не більше) :  hmz := 0
# Довідкові дані - в "зразках виконання"
# Завдання № 18
# 1. Визначити параметри регулятора, що забезпечує задані вимоги до перехідного процесу.
# 2. Перевірити синтезовану САУ на стійкість (будь-яким методом)  ORIGIN := 1
# 3. Скласти структурну схему САУ (скалярну)
# 4. Побудувати графіки перехідних  процесів
# Дано: об'єкт d/dt(X) == A*X + B*u ; Параметри об'єкта A := [0, 1; -1, 2.5] ;  B := [0; 1] ; X == [X[1]; X[2]] Вимоги до перехідного процесу: тривалість: Tpz := 4.5 с , викид (не більше):  hmz := 8
# Довідкові дані - в "зразках виконання"
# Завдання № 19
# 1. Визначити параметри регулятора, що забезпечує задані вимоги до перехідного процесу.
# 2. Перевірити синтезовану САУ на стійкість (будь-яким методом)  ORIGIN := 1
# 3. Скласти структурну схему САУ (скалярну)
# 4. Побудувати графіки перехідних  процесів
# Дано: об'єкт d/dt(X) == A*X + B*u ; Параметри об'єкта A := [0, 1; -2, -0.5] ;  B := [0; 1] ; X == [X[1]; X[2]] Вимоги до ПП: тривалість: Tpz := 2 с , викид (не більше):  hmz := 10
# Довідкові дані - в "зразках виконання"
# Завдання № 20
# 1. Визначити параметри регулятора, що забезпечує задані вимоги до перехідного процесу.
# 2. Перевірити синтезовану САУ на стійкість (будь-яким методом)  ORIGIN := 1
# 3. Скласти структурну схему САУ  (скалярну)
# 4. Побудувати графіки перехідних  процесів
# Дано: об'єкт d/dt(X) == A*X + B*u ; Параметри об'єкта A := [0, 1; 0.1, 1.5] ;  B := [0; 1] ; X == [X[1]; X[2]] Вимоги до ПП: тривалість: Tpz := 3.5 с , викид (не більше):  hmz := 6
# Довідкові дані - в "зразках виконання"
# Завдання № 21
# 1. Визначити параметри регулятора, що забезпечує задані вимоги до перехідного процесу.
# 2. Перевірити синтезовану САУ на стійкість (будь-яким методом)  ORIGIN := 1
# 3. Скласти структурну схему САУ (скалярну)
# 4. Побудувати графіки перехідних  процесів
# Дано: об'єкт d/dt(X) == A*X + B*u ; Параметри об'єкта A := [0, 1; -1, -1.5] ; B := [0; 1] ; X == [X[1]; X[2]] Вимоги до ПП: тривалість:  Tpz := 2 с ,  викид (не більше) :  hmz := 0
# Довідкові дані - в "зразках виконання"
# Завдання № 22
# 1. Визначити параметри регулятора, що забезпечує задані вимоги до перехідного процесу.
# 2. Перевірити синтезовану САУ на стійкість (будь-яким методом)  ORIGIN := 1
# 3. Скласти структурну схему САУ (скалярну)
# 4. Побудувати графіки перехідних  процесів
# Дано: об'єкт d/dt(X) == A*X + B*u ; Параметри об'єкта A := [0, 1; -1, 1.5] ;  B := [0; 1] ; X == [X[1]; X[2]] Вимоги до перехідного процесу: тривалість: Tpz := 4.5 с , викид (не більше):  hmz := 8
# Довідкові дані - в "зразках виконання"
# Завдання № 23
# 1. Визначити параметри регулятора, що забезпечує задані вимоги до перехідного процесу.
# 2. Перевірити синтезовану САУ на стійкість (будь-яким методом)  ORIGIN := 1
# 3. Скласти структурну схему САУ (скалярну)
# 4. Побудувати графіки перехідних  процесів
# Дано: об'єкт d/dt(X) == A*X + B*u ; Параметри об'єкта A := [0, 1; -1.5, -0.5] ;  B := [0; 1] ; X == [X[1]; X[2]] Вимоги до ПП: тривалість: Tpz := 2 с , викид (не більше):  hmz := 10
# Довідкові дані - в "зразках виконання"
# Завдання № 24
# 1. Визначити параметри регулятора, що забезпечує задані вимоги до перехідного процесу.
# 2. Перевірити синтезовану САУ на стійкість (будь-яким методом)  ORIGIN := 1
# 3. Скласти структурну схему САУ  (скалярну)
# 4. Побудувати графіки перехідних  процесів
# Дано: об'єкт d/dt(X) == A*X + B*u ; Параметри об'єкта A := [0, 1; 0.2, 1.5] ;  B := [0; 1] ; X == [X[1]; X[2]] Вимоги до ПП: тривалість: Tpz := 3.5 с , викид (не більше):  hmz := 6
# Довідкові дані - в "зразках виконання"
