# footer: © В.Северілов, Т.Боровська
# (спочатку) Зразок виконання версія 3
# РГЗ 1.2 Методи синтезу неперервних САУ
Назв := ["Назва розподілу коренів"; "1. Кратні  корені              "; "2. Розподіл Баттерворта  "; "3.Оптимал.за квадр.крит"; "4. Опти.за зваж.мод.крит"]
Спр := [
    "a2b", "a1b", "a0b", "Tpb", "hm";
    1, 2, 1, 4.7, 0;
    1, 1.4, 1, 3, 0.05;
    1, 1, 1, 5.4, 0.16;
    1, 1.4, 1, 3, 0.05
]
# Завдання № 002
# 1. Визначити параметри регулятора, що забезпечує задані показники якості регулювання.
# 2. Перевірити синтезовану САУ на стійкість (будь-яким методом)  ORIGIN := 1
# 3. Скласти структурну схему САУ (скалярну)
# 4. Побудувати графіки перехідних  процесів
# Дано: об'єкт d/dt(X) == A*X + B*u ; Параметри об'єкта A := [0, 1; 2, 0.5] ;  B := [0; 1] ; X == [X[1]; X[2]] Вимоги до ПП: тривалість: Tpz := 3.5 с , викид (не більше):  hmz := 6
Назв = ["Назва розподілу коренів"; "1. Кратні  корені              "; "2. Розподіл Баттерворта  "; "3.Оптимал.за квадр.крит"; "4. Опти.за зваж.мод.крит"]
Спр = [
    "a2b", "a1b", "a0b", "Tpb", "hm";
    1, 2, 1, 4.7, 0;
    1, 1.4, 1, 3, 0.05;
    1, 1, 1, 5.4, 0.16;
    1, 1.4, 1, 3, 0.05
]
# 1. Копіюємо блок довідкових  даних:
# В таблиці подано : безрозмірні коефіцієнти характеристичних рівнянь а2,а1,а0; параметри відповідних безрозмірних перехідних процесів: безрозмірна тривалість - τp ; перерегулювання - hm.
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[
    "Назва розподілу коренів", a2, a1, a0, τp, hm;
    "Кратні  корені", 1, 2, 1, 4.7, 0;
    "Розподілення Баттерворта", 1, 1.4, 1, 3, 0.05;
    Опт_за_Ik1 == integral(Δx(t)^2, t = 0 .. tk), 1, 1, 1, 5.4, 0.16;
    Опт_за_Ik2 == integral(|Δx(t)|*t, t = 0 .. tk), 1, 1.4, 1, 3, 0.05
]
# Два останніх  розподіли дають перехідні процеси, що дають мінімум таких  критеріїв
# J1 == integral(Δx(t)^2, t = 0 .. tk) -критерій інтегральної  квадратичної помилки;
# J2 == integral(|Δx(t)|*t, t = 0 .. tk)  - критерій "інтеграл від зваженого модуля помилки".
# Головний вибір в цьому РГЗ
# Дивимось на задані параметри ПП  і табличку стандартних  розподілів і свідомо вибираємо один з них. ВИБРАЛИ "кратні корені"  з параметрами: безрозмірний коефіцієнт характеристичного рівняння  a1b := 1.4  (інші  = 1); безрозмірна тривалість ПП  Tpb := 3  ; викид (перере гулювання)  hm := 0.05 .  Обгрунтування вибору:
# заданий викид hmz = 6тому і вибрали розподіл "розп. Баттерворта" .
k := [-1, -2]
p1 := 1
p2 := 2
x := [0; 1]
b := 1
# 2. Робимо (копіюємо цей) блок "розмірний еталонний перехідний процес"
# Записуємо безрозмірне еталонне характеристичне рівняння (форма Вишнєградського, де  перший і останній коефіцієнти рівняння дорівнюють одиниці) і розмірне
# s^2 + a1b*s + 1 == 0  s^2 + a1*ωc*s + ωc^2 == 0 ,  де ωc - "власна частота".
# "Фізичний смисл" власної  частоти - масштаб часу динамічної  системи.
# Подивимось на еталонні процеси. Для цього зробимо перехідну функцію стану.
# (копіюємо, або для тренування набираємо самостійно). Дивлячись на характеристичне рівняння записуємо диференційне:  d^2/dt^2(x) + a1*ωc*d/dt(x) + ωc^2*x == 0 ; для приведення до форми Коші вводимо такі змінні: X[1] == x ;  X[2] == d/dt(x) ; вводимо вектор стану:X == [X[1]; X[2]] ; записуємо дифрівняння для Х1:  d/dt(X[1]) == 0*X[1] + 1*X[2]  виконуємо в дифрівнянні такі очевидні? заміни  d^2/dt^2(x) == d/dt(X[2]) ;  d/dt(x) == X[2]  і от маємо: d/dt(X[2]) == -ωc^2*X[1] - a1b*ωc*X[2]  Запишемо отримані дифрівняння в матрично-векторній формі:
# [d/dt(X[1]); d/dt(X[2])] == [0*X[1] + 1*X[2]; -ωc^2*X[1] - a1b*ωc*X[2]]  визначимо:  Ae(a1b, ωc) := [0, 1; -ωc^2, -a1b*ωc]  і записуємо d/dt(X) == Ae(a1b, ωc)*X  . Тепер можемо записати  перехідну функцію стану (точніше - наближення 1-ого і 2-гого порядків для цієї функції.  Т - це крок обчислень.
# I := identity(2)  F1(a1b, ωc, T) := I + Ae(a1b, ωc)*T .
# F2(a1b, ωc, T) := I + Ae(a1b, ωc)*T + Ae(a1b, ωc)^2*T^2/2! . Дивимось:  F1(1.4, 1, 0.1) = [1, 0.1; -0.1, 0.86]F2(1.4, 1, 0.1) = [0.995, 0.093; -0.093, 0.8648]I = [1, 0; 0, 1]
# і тепер знаємо, як вибирати наближення. Задаємо параметри для побудови графіків етало- нних  перехідних  процесів Tm := 10 ; T := 0.25  N := Tm/T  N = 40k := 1 .. N
# Записуємо серію еквівалентних різницевих рівнянь. Беремо з таблиці параметри стандартних  розподілів  a11 := 2 ; a12 := 1.4  ; a13 := 1  ; Задаємо пару значень власної  частоти ω1c := 1 ; ω2c := 2 . Задаємо початкові стани: X1[:, 1] := [-1; 0](клацни при відкритті документó)
#
# X2[:, 1] := X1[:, 1] ; X3[:, 1] := X1[:, 1] ; X4[:, 1] := X1[:, 1]  Записуємо рівняння процесів
# X1[:, k + 1] := F2(a11, ω1c, T)*X1[:, k] ;  X2[:, k + 1] := F2(a12, ω1c, T)*X2[:, k] ; X3[:, k + 1] := F2(a13, ω1c, T)*X3[:, k] ;  X4[:, k + 1] := F2(a13, ω2c, T)*X4[:, k]
# Дивимось. На графіки:
A = [0, 1; 2, 0.5]
# Бачимо, що: що при зміні власної  частоти змінюється тільки масштаб перехідного процесу...
# 3. Робимо блок "отримання характеристичного рівняння системи"
# В попередньому розділі ми  по ЕТАЛОННОМУ характеристичному рівнянню отримали еквівалентне різницеве рівняння САУ,
# s^2 + a1*ωc*s + ωc^2 == 0  =>  d/dt(X) == Ae(a1b, ωc)*X  =>  X1[:, k + 1] := F2(2, 1, T)*X1[:, k]
# а в цьому по матрично-векторному дифрівнянню отримаємо характеристичне рівняння
# d/dt(X) == A*X + B*u  =>  s^2 + a1*ωc*s + ωc^2 == 0 .  Використаємо символьний процесор, задаємо вирази без значень:  X := [X[1]; X[2]] ;  K := [K[1], 0; K[2], 0] . Закон управління шукаємо у виді: згорнутому  u := transpose(K)*X  ³  розгорнутому  u → [K[1]*X[1] + K[2]*X[2]; 0] ; підставимо вираз для управління в дифрівняння ñèñòåìè:  d/dt(X) == A*X + B*u  =>  d/dt(X) == A*X + B*transpose(K)*X ; виконуємо алгебраїчні перетворення:  d/dt(X) == (A + B*transpose(K))*X . Згадуємо (див завдання), що B = [0; 1] ;  As := [A11, A12; A21, A22]. Виконуємо (формально) перетворення Лапласа: замінюємо
# X(t) => X(s) ;  d/dt(X(t)) => s*X(s) ; ³ îò ìàºìî  s*X(s) == (As + B*transpose(K))*X(s) ; поділили ліву, праву частини на X(s):  I*s - (As + B*transpose(K)) == 0 .  Розкриваємо  цей вираз:
# I*s - (As + B*transpose(K)) expand, As; collect, s → . Читаємо рекомендовану літературу, де показано, що цей вираз буде дорівнювати нулю, коли детермінант (модуль) цієї матриці дорівнює нулю
# [plot: X1[1, k], X2[1, k], X3[1, k] vs k]
# [plot: X3[1, k], X4[1, k] vs k]
det([s - A11, -A12; -A21 - K[1], s - A22 - K[2]]) expand, s; collect, s →  # error: This value must be a vector.
# і отримуємо характеристичне рівняння замкненої  системи:
# s^2 + (-A22 - K[2] - A11)*s + (A11*A22 + A11*K[2] - A12*A21 - A12*K[1])
# вводимо означення:  azm0 := (A11*A22 + A11*K[2] - A12*A21 - A12*K[1])
# azm1 := (-A22 - K[2] - A11)  і отримуємо:
# s  s^2 + azm1*s + azm0 == 0  .
# Висновок 1(філософський). Зрозуміли(?), чому виник світовий стандарт "забороняється виконувати будь-які алгебраїчні перетворення вручну", чому в тексті програми не повинно бути чисел, і поки не знаємо, що імена змінних повинні описувати родовід цих змінних.
# Висновок 2 (філософський). Зрозуміли(?) смисл модального управління по вектору стану: перехідний процес в ЛДС повністю визначається коренями характеристичного рівняння (кожен корень породжує свою складову "моду" в перехідному процесі),  корені "однозна- чно визначаються" ( = однозначно определяются) коефіцієнтами характеристичного рівн- яння. При управлінні по вектору стану у кожен коефіцієнт входить хоч один з параметрів закона управління: тобто, вибором параметрів закону управління К1, К2, К3 ..  ми можемо реалізувати будь-який перехідний процес (без урахування витрат енергії  на управління).
K → [K[1], 0; K[2], 0]
A = [0, 1; 2, 0.5]
# 4. Визначаємо параметри  регулятора, що забезпечують заданий ПП
# Записуємо поряд характеристичне рівняння замкненої  системи і
# еталонне характеристичне рівняння (в розмірному часі)
# САМОСТІЙНО вибираємо тип процесу, виходячи з вимог до перехідного процесу (ПП) - згідно завданню. Власна частота для основного контуру визначається по формулі
# ws = Трb/Трz, де Трb - безрозмірна тривалість ПП для  вибраного розподілу коренів (береться з таблиці),  Тр - задана тривалість ПП.  ----  І от згідно вимогам завдання -  нульовий  викид,  вибираємо еталонний процес "insert svij choice":
# s^2 + (-A22 - K[2] - A11)*s + (A11*A22 + A11*K[2] - A12*A21 - A12*K[1])  s^2 + a1*ωs*s + ωs^2 == 0
# Визначаємо власну частоту. На першій сторінці задано Tpz = 3.5; Tpb = 3;  a1b = 1.4;
# маємо:  ωs := Tpb/Tpz ;  a1_etal := a1b*ωs ;  a0_etal := ωs^2 ;  a1_etal = 1.2 ;  a0_etal = 0.734694.
# Тепер дуже важко (Висновок 2) не прийти до висновку, що для того, щоб мати процес с заданими викидом і тривалістю, слід зробити коефіцієнти характеристичного рівняння замкненої системи такими:  azm1 == a1_etal  azm0 == a0_etal  , тобто:
# (-A22 - K[2] - A11) == a1_etal
# (A11*A22 + A11*K[2] - A12*A21 - A12*K[1]) == a0_etal
# Дуже неважко розв'язати цю систему рівнянь відносно параметрів регулятора K[1] , K[2] вручну. Однак, пам'ятаючи Висновок 1, зробимо це засобами пакету.
# Увага! При виконанні символьних обчислень дуже бажано ВСІ змінні позбавити числових  значень
# Тому в символьних обчисленннях вводимо тимчасові змінні, а числа підставляємо в кінцевих результатах.
# Блок  розв'язання системи рівнянь в символьному виді  пишемо "дано":
# Given  -A22 - K2 - A11 == a1etal  ;
# A11*A22 + A11*K2 - A12*A21 - A12*K1 == a0etal  пишемо "знайти":
# Find(K1, K2) simplify → [-A21 - (A11^2 + a1etal*A11 + a0etal)/A12; -A11 - A22 - a1etal]
# -- отримали очевидне рішення.
# Тепер присвоїмо їх (завдання, блок 3 ):  A = [0, 1; 2, 0.5]  [A11, A12; A21, A22] := A
# Контроль незвичного присвоєння:  [A11, A12; A21, A22] = [0, 1; 2, 0.5]  ;  K[1] := -(A11^2 + A11*a1_etal + A12*A21 + a0_etal)/A12  K[2] := -(-A22 - A11 - a1_etal)
# K[1] = -2.73469  K[2] = 1.7
# закон управління: U(X1, X2) := K[1]*X1 + K[2]*X2  U(X1, X2) == 0.57*X1 + 0*X2
K = [-2.73469; 1.7]
# 5. Робимо програму моделювання і досліджуємо САУ
# Вище понаписано 4 (чотири) сторінки формул, чи можна на цьому організувати "повторне використання коду" (саме з цього почалось обєктноорієнтованее програмування)? Можна, на примітивному рівні. Беремо з блока 3 (три) рівняння для замкненої  САУ:
# d/dt(X) == (A + B*transpose(K))*X ; A = [0, 1; 2, 0.5]  B = [0; 1] K = [-2.73469; 1.7]  записуємо в такому виді: Azm := (A + B*transpose(K))  Azm = [0, 1; -0.734694, 2.2]  d/dt(X) == Azm*X
# ,Беремо модуль "отримання перехідної функції  стану" з  блока 2 (two), дивимось на нього
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# .... і підставляємо потрібне:
# записуємо d/dt(X) == Azm*X  . Тепер можемо записати  перехідну функцію стану (точніше - наближення 1-ого і 2-гого порядків для цієї функції.  Т - це крок обчислень.
# I := identity(2)  F1(T) := I + Azm*T .  F2(T) := I + Azm*T + Azm^2*T^2/2!
# Задаємо параметри для побудови графіка перехідного процесу Tm := 2*Tpz ; T := 0.1  N := Tm/T  N = 70k := 1 .. 5*N  Задаємо початковий стан:  X1[:, 1] := [-1; 0] ;
# Записуємо пару "еквівалентних" різницеве рівняння:  X1[:, k + 1] := F2(T)*X1[:, k]
# X2[:, 1] := X1[:, 1]  X2[:, k + 1] := F1(T)*X2[:, k] X3[:, 1] := X1[:, 1]  X3[:, k + 1] := F1(0.2*T)*X3[:, k]
# Зробимо красиво:  d := .05  q := Tpz, Tpz + .2 .. Tm  j := -1, -0.9 .. 1
X1 = [
    -1, 0, 0, 0, 0, 0, 0, 0, 0, 0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;
    0, 0, 0, 0, 0, 0, 0, 0, 0, 0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]
# [plot: X1[1, k], d, -d, 0, j, X1[2, k]*1 vs (k - 1)*T, q, k*T, Tpz]
# Задані параметри Перех. Процесу
# викид hm = 0.05
# тривалість Tpz = 3.5
# Результати синтезу
# викид max(X1[:, 1]) = 0
# тривалість
# визнач. візуально
# Параметри регулятора
# K[1] = -2.73469
# K[2] = 1.7
# [plot: X1[1, k], d, -d, X2[1, k], X3[1, k], j vs k*T, q, k*0.2*T, Tpz]
# Проведіть оbsugdiag/obdoomliag (=поглиблений аналіз) отриманих  результатів:
# Можливі результати zadoomliag:  в даному випадку динамічний обєкт  може трактуватись  як два процеси першого порядку з перехрестними зв"язками: це можуть бути дві колонії  мікробів, два канала управління рухом інструмента фрезерного верстата та  ін.
# Застосований метод стандартних коефіцієнтів дає заданий перехідний процес тільки для першої координати ---  X[1] . А як забезпечити задані процеси по кожній координаті? - Радикальний метод - виділити для кожної  координати вектора стану своє управління, та "розв"язати" зв"язки між координатами....
# 6. Корисний рітуал: перевіряємо САУ на стійкість
# Перевірити на стійкість некеровану  і керовану систему можна за: критеріями Гурвіца, Михайлова, Найквіста, просто побудувати ПП, або обчислити корені, що і зробимо:
# Підставте на жовте відповідні свої  рівняння
# Використання функції  polyroots(.), функція якої зрозуміла з назви. Копіюємо сюди, щоб бачити вхідні дані, з якими працюємо, вирази для коефіцієнтів характеристичного рівняння замкненої САУ:  s^2 + (-as1 - K[2])*s + (-as0 - K[1]) == 0
# і розімкненої САУ:  s^2 + (-as1 - 0)*s + (-as0 - 0) == 0
# a2z := 1 ;  a1z := -as1 - K[2] ;  a0z := -as0 - K[1] .  a1z =a0z =
# a2r := 1 ;  a1r := -as1 - 0 ;  a0r := -as0 - 0 .  a1r =a0r =
# Формуємо вектор-функцію, що обчислює (=повертає) значення усіх коренів в залежності від значення параметра регулятора k1 - "штрафа за помилку координати".
korni =  # no stored result
vectorize(Re(korni)) =  # no stored result
vektkoefZ := [a0z; a1z; a2z]
korni := polyroots(vektkoefZ)
# Бачимо: а) система стійка, бо корені - "ліві", б) між іншим - комплексні спряжені, з від"ємними дійсними частинами..
vektkoefR := [a0r; a1r; a2r]
korni := polyroots(vektkoefR)
korni =  # error
# Одразу бачимо  система НЕстійка, бо корені - "праві"
# Висновки.
# 1. Дивно, але без помилок написано формул шість сторінок , і отримані коректні результати. Можна взагалі зробити програму, що бере вхідні дані системи і вимоги до регулюваня, а повертає рівняння регулятора, перехідні процеси ... для ЛДС довільного порядку.  І так повністю автоматизувати задачу синтезу лінеаризованих об"єктів. Реальні ж об"єкти нелінійні, нестаціонарні, хаотичні, катастрофічні, пробабілістичні.
# 2. Крім того, ознайомились з стандартним методом синтезу управління по вектору стану, і мали можливість отримати тверді практичні навички  синтезувати це управління.
