# footer: © БС
# 1.1 Дослідження часових характеристик САУ.
# Одержання та дослідження еквівалентних математичних  моделей динаміки неперервних лінійних САУ
#
# Рекомендується виконати факультативну роботу T110,  і переробити  усі  робочі моделі даної роботи у мові програмування пакету, потім порівняти альтернативи на базі  викори- стання різних програмних засобів - від базової мови, єдиної для усіх версій па- кету, до символьної математики і вбудованих методів численого розв'язання дифрівнянь.
# Ціль даної роботи - набуття навичок у розробці і реалізації у середовищі математич- ного пакета еквівалентних математичних моделей динаміки неперервних систем.
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# Вступ
# З багатьох причин цифрова обчислювальна машина (ЦОМ) - найбільш зручний і по- тужний інструмент для дослідження неперервних динамічних систем.  Ця зручність зро- стає ну занадто швидко: продуктивність праці дослідника і проектанта зростає, але вин- икає можливість деградації спеціалістів: розв'язує дифрівняння, оптимізує, виконує алге- браічні перетворення, розкладає в ряди ЦОМ, точніше відповідний CAD-пакет, а що ос- тається спеціалісту? - ввести-вивести дані? Фундаментом  оптимізму тут є той факт, що в країнах з повальною автомобілізацією людина тільки дещо поширшала в талії, але ходити не розучилася. Сьогоднішні системи управління звичайно реалізуються мікропроцесор- ними і мікроконтролерними системами. Об'єкти і процеси управління,  звичайно є не- перервними.  Для  аналізу  і синтезу  таких систем  необхідно  замінити  неперервну
#
# математичну модель  (ММ) - систему диференційних рівнянь еквівалентною дис- кретною ММ - системою різницьових рівнянь, що будуть досить точно наближувати розв'язання системи диференційних рівнянь.
# Щоб зробити цю процедуру узагальненою і уніфікованою треба спочатку привести задану систему дифрівнянь до форми Коші:
#
# dx/dt = A*x + B*u + D*v,  (1)
# де  x, u, v  - вектори стану, управління, обурень, відповідно;  A, B, D - матриці відповідної розмірності. Розв'язання  цього рівняння  у  формі Коші  (=  розв'язання  без урахування збурень) має вид [1-4]:
# x[(k+1)*T] = F(T)*x[k*T] + G(T)*B*u[k*T],  (2)
# де  T - крок обчислень, k - номер крока; функції  F(T) і G(T) - нескінчені ряди:  F(T) = I + A*T + (A*T)^2/2! + (A*T)^3/3! + ... ;  (3)
# G(T) = I*T + A*T^2/2! + A^2*T^3/3! + ....
# Рівняння (2) фактично є різницевим, в ньому значення вектору стану х у поточний момент часу  (k+1)*T визначається через значення вектору стану х та вектора управління у у попередній момент часу k*T.
# Проблема тільки в тому, що для того, щоб розв'язання рівняння (2) точно співпадало з розв'занням рівнняня  (1), треба взяти безкінечне число членів рядів у виразах  (3). На практи- ці беруть кінцеве число членів рядів  так,  щоб забезпечити потрібну точність. Можемо бачи- ти, що, чим менше крок обчислень Т, тим швидше сходяться ряди (3), тобто, потрібну точність дискретної моделі можна забезпечувати як зменшенням Т, так і збільшенням кількості членів рядів.  Розглянемо САУ, що описується дифрівнянням 3-го порядку:
# d^3x(t)/dt^3 + a2*d^2x(t)/dt^2 + a1*dx(t)/dt + a0*x = f(t), де
# x(t) - регулюєма змінна (тиск, напруга, відстань, температура, ...);
# f(t) - зовнішня дія на САУ;
# а2, а1, а0 - параметри математичної моделі, значення яких беруться згідно варіанту.
#
# Завдання
# 1. Отримати еквівалентні дискретні моделі різного рівня точності (1-3порядку)  6 б
# 2. Отримати еталонні розв'язання диференційного рівняння - аналітичні і числові (за допомогою вбудованих функцій)  14 б
# 3. Дослідити залежність точності ММ від кроку квантування Т  8 б
# 4. Дослідити залежність точності ММ від порядку моделі  12 б
# 5. Знайти кроки квантування для еквівалентних за точністю ММ 1, 2, 3-го порядків  10 б
# ВАРІАНТИ ЗНАЧЕНЬ ПАРАМЕТРІВ
[
    Варіант, 1, 2, 3, 4, 5, 6, 7, 8, 9, 10, 11, 12, 13, 14, 15, 16, 17;
    а2, 3., 3, 2, 2, 2., 1.0, 1.75, 2.5, 3.0, 2.0, 1.0, 2.0, 2.5, 3.5, 3.5, 3.14, 2.73;
    а1, 3, 3, 1, 1.5, 2, 2, 2.15, 3, 3.5, 1.7, 3, 2.5, 2, 3, 2.5, 2.73, 3.14;
    а0, 1, 2, 1, 1, 1, 2, 1, 1, 1.5, 1, 1, 1, 1.2, 1, 1.2, 1.1, 1.1
]
# Зразок виконання
#
# 1. Отримання еквівалентних дискретних моделей 1-3-го порядків
# Вводимо параметри обєкта згідно варіанту, задаємо довільний поки крок обчислень Т:
ORIGIN := 1
a2 := 1
a1 := 3
a0 := 1
T := .4
# Приводимо задане дифрівняння до форми Коші. Для цього вводимо нові змінні::
# х1  = x;  x2 = dx/dt;  x3 = d^2x/dt^2 . Отримуємо систему дифрівнянь:
# ü
# ú
# ú
# ý
# ú
# ú
# þ
dx1/dt == 0*x1 + 1*x2 + 0*x3
dx2/dt == 0*x1 + 0*x2 + 1*x3
# Вінницький державний технічний університет
# Кафедра комп'ютерних систем  управління
# @  Боровська Т.М., Северілов В.А.
# Теорія  автоматичного управлінння
dx3/dt == -a0*x1 - a1*x2 - a2*x3
# Подаємо отриману  систему у матрично-векторному виді:
dх/dt == А*х  # де
A := [0, 1, 0; 0, 0, 1; -a0, -a1, -a2]
I := [1, 0, 0; 0, 1, 0; 0, 0, 1]
# Згідно з (3) записуємо перші три наближення для перехідної функції стану (ПФС) і виводимо їх значення.Виходячи  з очевидних міркувань подаємо ПФС як функцію крока квантування Т.
T = 0.4
# ММ1
F1(T) := I + A*T
F1(T) = [1, 0.4, 0; 0, 1, 0.4; -0.4, -1.2, 0.6]
F2(T) := I + A*T + A^2*T^2/2!
# ММ2
F2(T) = [1, 0.4, 0.08; -0.08, 0.76, 0.32; -0.32, -1.04, 0.44]
# ММ3
F3(T) := I + A*T + A^2*T^2/2! + A^3*T^3/3!
# Бачимо, що при кроці Т = 0.2 різниця між елементами матриць F2 i F3 менше відсотку
F3(.2) - F2(.2) = [-0.133333, -0.4, -0.133333; 0.133333, 0.266667, -0.266667; 0.266667, 0.933333, 0.533333]*1%
F3(T) = [0.989333, 0.368, 0.0693333; -0.0693333, 0.781333, 0.298667; -0.298667, -0.965333, 0.482667]
# Задаємо період моделювання, крок обчислень (квантування), початкові значення вектору стану в альтернативних формах:
[x3[1, 1]; x3[2, 1]; x3[3, 1]] := [-1; 0; 0]
Period := 8
T := .02
Kh := Period/T
Kh = 400
k := 1 .. Kh
x1[:, 1] := transpose([-1, 0, 0])
x2[:, 1] := x1[:, 1]
# Записуємо різницьові рівняння спочатку в базовій мові пакета і тестуємо їх - будуємо графіки перехідних процесів.
x1[:, k + 1] := F1(T)*x1[:, k]
x2[:, k + 1] := F2(T)*x2[:, k]
x3[:, k + 1] := F3(T)*x3[:, k]  # (4)
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# [plot: x1[1, k], x2[1, k], x3[1, k], 0 vs k*T]
# Крок квантування
T = 0.02
# Як видно з поданих вище графіків модель 1-го порядку явно незадовільна для Т = 0.2 с. Результати обчислень за моделями 2-го і 3-го порядків співпадають при Т = 0.2  і  Т = 0.1 с.
# Це дає підстави вважати моделі 2-го і 3-го порядків досить точними. Але, щоб остаточно впевнитись в цьому нам необхіден еталон - точне розв'язання дифрівняння і кількісні міри, тобто критерії точності моделей.
# Для поставлених цілей зручно визначити перехідний процес в динамічній системі не у виді різницьового рівняння (4), а як функцію користувача. Зробити це  можна викори- стовуючи засоби написання програм в середовищі пакету (робота Т1108HH).
# Далі  наведено функцію користувача P(M,xo,T) визначену через програму. Аргумен-
# тами функції є М - перехідна матриця ЕДМ, хо - початкове значення вектору стану, Т - крок квантування - скаляр. Можна було розширити список аргументів функції за рахунок кількості  кроків  та ін., але  (дослідіть самостійно)  швидкодія  програми  може  суттєво зменшитись.
N := Kh
xo := transpose([-1, 0, 0])
k := 1 .. N
T := .2
P(M, xo, T) :=
    X[:, 1] ← xo
    for k ∈ 1 .. N
        X[:, k + 1] ← M*X[:, k]
        sto ← 100
    X
# - початкові умови.
# - цикл по крокам процесу.
#
# - центр програми (порівняйте з (4)
#
# - рядок для естетизації програми
# - те що повертає програма.
# (5)
# Порівняємо альтернативні моделі (4) і (5). В (4) для кожного рівня ПФС - свій вираз, свої змінні.  В програму (5) замість М можна підставити F1(T), F2(T), F3(T)...
# Тестуємо програму - будуємо  графіки процесів для тих же даних, що й при тестуванні (4). Отримуємо ідентичні результати.
# [plot: P(F1(T), xo, T)[1, k], P(F2(T), xo, T)[1, k], P(F3(T), xo, T)[1, k] vs k]
# [plot: P(F1(T), xo, T)[1, k], P(F2(T), xo, T)[1, k], P(F3(T), xo, T)[1, k] vs k]
# 2. Отримання еталонних розв'язань диференційного рівняння
# В даній роботі розглядаються тільки лінійні динамічні системи - такі. що описуються лінійними дифрівняннями. Лінійні дифрівняння мають загальні аналітичні розв'язання (робота Т1158HH). На практиці об'єкти управління - нелінійні, нестаціонарні, і не мають аналітичних розв'язань для загальних випадків.
# Останні версії пакета мають вбудовані функції численого розв'язання дифрівнянь. Ви- користаємо їх для отримання еталонних розв'язань  для лінійних і  нелінійних  динаміч- них систем. Для лінійних систем додатково використаємо аналітичні розв'язання. Пакет має  декілька вбудованих функцій для численого інтегрування дифрівнянь, помірно зручних. Використаємо два методи. Формат вбудованої функції подано нижче:
Процес == Bulstoer(поч_умови, to, tk, кільк_кроків, права_частина)
Процес == rkfixed(поч_умови, to, tk, кільк_кроків, права_частина)
# Підставимо у ці функції дані нашої задачі.Оце наше дифрівняння і його права частина:
dX/dt == Аv(a)*X
Av(a) := [0, 1, 0; 0, 0, 1; -a[1], -a[2], -a[3]]
Av(a)*[X[1]; X[2]; X[3]] → [X[2]; X[3]; -(X[1]*a[1]) - X[2]*a[2] - X[3]*a[3]]
ORIGIN = 1
ORIGIN := 0
Kh = 400
Period := 16
Xo := -1
D(t, X) := [X[1]; X[2]; -a0*X[0] - a1*X[1] - a2*X[2]]
i := 1 .. N
N = 400
# Нарешті записуємо рівняння і будуємо графіки цього, еталонного процесу  та одної з отриманих нами. Розберіться самостійно із структурою вихідного масиву.
# (6)
Pb := Bulstoer([-1; 0; 0], 0, Period, N, D)
Pr := rkfixed([Xo; 0; 0], 0, Period, N, D)
# [plot: Pb[:, 1][i], P(F3(T), xo, T)[0, k] vs Pb[:, 0][i], k*T]
# [plot: Pb[:, 1][i], Pr[:, 1][i] vs Pb[:, 0][i]]
# Бачимо, що еталонні процеси досить співпадають. Переходимо до наступного пункту завдання.
#
# 3. Дослідження залежності точності ММ3 від кроку квантування
# В завданні не задано критерій оптимальності моделі. Деталізуємо і конкретизуємо поняття оптимальності еквівалентної дискретної моделі. Очевидно, при зменшенні кроку
# квантування Т точність збільшується, але одночасно збільшуються потрібні для  моделю- вання САУ на заданому інтервалі (періоді) часу а) пам'ять, б) час обчислень. Тому,  інту- ітивно, оптимальність означає якийсь компроміс між точністю моделі і витратами обчи- слювальних ресурсів. Цей компроміс можна побудувати так: задати як обмеження точність моделі Км , і знайти максимальний крок обчислення, який ще забезпечує цю точність.
# Наступний крок конкретизації задачі - вибір і конструювання численої міри (=критерія)  точності моделі. Розглянемо дві альтернативи - локальний критерій - функція тільки від параметрів якогось одного кроку процеса (наприклад, помилка в кінці  періоду моделюван- ня), і  інтегральний критерій - функція від параметрів усіх кроків процесу (наприклад, інтегральна квадратична помилка). Очевидно інтегральний критерій є більш повноцінною мірою тотожності модельованого і істинного процесу - виберемо критерій - інтеграл від модуля помилки (можна було б вибрати інтеграл від квадрата помилки). Природно, в дискретній моделі замість інтеграла беремо суму:
Крит := (1/N)*sum(|(xe[n] - xm[n])/xe[n]|, n)  # disabled  # ,  де  # (7)
# n = 1.., N - індекс (номер) кроку процесу; хe_n, хм_n  - поточні значення вибраної координати вектору стану для "точної"  моделі і еквівалентної дискретної моделі динаміки об'єкту.
# Виберемо координату х1 - це власне  регулюєма змінна. "Фізичний смисл" цього крите- ріz - середня відносна помилка координати еквівалентної дискретної моделі відносно еталонної (=точної).
# Усі  завдання (пункти 3-5)  будуть розв'язані легко і економно, якщо ми зможемо  пода- ти критерій (7) як функцію кроку квантування та порядку  ЕДМ.
dT := .2
Pm := 8
ORIGIN = 0
N := Pm/dT
N = 40
transpose(xo) = [-1, 0, 0]
Pe(M, xo, dT, N) :=
    X[:, 0] ← xo
    for k ∈ 0 .. N - 1
        X[:, k + 1] ← M*X[:, k]
        sto ← 100
    X
# Модифікуємо програму (5) - добавляємо в список аргументів ще N - число кроків.
# Беремо вираз (6) і підставляємо те, що треба підставити у такому виді, щоб інтерпретатор бачив явну залежність значення критерія від dT :
Кp(dT) := (dT/Pm)*sum(|(Bulstoer(xo, 0, Pm, Pm/dT, D)[:, 1][i] - Pe(F2(dT), xo, dT, Pm/dT)[0, i])/Bulstoer(xo, 0, Pm, Pm/dT, D)[:, 1][i]|, i = 0 .. Pm/dT)
# (8)
# Задаємо вектор значень кроку квантування dT, будуємо графіки залежності помилки від кроку квантування. для моделі 2-го і 3-го порядків.
qq := [.05, .1, .2, .25, .4, .5, .8, 1]
qq := transpose(qq)
q := 0 .. last(qq)
last(qq) = 7
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# Вінницький державний технічний університет
# Кафедра комп'ютерних систем  управління
# @  Боровська Т.М., Северілов В.А.
# Теорія  автоматичного управлінння
# Післямова до отриманих результатів.  Отримана функція (8) працює неприпустимо повільно. Причини цього - проблеми програмних середовищ і профрівня програми. Але функція працює і графіки майже не потребують коментарів.
#
# 3. Дослідження залежності точності ММ3 від кількості членів ряду
# Як видно з графіків, завжди можна підібрати (зменшуючи) крок квантування так, щоб забезпечити задану точність, наприклад 5%, відносно еталонного процесу.
# А тепер знайдемо максимальні кроки квантування, що забезпечують таку точність для ЕДМ 1-го, 2-го, 3-го порядків.
# Для розв'язання поставленої задачі використовуємо принцип мінімума зусиль - послідовно підставимо  у (8)  F1(dT), F2(dT), F3(dT) і просто підбираємо такі dT, що дають задану точність. Не забороняється зробити це більш елегантно.
# Функція (8) має ще один дефект - вона працює тільки для кроків кратних до Pм.
# Маємо такі результати
# для моделі 1-го порядку:  2-го  і  3-го
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Кp(0.5) = 0.170681
# Висновки...........  Працювали: Ф.Грач, М.Артилерист, Л.Козак, Б.Крік 20/02/2002
#
# Контрольні запитання
# 1. Запишіть розв'язання звичайного лінійного однородного дифрівняння  через корені характеристичного рівняння.
# 2. Що таке матрична експонента?
# 3. Запишіть розв'язання звичайного лінійного однородного дифрівняння  у формі Коші.
# 4. Подайте звичайне лінійне дифрівняння  n-го порядку  у формі Коші.
# 5. Що таке "перехідна функція стану"
# 6. Запишіть розкладення у ступеневий ряд для матричної експоненти
# 7. Що таке "еквівалентне різницьове рівняння"
# 8. Яки числові методи розв'язання дифрівнянь ви знаєте?
# 9. Які зміни треба зробити в еквівалентній дискретній математичній моделі неперервного об'єкта, щоб при збільшенні кроку обчислень зберігти потрібну точність?
