# footer: © СБ
# l.2 Дослідження часових характеристик САУ.
# Визначення реакції САУ на заданий сигнал
#
# Ціль даної роботи - набуття навичок у розробці і реалізації у програмному середовищі ма- тематичного пакета робочих (тобто програмно виконуємих) моделей динаміки неперервних систем при наявності зовнішніх входів- управляючих, або обурюючих.
# В неформальному плані це, наприклад, така задача - на вхід верстата  з ЧПУ подається програма фрезерування прямокутного контура. Система автоматичного управління відпра- цьовує управляючий сигнал неточно - із запізненням, перерегулюванням. Ціль моделювання - точно обчислити помилки, вибрати задовільні параметри і режими обробки.
# Другий приклад: - треба дослідити, як високоякісний аудіопідсилювач відтворює (амплитудні і фазові відхилення) гармонічний сигнал певної частоти, або як він реагує на випадковий сигнал (шум). Нижче подано схему такої задачі:
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# Як обчислити реакцію на заданий вхідний сигнал? Iснує декiлька альтернатив визначення реакцii САУ на зовнiшній (вхiдний) сигнал:
# - обчислення інтеграла згортки  (= інтеграла Дюамеля);
# - безпосереднє обчислення за еквівалентним різницьовим рівнянням;
# - інші альтернативи (які?).
# Суть першої альтернативи в обчисленні інтегралу згортки:
Xvyx(t) == integral(Xvx(τ)*g(t - τ), τ = 0 .. t)
# ;
g(t) == d/dt(h(t))  # де
# Xvyx(t) - вихідний сигнал динамічної системи (об'єкта управління);
# Xvx(t) - вхідний сигнал;
# g(t) -  імпульсна перехідна функція (ІПХ) - реакція на одиничну імпульсну функцію d(t);
# h(t) -  перехідна функція (ПХ) - реакція на одиничну ступінчасту функцію 1(t);
# t - змінна інтегрування. Проблема в знаходженні аналітичного виразу для ІПХ. Для цього треба або знайти аналітичне розв'язання диференційного рівняння, або зворотне перетворення Лапласа від передаточної функції, або...
# Але головний недолік цієї альтернативи в тому , що вона "працює" тільки для лінійних систем. В останньому розділі наведено модуль для обчислення реакції системи за інтегралом згортки. Цей модуль базується на символьних обчисленнях.
# Обчислення за другою альтернативою однаково працездатне для лінійних і нелінійних систем, не так швидко ускладнюється при збільшенні порядку системи. Єдиний недолік альтернативи - ми не маємо аналітичного виразу для виходу.
# Далі розглядається метод безпосереднього числового iнтегрування дифрiвняння з правою частиною - вхiдним  сигналом  управління u(t) і (або) збурення v(t).
# Так же, як і в першій частині, починаємо розробку документа (програми) з узагальнених базових моделей, форма яких не залежить від порядку системи і значень параметрів.
# Щоб зробити цю процедуру узагальненою і уніфікованою, треба спочатку привести задану систему дифрівнянь до форми Коші:
# dx/dt = A*x + B*u + D*v,  (1)
# де  x, u, v  - вектори стану, управління, обурень, відповідно;  A, B, D - матриці відповідної розмірності. Розв'язання  цього рівняння у формі Коші (=  розв'язання  без урахування обурень) має вид [1-4]:
# x[(k+1)*T] = F(T)*x[k*T] + G(T)*B*u[k*T],  (2)
# де  T - крок обчислень, k - номер крока; функції  F(T) і G(T) - безкінечні ряди:  F(T) = I + A*T + (A*T)^2/2! + (A*T)^3/3! + ... ;  (3)
# G(T) = I*T + A*T^2/2! + A^2*T^3/3! + ....
# Розглядаємо САУ, що описується дифрівнянням 3-го порядку:
# d^3x(t)/dt^3 + a2*d^2x(t)/dt^2 + a1*dx(t)/dt + a0*x = f(t),  де
# x(t) - регулюєма змінна (тиск, напруга, відстань, температура, ...);  f(t) - зовнішня дія на САУ;
# а2, а1, а0 - параметри математичної моделі, значення яких беруться згідно варіанту.
#
# Завдання
# 1. Отримати еквівалентні дискретні моделі 3-го порядку  4б
# 2. Побудувати реакції САУ на усі задані вхідні сигнали  8б
# 3. Визначити усталені помилки для усіх вхідних сигналів експериментально  8б
# 4. Визначити усталені помилки для усіх вхідних сигналів аналітично  15б
# 5*Розробити документ для знаходження Xvyx(t) за допомогою інтеграла згортки 15б
# 6*  Розробити документ для знаходження Xvyx(t) іншими способами  20б
#
# ВАРІАНТИ ЗНАЧЕНЬ ПАРАМЕТРІВ
# Параметри
# об"єкта
[
    Варіант, 1, 2, 3, 4, 5, 6, 7, 8, 9, 10, 11, 12;
    а2, 3.0, 2.0, 1.0, 1.75, 2.5, 3.0, 2.0, 1.0, 2.0, 2.5, 3.5, 3.5;
    а1, 3, 2, 2, 2.15, 3, 3.5, 1, 3, 2.5, 2, 3, 2.5
]
# Зразок виконання
# 1. Отримання еквівалентної  дискретної моделі
# Вводимо параметри обєкта (згідно варіанту), задаємо крок обчислень:
ORIGIN := 1
a2 := 1.2
a1 := 3
a0 := 1
T := .25
# Приводимо задане дифрівняння до форми Коші. Для цього вводимо нові змінні: х1 = x;
# x2 = dx/dt;  x3 = d^2x/dt^2 , і далі просто копіюємо відповідні фрагменти роботи  №1.1.
# Подаємо систему у матрично-векторному виді:
dх/dt == А*х + B*u
# де
A := [0, 1, 0; 0, 0, 1; -a0, -a1, -a2]
I := [1, 0, 0; 0, 1, 0; 0, 0, 1]
B := [0; 0; 1]
# Згідно з (3) записуємо наближення другого порядку для перехідної функції стану (ПФС) і виводимо їх значення. Виходячи з очевидних міркувань подаємо ПФС як функцію кроку квантування Т.
F2(T) := I + A*T + A^2*T^2/2!
F2(T) = [1, 0.25, 0.03125; -0.03125, 0.90625, 0.2125; -0.2125, -0.66875, 0.65125]
# Записуємо також складову ПФС для зовнішнього входу:
G2(T) := I*T + A*T^2/2!
G2(T) = [0.25, 0.03125, 0; 0, 0.25, 0.03125; -0.03125, -0.09375, 0.2125]
# Задаємо період моделювання, крок квантування та кількість кроків
Period := 12
T := .25
Nk := Period/T
Nk = 48
k := 1 .. Nk
# Конструюємо з програмних ресурсів пакету типові  тестові функції для САУ:
# Імпульсна  Ступінчаста  Лінійно зростаюча
u2[k] := Φ(k - 2) - Φ(k - 4)
u1[k] := Φ(k - 2)*1.1
u3[k] := .1*(k*T)
# Квадратично зростаюча  Гармонічна  Випадкова.
u4[k] := .001*(k*T)^2
u5(ω, k) := sin(ω*(k - 1)*T)
ω := 1.1
u6[k] := (rnd(1) - .5)
# [plot: u2[k], u1[k], u3[k], 9*u4[k], u5(ω, k), u6[k] vs k]
# Будуємо графіки цих функцій:
# Реакція на ступінчастий сигнал
# Записуємо початкові умови і робоче рівняння, будуємо графіки.
x[:, 1] := [0; 0; 0]
u1[k] := Φ(k - 2)*1.1
x[:, k + 1] := F2(T)*x[:, k] + G2(T)*B*u1[k]
# [plot: x[1, k], x[2, k], x[3, k], u1[k] vs k]
# Вінницький державний технічний університет
# Кафедра комп'ютерних систем  управління
# @  Боровська Т.М., Северілов В.А.
# Теорія  автоматичного управлінння
# Визначте усталену помилку координати (тобто x1k при k ->∞):
xg[k] := x[2, k]
# Реакція на імпульсний сигнал
# Копіюємо попередній модуль і в робочому рівнянні замінюємо u1k на u2k.
x[:, 1] := [0; 0; 0]
u2[k] := Φ(k - 2) - Φ(k - 4)
x[:, k + 1] := F2(T)*x[:, k] + G2(T)*B*u2[k]
# [plot: x[1, k], x[2, k], x[3, k], u2[k]*.5, xg[k] vs k]
# При яких умовах графіки x_(1,k) та  x_(g,k) співпадуть. І якщо співпадуть, то чому?
# Реакція на лінійно зростаючий сигнал
# Копіюємо попередній модуль і в робочому рівнянні замінюємо u1k на u3k.
x[:, 1] := [0; 0; 0]
u3[k] := .1*(k*T)
x[:, k + 1] := F2(T)*x[:, k] + G2(T)*B*u3[k]
# [plot: x[1, k]*.2, x[2, k], x[3, k], u3[k]*.2 vs k*T]
# Визначте усталену помилку координати (тобто x1k при k ->∞)
# Реакція на квадратично зростаючий сигнал
# Копіюємо попередній модуль і в робочому рівнянні замінюємо u1k на u4k.
x[:, 1] := [0; 0; 0]
u4[k] := .001*(k*T)^2
x[:, k + 1] := F2(T)*x[:, k] + G2(T)*B*u4[k]
hb[k] := (u4[k] - x[1, k])
# [plot: augment(x[1, k]*.5, u4[k]*.5), hb[k]*.5, x[2, k], x[3, k]*4 vs k]
# Визначте усталену? помилку координати (тобто x1k при k ->∞)
# Реакція на гармонічний сигнал + шум
# Копіюємо попередній модуль. В робочому рівнянні замінюємо u1k на u6k.
# Формуємо вхідний сигнал як суму періодичного сигналу і шуму:
# Амплитуда шуму  частота  поточний час  періодичний сигнал
x[:, 1] := [0; 0; 0]
Ah := .3
ω := 1
t(k) := T*k
u5(ω, k) := sin(ω*(k - 1)*T)
shu(k) := (rnd(1) - .5)*Ah
u6[k] := u5(ω, k) + shu(k)
x[:, k + 1] := F2(T)*x[:, k] + G2(T)*B*u6[k]
# [plot: x[1, k], x[2, k], u6[k], u5(ω, k) vs t(k)]
# А що власне тут буде усталеною помилкою?
# Як вимірювати амплітуду і фазу вихідного сигналу вдносно вхідного?
# Висновки................
# Працювали: Макитра М.М., Глечик Г.Г., Горшков П.П., Джек Пот. 13.13.2013
#
# Контрольні запитання
# 1. Реальні ситуації, коли САУ повинна відпрацьовувати деякий програмний сигнал.
# 2. Запишіть систему неоднорідних лінійних різницьових рівнянь у матрично-векторному виді.
# 3. Запишіть перехідну функцію стану для еквівалентного різницьвого рівняння з ненульовою правою частиною.
# 4. Опишіть усталені режими для типових  тестових вхідних сигналах.
#
# Додатковий  (факультативний) матеріал для ОАА
#
# Визначення реакції САУ на заданий сигнал за допомогою інтегралу згортки
# Щоб знайти реакцію САУ на заданий сигнал з використанням інтегралу згортки, спочатку необхідно визначити імпульсну перехідну функцію. Зробимо це, використавши зворотне перетворення Лапласа від передаточної функції.
# Беремо для прикладу динамічну систему
# 2-го порядку з дифрівнянням:
#
# Записуємо передаточну  функцію для
# виходу x(t) по входу u(t) :
#
# Виділяємо вираз для передаточної функції, вказуємо курсором на змінну s  і в меню символьних операцій вибираемо пункт "зворотне перетворення Лапласа" і ...маємо отакий вираз - це і є імпульсна перехідна функція. Увага! Оце присвоєння:
# g(t,a1,a0) := .. треба робити самостійно в режимі редактування.
d^2/dt^2(x) + a1*d/dt(x) + a0*x == u(t)
W(s, a1, a0) == 1/(s^2 + a1*s + a0) == x(s)/u(s)
g(t, a1, a0) := 2*exp(-1/2*a1*t)*sin(1/2*sqrt(4*a0 - a1^2)*t)/sqrt(4*a0 - a1^2)
t := 0, 0.2 .. 6
# [plot: g(t, .8, 8), g(t, .8, 2), g(t, 3, 8) vs t]
# Будуємо для контролю графіки імпульсних перехідних функцій при різних значеннях параметрів.
# Результат, очевидно , коректний:
# Спробуємо зробити теж саме  для системи 3-го пор"ядку і порівняємо результати з  обчисленням реакції за допомогою еквівалентного різницьового рівнння. Для цього скопіюємо відповідний модуль:
a2 := 2
a1 := 3
a0 = 1
A := [0, 1, 0; 0, 0, 1; -a0, -a1, -a2]
x[:, 1] := [0; 0; 0]
u1[k] := Φ(k - 2)
u5(ω, k) := sin(ω*(k - 1)*T)
F2(T) := I + A*T + A^2*T^2/2!
G2(T) := I*T + A*T^2/2!
T = 0.25
x1[:, 1] := x[:, 1]
x[:, k + 1] := F2(T)*x[:, k] + G2(T)*B*u2[k]
x1[:, k + 1] := F2(T)*x1[:, k] + G2(T)*B*u5(ω, k)
# Беремо  динамічну систему  вже
# 3-го порядку з дифрівнянням:
#
# Записуємо також передаточну  функцію для  виходу x(t) по входу u(t) :
#
# Символьний процесор вже не може  дати вираз для ІПХ, аналогічний попередньому, тому що для коренів алгебраічних рівнянь вище другого ступіню нема кінцевих аналі- тичних виразів. Тому знаходимо корені численим методом (за допомогою вбудованої функції polyroots().
d^3/dt^3(x) + a2*d^2/dt^2(x + a1*d/dt(x) + a0*x) == u(t)
W1(s, a2, a1, a0) := 1/(s^3 + a2*s^2 + a1*s + a0)
polyroots([1; a2; a1; a0]) = [-2.32472; -0.337641 + 0.56228i; -0.337641 - 0.56228i]
# Записуємо тепер передаточну функцію у виді:
1/((s - s1)*(s - s2)*(s - s3)) == 1/((s + 2.325)*(s + 0.338 - 0.562i)*(s + 0.338 - 0.562i))
# Але символічний процесор відмовляється від обробки цього більш конкретизованого виразу.  Робимо наступний крок - перемножаємо вирази  з сопряженими комплексними коренями:
(s + 0.338 - 0.562i)*(s + 0.338 + 0.562i)
# ⇒
s^2 + .676*s + .430088
# І от для такого подання передаточної  функції символічний процесор видає нарешті зворотне перетворення Лапласа, яке є (доказ - дивись курс ТАУ ч.1) імпульсною перехідною функцією (ІПХ). Але, не для любих значень параметрів...Рекомендується розробити щось своє - наприклад,  реалізувати формулу Хевісайда.
# от маємо передаточну функцію
# без комплексів....і для неї
# видається зворотне перетворення:
1/((s + 2.325)*(s^2 + .676*s + .430))
t := 0, 0.5 .. 15
g1(t) := .2345*exp(-2.325*t) + .8293*exp(-.338*t)*sin(.562*t) - .2345*exp(-.338*t)*cos(.562*t)
# [plot: g1(t) vs t]
# Будуємо для контролю графік отриманої імпульсної перехідної функції для системи 3-го порядку
# Маючи ІПХ обчислимо реакцію на типові вхідні дії САУ за інтегралом згортки  і порівняємо її з обчисленою за еквівалентним різницьовим рівнянням.
Xv1(t) := Φ(t - .4) - Φ(t - 1)
Xv2(t) := Φ(t - .5)
ω := .1
Xv5(ω, t) := sin(ω*(t - .1))
Xv6(t) := (rnd(1) - .5)
Xvu1(t) := integral(Xv1(t - τ)*g1(τ), τ = 0 .. t)
Xvy(t) := integral(Xv2(t - τ)*g1(τ), τ = 0 .. t)
# [plot: Xv1(t)*.5, Xvu1(t) vs t]
# [plot: Xv2(t), Xvy(t) vs t]
Xv3(t) := .1*t
Xv4(t) := .001*t^2
# ï Чим структурноð
# відрізняються
# ці рівняння?
Xvy1(t) := integral(Xv3(t - τ)*g1(τ), τ = 0 .. t)
Xvy(t) := integral(Xv4(τ)*g1(t - τ), τ = 0 .. t)
# [plot: Xv3(t), Xvy1(t) vs t]
# [plot: Xv4(t), Xvy(t) vs t]
ω := 1
Xv5(ω, t) := sin(ω*(t - .1))
Xvy1(t) := integral(Xv5(ω, τ)*g1(t - τ), τ = 0 .. t)
# [plot: x[1, k]*2, x1[1, k], Xvu1(t)*2, Xvy1(t) vs k*T, t]
t := 0, 0.8 .. 24
Xv7(t) := Φ(t - .4) - Φ(t - 12)
Xvy7(t) := integral(Xv7(t - τ)*g1(τ), τ = 0 .. t)
# От реакція на "довгий" імпульс
# !Зміни довжину імпульсу?
# [plot: Xv7(t), Xvy7(t) vs t]
# Бачимо задовільне співпадіння розрахованих різними методами реакцій на імпульс і гармонічний сигнал. При бажанні можна виявити причини розходження і певним чином усунути їх (25б). Головний висновок - створено інструмент для обчислення реакції на довільну зовнішню дію.
