# l.3 Дослідження часових характеристик САУ.
# Дослідження часових характеристик САУ при варіації параметрів
#
# Ціль даної роботи - набуття  навичок у розробці і  реалізації  у програмному середовищі математичного пакета робочих (тобто програмно виконуємих) моделей динаміки, орієнтова- них на дослідження впливу варіацій параметрів регулятора і об'єкта управління.
# В неформальному плані це, наприклад, така задача - зібрано реальну САУ (див. схему) - підсилювач, привод (виконавчий елемент) і об'єкт управління, вимірювачі параметрів вектору стану (на схемі не показані) і регулятор, що замикає контур.
# Об'єкт, привод, підсилювач - нелінійні елементи. На базі їх лінеарізованих моделей розра- ховано параметри регулятора k1, k2, k3. Реальна САУ при таких значеннях параметрів може бути незадовільною, або, взагалі, нестійкою.
# Задача - настроїти (підібрати) параметри регулятора так, щоб САУ була задовільною (ще краще - оптимальною). Методи цього пошуку найрізноманітніші - від чистого методу ви- падкових проб і помилок до математично витончених (інтелектуальних?) методів оптімізації  і адаптації. Потім для настроєного регулятора знаходяться границі допусків (на значення пара- метрів) в межах яких САУ:  1) задовільна,  2) стійка.
# Процедуру настроювання виконує а) спеціаліст з досвідом, б) автоматична система, г)спеціаліст в диалозі із автоматичною системою настройки.
# В даній роботі на повністю контролюємій (прозорій) моделі об"єкта імітується ця заключ- на процедура створення САУ - настройка, випробування, сертифікація.
# Вінницький державний технічний університет
# Кафедра комп'ютерних систем  управління
# @  Северілов В.А. ,Боровська Т.М.
# Теорія автоматичного управління
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# Для оцінки якості і функціональної придатності САУ існує більш-менш стандарти- зований набір показників. В даній роботі використовуються такі показники (відповідні горизонтальні і вертикальні (червоні) лінії на графіку-"осцилографі", поданому вище):
# - тривалість перехідного процесу (ПП) - час до входу в допуск помилки - Тр ;
# - викид (перерегулювання) - максимальне значення помилки  у перехідному процесі - hm
# та багато інших...
#
# Сьогодні САУ реалізують мікроконтролерами і мікропроцесорами. Тому вони самокон- тролюються, самокалібруються і самонастроюються.  Надзадача  в цій роботі - розробити систему самонастройки регулятора, що приводить показники ПП САУ  до заданих значень. (Оптимальні і адаптивні САУ вивчаються в другій частині курсу).
# Завдання
# 1. Настроїти регулятор вручну, методом пошуку  6 б
# 2. Оцінити якість САУ при заданому розкиді заданого параметру  8 б
# 3. Визначити допустимий диапазон зміни заданого параметру, в якому САУ  ще зостається
# стійкою  8 б
# 4. Визначити характер зміни ПП при заданому характері зміни всіх параметрів об'єкта
# управління  11 б
# 5. Розробити модулі обчислення показників якості ПП від параметрів системи і збурень  67 б
#
# ВАРІАНТИ ЗНАЧЕНЬ ПАРАМЕТРІВ
a0o := 1
k1 := 2
[
    Варіант, 1, 2, 3, 4, 5, 6, 7, 8, 9, 10, 11, 12, 13, 14;
    а2, 3.0, 2.0, 1.0, 1.75, 2.5, 3.0, 2.0, 1.0, 2.0, 2.5, 3.5, 3.5, 3.3, 2.8;
    а1, 3, 2, 2, 2.15, 3, 3.5, 1, 3, 2.5, 2, 3, 2.5, 1.5, 2.5;
    що_дослід, а1, a2, a3, a3, a2, a1, a1, a2, a3, a3, a2, k1, k1, k2;
    жувати, k1, k2, k3, k2, k1, k2, k3, k3, k1, a1, a3, k2, k3, k3
]
a1o := 1
k2 := 2
a2o := 1
k3 := 2
# Зразок виконання
# 1. Отримання еквівалентної  дискретної моделі
# Приводимо задане дифрівняння до форми Коші. Для цього вводимо нові змінні:  х1  = x;  x2 = dx/dt;  x3 = d^2x/dt^2 , і далі просто копіюємо відповідні фрагменти роботи  №1.1.
# (DbCl - якщо зробити дабл-клік на цьому об'єкті - викличеться робота №1.1 (при наявності)
# Подаємо систему у матрично-векторному виді:
# система:
dх/dt == Аo*х + B*u
# регулятор:
u == K*x  # де
Ao := [0, 1, 0; 0, 0, 1; -a0o, -a1o, -a2o]
I := [1, 0, 0; 0, 1, 0; 0, 0, 1]
B := [0; 0; 1]
K := [k1, k2, k3]
x == [x1; x2; x3]
# Використовуючи (необов'язково, бо вирази прості) символьний процесор, розкриваємо від- повідні матрично векторні вирази:
u == K*x == [k1, k2, k3]*[x1; x2; x3] == k1*x1 + k2*x2 + k3*x3
ORIGIN := 1
Ao*x + B*u == Ao*x + B*K*x == (Ao + B*K)*x
A := Ao + B*K
dх/dt == А*х
# Виводимо символьні вирази для матриці замкненої системи і її окремих елементів. Для цього досить набрати замість "=" стрілку  (взяти з інструментальної палітри). Ці вирази нам потрібні для розробки робочої матмоделі, орієнтованої на дослідження впливу варіацій параметрів. Можна було їх вивести "вручну". Але у нас при зміні матриць Ао, В, К
# усі вирази зі стрілками будуть переобчислюватись (символьно).
# Вінницький державний технічний університет
# Кафедра комп'ютерних систем  управління
# @  Боровська Т.М., Северілов В.А.
# Теорія  автоматичного управлінння
A → [0, 1, 0; 0, 0, 1; 1, 1, 1]
Ao + B*K → [0, 1, 0; 0, 0, 1; 1, 1, 1]
# Нарешті переходимо безпосередньо до побудови робочої моделі. Далі виділено кольорами (highlight) майже все те, без чого воно не працюватиме:
# параметри об'єкта управління:  крок обчислень:  кількість кроків:
a20 := 1
a10 := 1
a00 := -2
T := .25
N := 37
i := 1 .. N
ORIGIN := 1
# Параметри замкненої системи записуємо як функції від параметрів об'єкта і регулятора:
a2(k3) := a20 + k3
a1(k2) := a10 + k2
a0(k1) := a00 + k1
t[i] := T*(i - 1)
# Записуємо  перехідну функцію стану, як функції параметрів регулятора
A(k1, k2, k3) := [0, 1, 0; 0, 0, 1; -a0(k1), -a1(k2), -a2(k3)]
# Вінницький державний технічний університет
# Кафедра комп'ютерних систем  управління
# @  Боровська Т.М., Северілов В.А.
# Теорія  автоматичного управлінння
S2(k1, k2, k3) := I + A(k1, k2, k3)*T + A(k1, k2, k3)^2*T^2/2!
l := -1, -.9 .. 1.5
TT := N*T
tt := Tp, Tp + T .. TT
x2[:, 1] := [-1; 0; 0]
# 2. Настроювання регулятора на задані: тривалість Tp; викид hm
# Цю операцiю зручно виконувати, якщо k1, k2, k3 вводяться поближче до графiка ПП, тому ММ САУ зроблена компактною функцiєю k1, k2, k3. Біля графіка вводимо також hm i Tp (згiдно варiанту) i пiдбираємо k1, k2, k3, що дають потрiбнi hm i Tp.
# Треба власне змінювати k1, k2, k3 так, щоб перехідний процес ніде не переходив верхню лінію (hm), а після вертикальної лінії (Тр) не виходив з допуску (дві лінії ±0.05), та ще й при цьому  значення  суми (k1+ k2+ k3) було б мінімальним (це "ціна управління")
x2[:, i + 1] := S2(ke1, ke2, ke3)*x2[:, i]
Tp ≡ 5
hm ≡ .2
# [plot: x2[1, i], hm, .05, -.05, l vs t[i], tt, Tp]
ke1 ≡ 7
ke2 ≡ 4.5
ke3 ≡ 1.5
ke1 + ke2 + ke3 = 13
a2(ke3) = 2.5
a1(ke2) = 5.5
a0(ke1) = 5
# 3. Визначення області стійкості для заданого параметра (k1)
# Краще шукати верхню та нижню границi стiйкостi  одночасно, для чого  двiчi  вирiшуємо  рiвняння  динамiки  (змiннi  x1 i x3)  при бiльшому i меншому вiд номiнального значення k1,  означимо їх як  kmin i  kmax. ЗМIНЮЄМО  kmin  i  kmax, ПОКИ САУ НЕ СТАНЕ НЕСТIЙКОЮ.
x3[:, 1] := x2[:, 1]
x1[:, 1] := x2[:, 1]
kmin := 2.
ke1 = 7
kmax := 13
S2(1.9, ke2, ke3) = [1, 0.25, 0.03125; 0.003125, 0.828125, 0.171875; 0.0171875, -0.942187, 0.398438]
x3[:, i + 1] := S2(kmax, ke2, ke3)*x3[:, i]
ORIGIN = 1
x1[:, i + 1] := S2(kmin, ke2, ke3)*x1[:, i]
# [plot: x1[1, i], x2[1, i], x3[1, i], 0 vs i]
kmin = 2
kmin/ke1 = 28.5714*1%
kmax/ke1 = 185.714*1%
# Бачимо, що введених значеннях  kmin i  kmax САУ аперіодично і коливально нестійка. Диапазон зміни к1 є досить великим. Зауваження: об" єкт може бути стійким і без регулятора, в цьому випадку мінімальне значення к1 буде від'ємним.
# 4. Дослідження ПП при пропорційній зміні параметрів САУ
# Як треба змінювати параметри регулятора при настроюванні, щоб змінювався тільки один з показників ПП. Далі розглянуто характерний і важливий приклад. Подана нижче залежність параметрів регулятора від швидкодії (тривалості ПП) використовується в моделюванні, методах синтезу.  Беремо (копіюємо) попередню ММ, але зробимо її функцiєю вiд параметра ω а не k1, k2, k3.
#
# Згідно з завданням параметри повинні змінюватись так:
A2(ω) := a2(ke3)*ω
A1(ω) := a1(ke2)*ω^2
A0(ω) := a0(ke1)*ω^3
# Записуємо вирази для перехідної функції стану, виводимо для контролю значення
A(ω) := [0, 1, 0; 0, 0, 1; -A0(ω), -A1(ω), -A2(ω)]
A(1) = [0, 1, 0; 0, 0, 1; -5, -5.5, -2.5]
A(2) = [0, 1, 0; 0, 0, 1; -40, -22, -5]
S3(ω) := I + A(ω)*T + (A(ω)*T)^2/2!
S3(2) = [1, 0.25, 0.03125; -1.25, 0.3125, 0.09375; -3.75, -3.3125, -0.15625]
# Щоб розібратись у логіці зміни коефіціентів системи запишемо характеристичне рівняння нашої неперервної динамічної системи у такому виді:
# ω^0*s^3 + a2(k3)*ω^1*s2 + a1(k2)*ω^2*s^1 +a0(k1)*ω^3*s^0 = 0
#
# Бачимо - сума ступенів змінних s і ω є постійною = 3, а розмірність у них однакова - (1/сек)
ωmi ≡ .7
ωma ≡ 1.4
t2(i) := T*i
x1[:, i + 1] := S3(ωmi)*x1[:, i]
x3[:, i + 1] := S3(ωma)*x3[:, i]
# [plot: x1[1, i], x2[1, i], x3[1, i] vs t2(i)]
# Перехідні процеси різні, але..Щоб виявити закладений у них інваріант змінимо масштаби часу для кожного з них пропорційно значенню параметра ω:
t2(k) := T*k
t1(k) := t2(k)*ωmi
t3(k) := t2(k)*ωma
# [plot: x1[1, i], x2[1, i], x3[1, i] vs t1(i), t2(i), t3(i)]
# Практичний висновок очевидний - якщо при настроюваннї лінійної динамічної системи ми хочемо змінити тількі тривалість ПП, не змінюючи його форми, слід змінювати параметри замкненої системи так, як ми їх змінювали. Можна розрахувати і залежності безпосередньо для параметрів регулятора.
#
# Контрольні запитання
#
# 1. Назвіть показники якості перехідного процесу.
# 2. Чому регулятор приходиться настроювати? Хіба не можна аналітично розрахувати потрібні значення параметрів регулятора?
# 3. Напишіть документ або програму для побудови трьох перехідних процесів:  1) при номінальних значеннях параметрів, при k2 = 0.75*k2 і  k2 = 1.25*k2.
# 4. Дайте визначення тривалості ПП і розробіть алгоритм обчислення цього показника.
