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# Вінницький державний технічний університет
# Кафедра комп'ютерних систем  управління
# @  Боровська Т.М., Северілов В.А.
# Теорія  автоматичного управлінння
# Вінницький державний технічний університет
# Кафедра комп'ютерних систем  управління
# @  Боровська Т.М., Северілов В.А.  Теорія  автоматичного управлінння
#
# Лабораторна робота № 2.1 Дослідження частотних
# характеристик САУ.  Частина 1. Одержання та
# дослідження частотних характеристик
# 2.1. Дослідження частотних характеристик. Одержання та аналіз частотних характеристик
# САУ
# Вступ
# Ціль даної роботи - набуття навичок у розробці і реалізації  в програмному середо- вищі математичного пакета, орієнтованих  на реалізацію у мікроконтролерах програм обчислення частотних характеристик за різними вхідними даними  і  різними методами.
# В попередній роботі ми оцінювали якість лінійної стаціонарної САУ за  її  часовими характеристиками - перехідними процесами. Існує альтернатива, суть  якої в тому, що якість лінійної стаціонарної САУ можна оцінювати за усталеною реакцією на гармоніч- ний сигнал - частотними характеристиками .
# Між частотними  і часовими характеристиками є взаємооднозначні зв'язки. У часто- тних  і часових методів аналізу і синтезу САУ є свої переваги і вади і тому вони викорис- товуються в теорії і практиці, як правило, комплексно. Можна виділити такі  альтерна- тиви отримання частотних характеристик (ЧХ) лінійної стаціонарної динамічної системи:
# 1. Експериментально, вимірюючи  амплітуду  A(ω) i ФАЗУ F(ω) усталеного виходу: y(t), t -> ∞ при гармонiчному входi: x(t) = sin(ω*t);
# 2. Математичною обробкою (перетворення Фурьє) виходу САУ при будь-якому вхiд- ному: W(j*ω) = F{y(t)}/F{x(t)}, де W(j*ω) - "частотна передаточна функцiя", F{.} - перетворення Фурьє;
# 3. Математичною обробкою (спектральний аналіз) виходу  САУ  при довільному, або випадковому (шум) вхiдному сигналі;
# 4. По передаточнiй функцiї: A(ω) = mod(W(jω)),  F(ω) = arg(W(jω)), для чого, природно, треба мати аналітичний вираз для передаточної функції.
# Частотні характеристики лінійних систем не залежать від амплітуди вхідного сигналу. Для нелінійних систем ЧХ залежатимуть і від  амплітуди, а для нестаціонарних систем - від часу.
# Завдання
# Для свого варiанта передаточної функцiї  W(s)
# 1. Отримати вручну аналiтичні  вирази для  A(ω),  F(ω),  M(ω) = Re(W(jω)),
# N(ω) = Im(W(jω));
# 2. Побудуватии графіки A(ω), F(ω), M(ω), N(ω), N(M) - АФЧХ та логарифмiчнi характеристики за аналiтичними  виразами  та з допомогою вбудованих функцiй Mathcad - ¦s¦,  arg(s),  Im(s),  Re(s), та iнших.
# 3. Дослідити вплив варіацій вибраних (≥2) параметрів предаточної функції.
#
# Варіанти передаточних функцій
W1(s) := (T2*s + 1)/(T1^2*s^2 + 2*T1*λ*s + 1)  # error: This variable is undefined. Check that the label is set correctly.  # E1  2F
W2(s) := (T2*s + 1)^2/(T1^2*s^2 + 2*T1*λ*s + 1)
# E3  4F
# H5  6D
W3(s) == (T2^2*s^2 + 2*T2*λ*s + 1)/(T1^2*s^2 + 2*T1*λ*s + 1)
W5(s) == (T2^2*s^2 + 1)/(T1^2*s^2 + 2*T1*λ*s + 1)
W6(s) == T2^2*s^2/((T1^2*s^2 + 2*T1*λ*s + 1)*(T3^2*s^2 + 2*T3*λ*s + 1))
W7(s) == (T2*s + 1)/(T1^2*s^2 + 2*T1*λ*s - 1)
W8(s) == (T2*s + 1)^2/(T1^2*s^2 + 2*T1*λ*s - 1)
# E7  8F
# E9  10F
W9(s) == (T2^2*s^2 + 2*T2*λ*s + 1)/(T1^2*s^2 + 2*T1*λ*s - 1)
W10(s) == (T2*s + 1)/((T1*s + 1)*(T3*s - 1))
# Зразок виконання
# 1. Отримання частотних характеристик за передаточній функції
# 1.1 Виконаємо все спочатку при мінімальних витратах інтелекту (і часу) - використаємо вбудовані функції пакету. Записуємо вираз для уявної одиниці  j (є вбудована - 1і), задаємо диапазон частот і значення параметрів передаточної функції
j := sqrt(-1)
ω := 0, 0.5 .. 40
T1 := .2
T2 := .1
λ := .2
T3 := .07
# Набираємо або копіюємо звідтиG передаточну функцію і записуємо, використовуючи вбудовані функції пакету, вирази для амплітудної, фазової, дійсної та уявної ЧХ
W4(s) := (T2*s + 1)/((T1*s + 1)*(T3*s + 1))
Av(ω) := |W4(j*ω)|
Fv(ω) := arg(W4(j*ω))
Дійсна(ω) := Re(W4(j*ω))
Уявна(ω) := Im(W4(j*ω))
# 2. Побудова графіків частотних характеристик
# Будуємо графіки АЧХ і ФЧХ, будуємо їх асимптоти та координати характерних точок - максимуми, точки перегину.  q := -10, -9 .. 10 ;  ω1 := 1/T1 (варіант знака "розділити")
# [plot: Av(ω), Fv(ω), q vs ω, ω1]
# ï  Чи можна визначити асимптотичні  значення частотних характеристик не будуючи графіків, а тільки подивившись на передаточну функцію.
# Якщо не можна, то чому?
# Якщо  можна, то як?  (6 б)
# Якими залежностями пов'язані координати екстремумів на АЧХ з параметрами передаточної функцї Т1, Т2, Т3.. (4 б)
# Вінницький державний технічний університет
# Кафедра комп'ютерних систем  управління
# @  Боровська Т.М., Северілов В.А.
# Теорія  автоматичного управлінння
# Різні види ЧХ - A(w), F(w), M(w), N(w) пов'язані між собою певними залежностями. Записуємо їх і перевіряємо, чи дійсно воно так:
Fm(ω) := atan(Im(W4(j*ω))/Re(W4(j*ω)))
Am(ω) := sqrt(Re(W4(j*ω))^2 + Im(W4(j*ω))^2)
Am(0) == Av(0) = 1
Am(7.40) - Av(7.40) = 0
Fm(0) == Fv(0) = 1
Fm(10) - Fv(10) = 0
Am(9) == Av(9) = 1
Am(13) - Av(13) = 5.55112e-17
Fm(10) - π == Fv(10) = 0
As(ω) := 1/T1*ω^-1
# Будуємо амплітудно-фазову частотну характеристику використовуючи альтернативні засоби пакета графіки в декартових і полярних координатах.
# [polar plot: Fv(ω), Av(ω)]
Tc1 := 1
clear_sym(Tc1)
# [plot: Уявна(ω), 0, q vs Дійсна(ω), q, 0]
wc := 1
Tc2 := 1
clear_sym(Tc2)
clear_sym(wc)
λe := 1
λc := 1
clear_sym(λc)
clear_sym(λe)
# Будуємо ЛАЧХ (тобто логарифмічну амплiтудно-частотну характеристику) методом форматування графіка (вибираємо логарифмічні масштаби по обох осях). ЛАЧХ має дві асимптоти, які і побудовані на графіку
# [plot: Av(ω), 1, As(ω) vs ω]
# ï Чи можна побудувати асимптотичну ЛАЧХ тільки подивившись на передаточну функцію.
# Якщо не можна, то чому?
# Якщо  можна, то побудуйте
# (4 б)
# Високочастотна асимптота має  певний  стандартний нахил і є прямою в логарифмічних координатах.  Напишіть рівняння цієї асимптоти в натуральних координатах  (в документі воно сховане).  (6 б)
# 3. Дослідження частотних характеристик при варіацїї заданого параметра
# Спочатку, в навчальних цілях, знайдіть вручну аналітичні вирази для ЧХ (для зміц- нення знань та на випадок відсутності математичного пакета).
# Увага! Далі введено спеціальні змінні без значень для виконання символьних обчи- слень, наприклад Тс2 замість Т2, λс замість λ,  wc замість ω.  Підставляємо у
# W1c(s) := (Tc2*s + 1)/(Tc1^2*s^2 + 2*Tc1*λc*s + 1)  s := 1i*wc  і  отримуємо:
# W1c(1i*wс) → (1 + Tc2*wс*1i)/(1 - Tc1^2*wс^2 + 2i*λc*Tc1*wс) .
# Модуль частотної передаточної функції (АФЧХ) - це амлітудна частотна характерис- тика (АЧХ) :  Aa(ω) := |W1c(1i*wc)|  .
# Розкриваємо її, враховуємо, що  (1i*w)^2 → -w^2  ;  (1i*w)^3 → -(w^3*1i) ;  (1i*w)^4 → w^4 .
Aa(ω) expand, wс; simplify; collect, wс; float, 2 → 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
# Відомо, що модуль частки комплексних чисел дорівнює частці модулей. Визначимо АЧХ альтернативним способом. Отримуємо теж саме, але трохи в іншому виді.
|Tс2*1i*wс + 1|/|Tс1^2*(1i*w)^2 + 2*Tс1*λс*1i*wс + 1| → |1 + wс*Tс2*1i|/|1 - w^2*Tс1^2 + 2i*wс*λс*Tс1|  # .
# Повертаємось до початкових змінних і записуємо АЧХ звичній формі
# Aa(ω) := sqrt(T2^2*ω^2 + 1.)/sqrt(T1^4*ω^4 - 2*T1^2*ω^2 + 1 + 4*T1^2*λ^2*ω^2) .
# Аналогічно отримуємо вираз для ФЧХ
Fa(ω) == □
arg((1i*T2*ω + 1)/(-T1^2*ω^2 + 2i*λ*T1*ω + 1)) == atan(T2*ω/1) - atan(2i*λ*T1*ω/(1 - T1^2*ω^2))
# Зауваження. Використання символьного процесора - не для нервових: треба врахо- вувати такі особливості роботи символьного процесора: 1) підставляти саме "штатну" уявну одиницю і а не sqrt(-1) ; 2) підставляти  w замість ω,  Тc2 замість Т2  та ін.
# Запишемо робочі вирази для  АЧХ і ФЧХ як функції користувача від параметрів, вплив яких  досліджуємо.
A(ω, T1, λ) := sqrt((1 + ω^2*T2^2)/(T1^4*ω^4 - 2*T1^2*ω^2 + 1 + 4*T1^2*λ^2*ω^2))
F(ω, T1, λ) := arg((1i*T2*ω + 1)/(-T1^2*ω^2 + 2i*λ*T1*ω + 1))
ω := 0, 0.2 .. 20
# [plot: A(ω, T11, λ), A(ω, T12, λ), A(ω, T13, λ), q vs ω, ω0, ω2, ω3]
# Змінюючи значення Т11, Т12, Т13, можемо тут же бачити відповідну зміну АЧХ та ФЧХ.
#
# Неважко зробити це для дослідження впливу Т2 та λ..
#
# T11 ≡ .15
# T12 ≡ .20
# T13 ≡ .40
# Вінницький державний технічний університет
# Кафедра комп'ютерних систем  управління
# @  Боровська Т.М., Северілов В.А.
# Теорія  автоматичного управлінння
# [plot: F(ω, T11, λ), F(ω, T12, λ), F(ω, T13, λ), q vs ω, ω0, ω2, ω3]
ω0 ≡ 1/T11
ω0 = 6.66667
ω2 ≡ 1/T12
ω2 = 5
ω3 ≡ 1/T13
ω3 = 2.5
# Аналогічно досліджуємо вплив варіації параметра λ.  Ці три характеристики звичай- но мають таку інтерпретацію: "пліс-характеристика" - при додатних можливих відхилен- нях параметрів, "мінус-характеристика" - при від'ємних відхиленнях і номінальна харак- теристика.
# [plot: A(ω, T1, λ1), A(ω, T1, λ2), A(ω, T1, λ3) vs ω]
λ = 0.2
λ1 ≡ .15
λ2 ≡ .20
λ3 ≡ .30
# [plot: F(ω, T1, λ1), F(ω, T1, λ2), F(ω, T1, λ3) vs ω]
# Працювали: Верба В., Грушка В.,  Вишняк Г. 01.02.03.
#
# Контрольні запитання
#
# 1. Способи отримання ЧХ.
# 2. Зв'язок між АЧХ, ФЧХ, M(ω), N(ω).
# 3. Що таке "власні частоти"?
# 4. Як будуються асимптотичні ЛАЧХ?
# 5. Чи можна за ЛАЧХ ідентифікувати передаточну функцію ЛДС?
# 6. Чому дорівнює натуральний нахил характеристики 20дБ/декаду?
# 7. Що таке смуга пропускання?
# 8. Чи можна за часовою характеристикою визначити частотну і навпаки?
# 9. Як за реакцією на довільний сигнал визначити частотні характеристики?
# 10. Як за частотним характеристиками побудувати перехідний процес?
# 11. Як за частотними характеристиками побудувати реакцію на довільний сигнал?
# 12. Як за частотними характеристиками отримати передаточну функцію?
