# footer: © СБ
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# 3.1 Дослідження стійкості САУ альтернативними методами
# Вінницький державний технічний університет
# Кафедра комп'ютерних систем  управління
# розробили  @ Боровська Т.М., Северілов В.А.  Теорія  автоматичного управлінння
# Вступ
# Ціль даної роботи - одержання навичок  використання критеріїв стійкості та  методів аналізу стійкості, наприклад, перевірки стійкості  типової САУ з зворотним  звязком. Використання альтернативних  методів перевірки на стійкість забезпечує  надійність результатів - виявлення помилок. Слід враховувати, що в інженерній  практиці  прихо- диться перевіряти на стійкість системи, що задані:
# G диференційними  рівняннями;  G частотними характеристиками;
# G алгебрачними  рівняннями перехідних процесів; G передаточними функціями.
# У цій роботi розглядасться тільки стійкість до початкових збурень, а також задача  пошуку  критичних значень заданого параметра, за яких САУ знаходиться на границі  стйкості. До виконання цієї роботи необхідно вивчити відповідний розділ і мати чітку уяву про:  F визначення стійкості по Ляпунову;
# F необхідні і достатні умови стійкості лінійних динамічних систем;
# F зв'язок між коренями характеристичного рівняння і частотними характеристиками.
# Крім конкретних знань і навичок, робота дає відповідь на питання: "який з методів пере- вірки на стійкість є оптимальним". Нижче подано структурну схему САУ і дайджест роботи:
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Wraz(s) == Wob(s)*Wpr(s)*Wreg(s)
Wzmk(s) == Wraz(s)/(1 + Wraz(s)*Wzz(s)) == Q(s)/D(s)
D(s) == a3*s^3 + a2*s^2 + a1*s + a0
Wraz(j*ω)
Wzmk(j*ω)
G3 == [a2, a0, 0; a3, a1, 0; 0, a2, a0]
polyroots(D(s))
x3[:, k + 1] == S2(12)*x3[:, k]
G2 == [a2, a0; a3, a1]
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G1 == a2
|G1| > 0
|G2| > 0
|G3| > 0
# Як об'єкт дослідження  розглядається слідкуюча САУ (з одиничним зворотним зв'язком).  Задані:
# Передаточна функція регулятора:  Wreg(s)= u(s)/x(s)= k3*s^2 + k2*s + k1
# Передаточна функція  об'єкта+підсилювача+привода:
# Wobj(s)= x(s)/u(s)= +1/(T1*s+1)*(T2^2*s^2+2*ζ*T2*s+1)
#
# Завдання
# 1. Перевірити  САУ на стійкість за критеріями Михайлова, Найквіста, Гурвиця  - 21 б
# 2. Знайти корені характеристичного рівняння.  -  5 б
# 3. Побудувати перехідні процеси. Експериментально  визначити границі стійкості по заданому  параметру (згідно варіанту).  -  14 б
# 4. Визначити запаси стійкості  САУ по амплітуді та фазі. (самостійно)  20-10 б  Зміною заданого параметру зробіть САУ нестійкою і перевіряйте на стійкість  паралельно стійку і нестійку САУ - ну, як у зразку виконання.
# Варіанти завдання
# Варіант - це відповідний стовпчик цієї таблиці, його можна відповідно зчитати.
k1 := 0.1
k2 := 0.5
k3 := 3
T2 := 1
T1 := 0.3
ζ := .1
ORIGIN := 1
# Номер варіанта
# Т1=
# Т2=
# ζ =
# k1=
# k2=
# k3=
# Заданий парам.
M1 := [
    1, 2, 3, 4, 5, 6, 7, 8, 9, 10, 11, 12;
    2, 1, 0.3, 0.3, .5, 0.2, 1, 1, 2, 0.3, 1, 2;
    0.2, 0.5, 2, 1, 2, 2, 1, 0.3, 0.5, 0.2, .6, 1;
    0.2, 0.3, 0.1, 0.1, 0.3, 0.1, 0.2, 0.1, 0.2, .2, .4, .3;
    1, 1, 1, 0.1, 0.1, 0.1, 0.1, 1, 0.2, 0.3, .2, .1;
    0.5, 0.5, 0.5, 0.5, 0.5, 1, 1, 2, 0.5, 0.4, .4, .5;
    5, 5, 5, 3, 4, 4, 3, 5, 4, 3, 3, 3;
    k1, k2, k3, k1, k2, T2, k1, ζ, k3, T1, T2, k2
]
M1[:, 4] → [4; 0.3; 1; 0.1; 0.1; 0.5; 3; 0.1]
# Номер варіанта
# Т1=
# Т2=
# ζ =
# k1=
# k2=
# k3=
# Заданий парам.
M2 := [
    13, 14, 15, 16, 17, 18, 19, 20, 21, 22, 23, 24;
    2, 1, 0.3, 0.3, .5, 0.2, 1, 1, 2, 0.3, 1, 1;
    0.2, 0.5, 1, 2, 3, 1, 2, 0.4, 0.7, 0.2, 1, 2;
    0.2, 0.3, 0.1, 0.1, 0.3, 0.1, 0.2, 0.1, 0.1, .2, .1, .2;
    1, 1, 1, 0.1, 0.1, 0.1, 0.1, 1, 0.2, 0.3, .1, .2;
    0.4, 0.6, 0.9, 1.5, 1.6, 2, 1, 1, 0.7, 0.5, .8, .66;
    5, 5, 5, 3, 4, 4, 3, 5, 4, 3, 3, 2;
    k1, k2, k3, k1, k2, k3, ζ, k2, k3, T1, T2, ζ
]
[Var; T1; T2; ζ; k1; k2; k3; Pv] := M1[:, 4]
# Зразок виконання
# Варіант:13-б. Вводимо (вручну?) значення параметрів САУ згідно з варіантом
# ПАРАМЕТРИ  ОБЄКТА  УПРАВЛIННЯ  Варіант:  ПАРАМЕТРИ  РЕГУЛЯТОРА
T1 = 0.3
T2 = 1
ζ = 0.1
Var = 4
k3 = 3
k2 = 0.5
k := 7
# Вводимо  ЧИСЛО КРОКІВ ОБЧИСЛЕНЬ  ДИАПАЗОН  ЧАСТОТ
kilkkrok := 100
k := 1 .. kilkkrok
ω0 := .01
ωk := 8.01
# КРОК  ОБЧИСЛЕНЬ
krok := (ωk - ω0)/kilkkrok
# СЕРІЯ ЗНАЧЕНЬ ЧАСТОТИ
ω[k] := ω0 + (k - 1)*krok
# Записуємо передаточні функції  регулятора, привода, обєкта:
Wreg(s, k1, k2, k3) := (k1 + k2*s + k3*s^2)
Wpr(s) := 1/(T1*s + 1)
Wob(s) := 1/(T2*s^2 + 2*T2*ζ*s + 1)
# Записуємо передаточну функцію розімкненої системи:
Wraz(s, k1, k2, k3) := Wob(s)*Wpr(s)*Wreg(s, k1, k2, k3)
# 1. КРИТЕРІЙ НАЙКВІСТА
# Для перевірки САУ на стійкість за критерієм Найквіста потрібно побудувати АФЧХ розмкнутої САУ, тобто годограф Wraz(i*ω). Якщо розімкнута САУ стійка (а це виконано)  то замкнута САУ буде стійка, якщо годограф не охоплює точку  з координатами  -1, i*0  при зміні частоти  0<ω<∞  (і  навпаки...)
# Уявна одиниця i кодується  як  1i,  але можна визначити її самостійно:
j := sqrt(-1)
# Підставляємо s=i*w  у  Wraz(s...)  і записуємо  уявну та  дійсну частини
k1 := 8
k2 := -.6
уяв(k, k1) := Im(Wraz(1i*ω[k], k1, k2, k3))
дій(k, k1) := Re(Wraz(1i*ω[k], k1, k2, k3))
l := -10, -9. .. 10
# Будуємо пару графіків годографа Найквіста для значень k1 = -.6, k1 = 8. Бачимо: в першо- му випадку САУ - НЕстійка, в другому - навпаки: наочно ми бачимо, що годограф охоплює чи не охоплює червоне колко - точку з координатами (-1, 0*і). Пакет не може поставити стрілки і числа на графіку - зробіть це Ви, вкажіть, де ω = 0, а де  ω = ∞.
# [plot: уяв(k, k1), l, 0 vs дій(k, k1), 0, l, -1]
# [plot: уяв(k, .2), l, 0 vs дій(k, .2), 0, l, -1]
# Подаємо Wraz(s)  у явному виді і виводимо параметри для контролю.
T1 = 0.3
T2 = 1
ζ = 0.1
Wraz(s) := (k1 + k2*s + k3*s^2)/((T2*s^2 + 2*T2*ζ*s + 1)*(T1*s + 1))
k3 = 3
k2 = -0.6
k1 = 8
# 2.  КРИТЕРІЙ МИХАЙЛОВА
# Для перевірки САУ на стійкість за критерієм Михайлова потрібно побудувати
# годограф D(i*w),  0<w<oo,  де D(s) - ХАРАКТЕРИСТИЧНИЙ ПОЛНОМ  замкнутої САУ. Якщо САУ стійка, годограф починається на додатній дійсній  напівосi  і  ПОСЛІ- ДОВНО  проходить,  ніде не обертаючись в нуль N квадрантів. (N - ступіньD(s))  в додатному  напрямку  (I НАВПАКИ...).
#
# Записуємо передаточну функцію замкненої САУ та виділяємо знаменник  K(s)
T1 = 0.3
T2 = 1
ζ = 0.1
Wzam(s) := Wraz(s)/(1 + Wraz(s))
K(s) := 1 + Wraz(s)
k3 = 3
k2 = -0.6
k1 = 8
# Підставляємо у загальний вираз для Wzam(s) вирази для відповідних передаточних функцій. Це можна зробити а) за допомогою символьного процесора, б) вручну. Комен- туємо те, що внизу. Символічний процесор видає потрібний вираз, але а) примусово підставляє числові значення змінних, які його мають; б) не завжди за допомогою доступ- них символічних операцій можна привести вираз до "красивого" виду.
Wraz(s)/(1 + Wraz(s)) → (3*s^2 - 0.6*s + 8)/(((3*s^2 - 0.6*s + 8)/((0.3*s + 1)*(0.2*s + s^2 + 1)) + 1)*(0.3*s + 1)*(0.2*s + s^2 + 1))
Wzam(s) == (40. - 3.*s + 5.*k3*s^2)/(5.*T2*s^3*T1 + 5.*T2*s^2 + 10.*T2*ζ*s^2*T1 + 10.*T2*ζ*s + 5.*T1*s + 45. - 3.*s + 5.*k3*s^2)
# В данному випадку легше написати вручну:
Wzam(s) := (k1 + k2*s + k3*s^2)/((T2*s^2 + 2*T2*ζ*s + 1)*(T1*s + 1) + (k1 + k2*s + k3*s^2))  # disabled
# Знаменник Wzam(s) -  це ж D(s), тобто ХАРАКТЕРИСТИЧНИЙ ПОЛІНОМ. Виділяємо його, виконуємо алгебраїчні перетворення і отримуємо:
(T2*s^2 + 2*T2*ζ*s + 1)*(T1*s + 1) + (k1 + k2*s + k3*s^2)
# Застосуваємо до цього виразу операцію Expand:
T2*s^3*T1 + T2*s^2 + 2*T2*ζ*s^2*T1 + 2*T2*ζ*s + T1*s + 1 + k1 + k2*s + k3*s^2
# Ставимо курсор на будь-яке s і застосувуємо операцію Collect:
T2*s^3*T1 + (k3 + T2 + 2*T2*ζ*T1)*s^2 + (T1 + 2*T2*ζ + k2)*s + 1 + k1
# Операціями редактування збираємо потрібний вираз для характеристичного рівняння:
D(s, k1) := T2*T1*s^3 + (T2 + 2*T1*T2*ζ + k3)*s^2 + (T1 + 2*T2*ζ + k2)*s + (1 + k1)
# Беремо уявну та  дійсну частини D(i*ω,k1):
im(k, k1) := Im(D(1i*ω[k], k1))
re(k, k1) := Re(D(1i*ω[k], k1))
l := -40 .. 40
k1 = 8
# Будуємо графіки - годографи Михайлова для тих же самих даних, що і в розділі 2 (критерій Найквиста). Знову бачимо - для k1 = 8 система нестійка (годограф іде через 1-4-3 квадранти); для k1 = 0.2 - стійка (годограф іде через 1-2-3 квадранти в додатному напрямі). Самостійно поставте стрілки - напрям зростання частоти на годографах.
# [plot: im(k, k1), 0, l vs re(k, k1), l, 0]
# [plot: im(k, .2), 0, l vs re(k, .2), l, 0]
# Вінницький державний технічний університет
# Кафедра комп'ютерних систем  управління
# @  Боровська Т.М., Северілов В.А.
# Теорія  автоматичного управлінння
# Контроль:
T1 = 0.3
T2 = 1
ζ = 0.1
k3 = 3
k2 = -0.6
k1 = 8
# 3.  КРИТЕРІЙ ГУРВИЦЯ
# Для перевірки САУ на стійкість за критерієм Гурвиця потрібно з  коефіцієнтів  харак- теристичного полінома D(s) = s^3 + a2*s^2 + a1*s + a0 побудувати визначники (детермі- нанти)  Гурвиця.  Якщо усі детермінанти будуть більше нуля, САУ СТІЙКА,  і  НАВПАКИ. Копіюємо зрозділу 2  ХАРАКТЕРИСТИЧНЕ РІВНЯННЯ ЗАМКНЕНОЇ  САУ:
D(s, k1) := T2*T1*s^3 + (T2 + 2*T1*T2*ζ + k3)*s^2 + (T1 + 2*T2*ζ + k2)*s + (1 + k1)
# Нагадаємо теорію - запишемо вирази для детермінантів Гурвиця в такому вигляді‚ як і в паперових підручниках. Введемо стандартні означення для коефіціентів полінома D(s):
a3(k1) := T2*T1
a2(k1) := (T2 + 2*T1*T2*ζ + k3)
a1(k1) := (T1 + 2*T2*ζ + k2)
a0(k1) := (1 + k1)
# Зауваження. Ми  робимо відповідні  об"єкти аналізу - частотні  характеристики, детермі- нанти, елементи детермінантів... функціями тих параметрів, вплив яких потрібно дослі- дити. В даному випадку для прикладу вибрано k1. Неважко замінити цей параметр на інший...
G1(k1) := a2(k1)
G2(k1) := [a2(k1), a0(k1); a3(k1), a1(k1)]
G3(k1) := [a2(k1), a0(k1), 0; a3(k1), a1(k1), 0; 0, a2(k1), a0(k1)]
# Необхідна і достатня умова стійкостіі: determinant(Gi(k1))>0,  i = 1..3 (в MathCAD детермінант означається так: |Gi(k1)| ) Обчислюємо детермінанти для тих же самих значень, що і в розділах 1 і 2. Майже очевидно, в якому випадку САУ нестійка.
k1 := 8
|G1(k1)| = 4.06
|G2(k1)| = -3.106
|G3(k1)| = -27.954
k1d := 0.2
|G1(k1d)| = 4.06
|G2(k1d)| = -0.766
|G3(k1d)| = -0.9192
# 4. БЕЗПОСЕРЕДНЄ ОБЧИСЛЕННЯ  КОРЕНІВ ХАРАКТЕРИСТИЧНОГО
# РІВНЯННЯ
# Маючи під рукою компютер, можна просто обчислити корені характеристичного рів- ня- ння D(s)=0. Згідно з теоремою Ляпунова про стійкість лінійних  систем необхідна i достат ня умова стійкості:  усі корені характеристичного рівняння мають бути "лівими".
T1 = 0.3
T2 = 1
ζ = 0.1
k3 = 3
k2 = -0.6
k1 = 8
# Копіюємо сюди, замість бігати наверх подивитись, характеристичне рівняння замкненої САУ:
D(s, k1) := T2*T1*s^3 + (T2 + 2*T1*T2*ζ + k3)*s^2 + (T1 + 2*T2*ζ + k2)*s + (1 + k1)
# Знаходимо для надійності і тренажу корені характеристичного рівняння двома альтер- нативними способами.
# 4.1 Використання функції root(). Вбудована функція  root(Р(х),х)  шукає значення найближ- чого до стартової точки кореня числовим методом. Щоб знайти усі три кореня можна зробити й так: задаємо початкове (старт) значення кореня: s = 1+1i  та.....
s := 1 + 1i
s1 := root(D(s, k1), s)
s2 := root(D(s, k1)/(s - s1), s)
s3 := root(D(s, k1)/((s - s1)*(s - s2)), s)
# Повторюємо це для k1 = 0.2 (беремо інші імена для коренів)
k1d = 0.2
r1 := root(D(s, k1d), s)
r2 := root(D(s, k1d)/(s - r1), s)
r3 := root(D(s, k1d)/((s - r1)*(s - r2)), s)
# Виводимо корені, пригадуємо що необхідна і достатня умова стійкості - усі корені повинні мати від"ємні дійсні частини - бути "лівими".  Бачимо, що дійсно....
# Для
# а для
k1 = 8
# маємо:
# маємо:
s1 = 0.0918705 + 1.47601i
s2 = 0.0918705 - 1.47601i
s3 = -13.7171
k1d = 0.2
r1 = 0.023119 + 0.542241i
r2 = 0.023119 - 0.542241i
r3 = -13.5796
# 4.2 Використання функції polyroots(). Зробимо теж саме за допомогою функції  polyroots(Вектор_коеф), функції якої зрозумілі з назви. Копіюємо сюди, замість бігати наверх подивитись, вирази для коефіціентів характеристичного рівняння замкненої САУ:
a3(k1) := T2*T1
a2(k1) := (T2 + 2*T1*T2*ζ + k3)
a1(k1) := (T1 + 2*T2*ζ + k2)
a0(k1) := (1 + k1)
# Формуємо вектор-функцію, що обчислює (=повертає) значення усіх коренів в залежності від значення параметра регулятора k1 - "штрафа за помилку координати".
vektkoef(k1) := [(1 + k1); (T1 + 2*T2*ζ + k2); (T2 + 2*T1*T2*ζ + k3); T2*T1]
ko(k1) := polyroots([(1 + k1); (T1 + 2*T2*ζ + k2); (T2 + 2*T1*T2*ζ + k3); T2*T1])
# Тепер ми можемо побудувати на комплескній площині змість якогось одного розпо- ділення коренів, що відповідає певному набору параметрів об"єкта, траекторії цих коренів при зміні певного параметра - КОРЕНЕВІ ГОДОГРАФИ, що є основою одного з колись  потужних методів аналізу і синтезу САУ. В докомп"ютерну еру навіть була запатентована логарифмічна лінія з кутоміром  для  перемноження векторів  (модулів) і складання  кутів (аргументів). Для користування годографом на ньому слід подати розбивку за значення- ми параметру.
# Задаємо диапазон зміни k1, (беремо для ранжованої змінної інше ім'я), будуємо..
# Самостійно поставте стрілки - напрям зростання k1 на годографах.
# [plot: Im(ko(kj)[1])*.3, Im(ko(kj)[2]), Im(ko(kj)[3]), 0, l vs Re(ko(kj)[1])*.3, Re(ko(kj)[2]), Re(ko(kj)[3]), l, 0]
kj := 0, 1 .. 30
# Прокоментуємо отримані результати. При малих k1 САУ апериодично нестійка - один корінь - правий.  При збільшенні k1 корені зближуються, система стає стійкою, корені стають кратними і після цього система стає клоливальною. Швидкодія САУ збільшуєть- ся, але одночасно  зменшується  загасання,  бо пара комплексних коренів підходить до уявної осі.  При певному критичному значенні k1крит  комплексні  корені  виходять у праву напівплощину - САУ стає коливально нестійкою. Очевидно, що k1крит = ?
# Контроль:
T1 = 0.3
T2 = 1
ζ = 0.1
k3 = 3
k2 = -0.6
k1 = 8
# 5.  ПЕРЕВІРКА СТІЙКОСТІ  ПО ПЕРЕХІДНИМ  ПРОЦЕСАМ
# Маючи під рукою компьютер можна просто розв'язати числовими методами  дифрів- ня- ння  САУ при відповідних початкових умовах, як це було зроблено в роботі  1.1,  i  дивитись чи сходиться  перехідний процес. Як вхідні дані використовуємо характерис- тичне рівняння замкненої САУ. Введемо такі означення:
d := 1/(T1*T2)
A3 := 1
A2(k1) := (T2 + 2*T1*T2*ζ + k3)*d
A1(k1) := (T1 + 2*T2*ζ + k2)*d
A0(k1) := (1 + k1)*d
# Характеристичне рівняння, як відомо - операторна форма запису дифрівняння  власно- го руху системи, тобто, характеристичному рівнянню:
D(s, k1) := A3*s^3 + A2(k1)*s^2 + A1(k1)*s + A0(k1)
# відповідає:
A3*d^3/dt^3(x) + A2*d^2/dt^2(x) + A1*d/dt(x) + A0
# Наприклад, згідно з варіантом, треба дослідити вплив на стійкість параметра k1. Тому робимо відповідні вирази функціями цього параметра. Задаємо крок обчислень Т та кількість кроків k  і робимо ВСЕ згідно з  методикою лабораторної  роботи №1. Виво- димо задане значення k1 і тут же рядом підбираємо мінімальне і максимальне значення, за яких САУ втрачає стійкість.
k1 = 8
T := .25
k := 1 .. 60
ORIGIN := 1
k11 := -1.1
k12 := 0.2
k13 := 7
x1[:, 1] := [-1; 0; 0]
x2[:, 1] := x1[:, 1]
x3[:, 1] := x1[:, 1]
A(k1) := [0, 1, 0; 0, 0, 1; -A0(k1), -A1(k1), -A2(k1)]
I := [1, 0, 0; 0, 1, 0; 0, 0, 1]
S2(k3) := I + A(k3)*T + (A(k3)*T)^2/2
x1[:, k + 1] := S2(-1.1)*x1[:, k]
x2[:, k + 1] := S2(.2)*x2[:, k]
x3[:, k + 1] := S2(7)*x3[:, k]
# [plot: x1[1, k], x2[1, k], x3[1, k] vs k]
# Будуємо три графіка перехідних  процесів -
# для  к1=-1.1 - малого -  x1
# к1=0.2 -заданого - x2
# і  к1=7  - великого -  x3
# значень параметра
# Характер змін перехідного процеса добре видно з графіка.
# Висновки. Проведено комплексне дослідження стійкості САУ.  Розроблено документ, що дозволяє при мінімальних модифікаціях вести дослідження цілого класу систем автоматичного управління.(Визначимо цей клас, як...).
# Працювали: Красноштан В., Білоручка С., Чорноніжко А.
#
# Контрольні запитання
# 1. Визначення поняття стійкості по Ляпунову.
# 2. Необхідна і достатня умови стійкості ЛДС.
# 3. Формулювання критерія Найквиста.
# 4. Формулювання критерія Михайлова.
# 5. Формулювання критерія Гурвиця.
# 6. Як можна знайти корені лінійного алгебраічного рівняння N-ступеню.
# 7. Що таке "характеристичне рівняння"?
# 8. Що таке "кореневий годограф", як можна по кореневому годографу визначити  нестійкість САУ?
# 9. Що таке "запас стійкості по фазі", "запас стійкості по амплітуді"
#
# Факультатив для ОАА (1б)
# Матеріал факультативний, для вивчення за власним бажанням.
#
# 6. Визначення стійкості по АЧХ та ФЧХ
# Побудуємо амплітудну (АЧХ) та фазову (ФЧХ) частотні характеристики спираючись на  (Конспект лекцій8HH), (Лаб.роботи Т121,Т1228HH). Копіюємо сюди, замість бігати наверх подивитись, передаточну функцію розімкненої системи Wraz(.), підставляємо s =i*ω, беремо модуль та аргумент від неї - це і будуть АЧХ та ФЧХ:
Wraz(s, k1, k2, k3) := Wob(s)*Wpr(s)*Wreg(s, k1, k2, k3)
Av(ω, k1) := |Wraz(1i*ω, k1, k2, k3)|
Fv(ω, k1) := arg(Wraz(1i*ω, k1, k2, k3))
ω := 0.01, .11 .. 6
Fk(ω, k1) := if(ω < 1.32, Fv(ω, k1) + 2*π, Fv(ω, k1))
# Коректуємо фірмовий прокол у ФЧХ . Будуємо графіки АЧХ і ФЧХ.
Fq(ω, k1) := if(ω < .4, Fv(ω, k1) + 2*π, Fv(ω, k1))
# [plot: Av(ω, k1), Av(ω, k1d), Fk(ω, k1), Fq(ω, k1d), 1, -π vs ω]
# На цьому графіку подано дві пари АЧХ-ФЧХ для наскрізних прикладів стійкої, нестій- кої САУ. Запаси стійкості по амплітуді і фазі можна визначити аналітично, але це інша робота (робота 2.3). Для тренажу і кращого зрозуміння визначимо  запаси стійкості по фазі та амплитуді графічним методом. Для цього скопіюємо попередній графік і змінимо масштаби на ньому так, щоб виділити зони, де амплитудна характеристика переходить через  Av(ω)=1 (частота на якій це має місце - частота зрізу) а фазова характеристика - через -π (сигнал на виході розімкненої САР буде точно у протифазі до вхідного).  Далі подано два таких графіка для визначення окремо запасу по фазі і запасу по амлитуді. Робимо це так: а) ωa змінюємо  так, щоб маркер-вертикаль пройшов через точку АЧХ=1, потім змінює- мо zF так, щоб маркер-горизонталь пройшов через точку перетину ФЧХ з маркером-вертикаллю. б) ωF змінюємо так, щоб маркер-вертикаль пройшов через точку ФЧХ=-π, потім зміню- ємо zА так, щоб маркер-горизонталь пройшов через точку пере- тину АЧХ з маркером- вертикаллю. Нижче подано результати реалізації цих процедур.
ωA := 4.41
zF := 1.001
sd := 1.83  # - допоміжна змінна, для суміщення графіків.
# [plot: Av(ω, k1d), 1, Fq(ω, k1d) + sd, -π + sd vs ω]
ЗапасФази := -sd + zF + π
ЗапасФази = 2.31259 rad
ЗапасФази = 132.502 deg
ωF := 0.431
zA := 0.402
sd := 2.5
# [plot: Av(ω, k1d), 1, Fq(ω, k1d) + sd, -π + sd vs ω]
ЗапасАмпл := 1 - zA
ЗапасАмпл = 0.598
ЗапасАмпл = 59.8*1%
# Фазова характеристика не стає меншою -π, тому цей графік залишається без ужитку
# Підводимо підсумки - ще раз впевнились, що при к1=0.2 стійка. Подаємо сумісно визна- чення запасів  стійкості по амплитуді та фазі і копію графіка АФЧХ з розділу 1, порівнюємо
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# [plot: уяв(k, .2), l, 0 vs дій(k, .2), 0, l, -1]
# Найголовніший висновок - виконання задачі паралельно декількома різними, що не мають спільних джерел помилок, способами дає справжнє розуміння задачі.
