# footer: © БС
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# Стійкість - Запізнення = ?
# 3.3 Дослідження стійкості САУ
# Стійкість САУ із запізненням
# Рис.1 Схема системи
# Вступ
# Ціль №1 даної роботи - набуття навичок у аналізі стійкості систем із запізненням. Ціль №2 - освоєння сучасних засобів і технологій автоматизації праці інженера. Сьогодні спе- ціаліст, коли йому треба розв'язати якусь задачу, знаходить або розробляє зручну диало- гову програму для розв'язання цілого класу задач.  От  тому,  ціль  № 3  даної роботи - розробка саме  зручної диалогової програми для аналізу стійкості систем із запізненням. . Але, чи актуальна  ця тема для народного господарства, взагалі, і для кожного з нас, зокрема? Розглянемо відповідний актуальний приклад.
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# Давні ящери мали довжину до 25 мет- рів, а швидкість передачі нервових імпуль- сів - як і в нас - 5 м/сек. Відомості про пев- ні події доходили центра управління (голо- ви) із запізненням 5-10 сек.  Тому у цих ящерів сформувався додатковий мозок (у відповідному місці) - для оперативного управління задньою частиною тіла. Як відомо - не допомогло це їм вижити.
# M1 | M2
# Запiзнення  в  САУ виникає при передачі сигналів по каналам зв'язку в розподілених системах управління. при транспортуванні матерiалiв конвеєрами, енергії та тепла трубо- проводами, руротягами, при обробці даних в ЦОМ,  у виробництві (реактори, техноло- гічні установки..) і в багатьох інших випадках. Запiзнення  змiнює поведiнку динамічної системи - спричиняє до коливань i, навiть, до втрати стійкості. У цій роботі аналiз стiй- костi систем із запiзненням виконується за допомогою критерію стійкості Найквиста.  Нагадуємо, що цей критерій відноситься до групи частотних і використовує характе- ристику, яку легко отримати експериментально або аналітично - амплитудно-фазову частотну характеристику (АФЧХ) розімкненої САУ.
# Рівняння елемента запізнення має вигляд:  Хвих(t) == Хвих(t - Tz)
# Передаточна функція елемента запізнення буде:  Wzap(s) == 1*e^(-Tz*s)  (ось чому: Wzap(j*ω) == A(ω)*e^(ϕ(ω)*j) == 1*e^(-Tz*ω*j), тому АЧХелемента запізнення  A(ω) == 1; а ФЧХ  ϕ(ω) == -Tz*ω. Задано структурну схему САУ та передаточні функції її елементів:
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# На цій структурній схемі елемент запізнення розташований  після  регулятора. Це можна інтерпретувати, і як запізнення управління  і як запізнення в об'єкті... Виникає питання: Чи залежать частотні характеристики та стійкість лінійної САУ від положення елемента управління? В лінійних системах  - не залежать.
# Завданння
# 1. Побудувати для заданого варіанта графіки АФЧХ  та ЛЧХ системи із запізненням.  8 б
# 2. Визначити граничне запізнення і запаси стійкості альтернативними методами  14 б
# 3. Побудувати серії АФЧХ та перехідних процесів для ряду запізнень  20 б
# 4. Запропонувати методи компенсації впливу запізнень  20-70 б
#
# Варіанти параметрів передаточних функцій
# a0, a1, a2 -  параметри об'єкта управління.
# k1, k2, k3  - параметри регулятора
# Тz - сумарне запізнення в різнизх ланках системи.
a1 := 2
a2 := 2
k1 := 3
vd := [
    "Варіант:", 1, 2, 3, 4, 5, 6, 7, 8, 9, 10, 11, 12, 13;
    "Tz", 1, -2, 1, 1, 0, -1, 1, -3, 2, 0, 0, 2, 1;
    "a1", 1, 2, 3, 2, 2, 2, 2, 2, 2, 0, 0, -1, 4;
    "a2", 1, -2, 3, 2, 2, 2, 3, 1, 2, 3, 2, 1, 1;
    "k1", 2, 3, 0, 3, 3, 2, 3, 2, 1, 3, 2, 3, 2;
    "k2", 1, 2, 0, 4, 1, 2, 3, 4, 5, 6, 7, 8, 1;
    "k3", 2, 3, 2, 4, 3, 1, 5, 2, 2, 3, 3, 4, 4
]
k2 := 4
k3 := 4
# Параметри  a0 := 1 та  kob := 1- ОДНАКОВІ ДЛЯ УСІХ ВАРІАНТІВ
# Реєстрація. Введіть (в лапках, замість зразка) своє прізвище. Прb := "Кулик М.С."
Повідомлення :=
    if Прb == "Шерстюк В.О."
        "Прізвище не ВВЕДЕНО - не буде заліку "
    else
        concat("Ваше прізвище ", Прb, "? Ви впевнені? ")
Повідомлення = "Ваше прізвище Кулик М.С.? Ви впевнені? "
# Методичні вказівки до виконання роботи
# 1. Побудова АФЧХ
# Дивимось на структурну схему і записуємо вирази для передаточних функцій елементів САУ:  регулятора:  об"єкта:  та  запізнення:
Wreg(s) := k3*s^2 + k2*s + k1
Wzap(s) := e^(-Tz*s)
Wob(s) := kob/(s^3 + a2*s^2 + a1*s + a0)
# Отримаємо спочатку характеристики  САУ без запізнення. Вони будуть для нас базовими, еталонними.  Вплив запізнення ми будемо оцінювати порівнянням  характеристик  САУ із запізненням з цими еталонними.
# Передаточна функція розімкненої САУ без запізнення: Wроз(s) := Wreg(s)*Wob(s)
Wроз(s) → (4*s^2 + 4*s + 3)/(s^3 + 2*s^2 + 2*s + 1)
(1)
# Передаточна функція розімкненої САУ із запізненням: Wрзz(s) := Wreg(s)*Wob(s)*Wzap(s)
Wрзz(s) → e^(-s)*(4*s^2 + 4*s + 3)/(s^3 + 2*s^2 + 2*s + 1)
(2)
# Для аналізу стійкості по критерію Найквіста  треба побудувати  годограф  функції  Wроз(j*ω). Це можна зробити двома способами:
# Альтернатива 1.  Залежність уявної  Im(Wроз(j*ω)) від дійсної  частини Re(Wроз(j*ω)) - графік в декартових координатах), або
# Альтернатива 2.  Залежність - модуля: |Wроз(j*ω)|  (це ж АЧХ)  від аргументу arg(Wроз(j*ω)  (це ж ФЧХ) - графік в полярних  координатах.
# Вводимо згідно варіанту значення параметрів об"єкту:
# a2 = 2;  a1 = 2 ;  a0 := 1;  kob := 1;  параметрів регулятора: k3 = 4 ; k2 = 4 ; k1 := 6  і запізнення (рітуально, бо дійсний ввод далі, на стенді)  Tz = 1 .
# Тепер коли задано числові значення, записуємо вирази для передаточних функцій (1) і (2), що були отримані за допомогою символьного процесора. Нагадуємо, що ми пишемо програми, програмуємо у мові сі , але непрямо. За словом "записуємо" стоїть визначення функції користувача, фактично -  підпрограми.  Передаточна функція розімкненої САУ без запізнення:
(3)
Wроз(s) := kob*(k3*s^2 + k2*s + k1)/(s^3 + a2*s^2 + a1*s + a0)
j := sqrt(-1)
# Передаточна функція розімкненої САУ із запізненням:
(4)
Wрзz(s) := kob*(k3*s^2 + k2*s + k1)*e^(-Tz*s)/(s^3 + a2*s^2 + a1*s + a0)
Wрзz(s) == Wроз(s)*e^(-Tz*s)
# Записуємо уявні і дійсні частини відповідних передаточних функцій. Тут ми викори- стовуємо вбудовані функції пакету. Наші функції введено в методичних цілях і для скорочення відповідних виразів.  Без запізнення:  З запізненням:
I(ω) := Im(Wроз(j*ω))
Iz(ω, Tz) := Im(Wроз(j*ω)*e^(j*ω*Tz))
R(ω) := Re(Wроз(j*ω))
Rz(ω, Tz) := Re(Wроз(j*ω)*e^(-j*ω*Tz))
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# Контроль результатів. А тепер визначаємо для контролю уявні і дійсні частини альтернативними способами. Не довіряйте! Не тільки собі, іншим - теж. І в пакетах теж можуть бути помилки і "особливості"...
# Амплітудна  і  фазова  частотні характеристики САУ без запізнення
A(ω) := |Wроз(j*ω)|
ϕ(ω) := arg(Wроз(j*ω))
# Перша альтернатива. Використовуємо "модуль добутку комплексних чисел дорівнює добутку модулів множників , аргумент добутку - сумі аргументів множників", тобто:
A1*e^(j*f1)*A2*e^(j*f2) simplify → A1*A2*e^(f1*1i)*e^(f2*1i)
# Для нашого
# випадку маємо
W1роз(j, ω) := A(ω)*e^(j*ϕ(ω))
W1рзz(j, ω) := A(ω)*e^(j*(ϕ(ω) - ω*Tz))
# Враховуємо:
a*e^(j*w) == a*cos(w) + a*j*sin(w)
# Отримуємо:
I1z(ω, Tz) := A(ω)*sin(ϕ(ω) - ω*Tz)
R1z(ω, Tz) := A(ω)*cos(ϕ(ω) - ω*Tz)
# Друга альтернатива. Вираз  Wрзz(j*ω) == Wроз(j*ω)*e^(-Tz*j*ω)  можна подати як добуток комплексних чисел:  (a + b*j)*(c + d*j) expand → a*c - b*d + b*c*1i + a*d*1i . Використовуємо символьний процесор:  a*c + i*a*d + i*b*c - b*d collect, i → (a*d + b*c)*i + a*c - b*d . Отримуємо:
I2z(ω, tz) := -R(ω)*sin(ω*tz) + I(ω)*cos(ω*tz)
R2z(ω, tz) := R(ω)*cos(ω*tz) + I(ω)*sin(ω*tz)
Результат_пошуку_помилки :=
    d1 ← |Iz(1, .2) - I1z(1, .2)| + |Rz(1, .2) - R1z(1, .2)|
    d2 ← |Iz(1, .2) - I2z(1, .2)| + |Rz(1, .2) - R2z(1, .2)|
    d3 ← |I1z(1, .2) - I2z(1, .2)| + |R1z(1, .2) - R2z(1, .2)|
    is ← |Iz(1, .2) + I1z(1, .2) + I2z(1, .2)|
    rs ← |Rz(1, .2) + R1z(1, .2) + R2z(1, .2)|
    remiz ← (d1 + d2 + d3)/(is + rs)
    Резю ← concat("Студ. ", Прb, " завдання викона(в/ла)")
    fig ←
        if (remiz < 0.02) and Прb ≠ "Шерстюк В.О."
            Резю
        else
            Резю
    fig
# Перевіряємо, дивимося чи співпадають результати? Багатоверсійні обчислення не є рітуалом - завдяки цьому контролю знайдено загублений мінус у базовому виразі.
# Контроль №1 - для вас. Знайдіть і виправте помилку у виразах.
Iz(1, .2) = -2.74153
Rz(1, .2) = 0.384059
I1z(1, .2) = -3.13887
I2z(1, .2) = -3.13887
R1z(1, .2) = 0.384059
R2z(1, 0.2) = 0.384059
Повідомлення = "Ваше прізвище Кулик М.С.? Ви впевнені? "
Результат_пошуку_помилки = "Студ. Кулик М.С. завдання викона(в/ла)"
# Побудуємо графіки АФЧХ системи із запізненням. Вводимо послідовно: допоміжні змінні для побудови одиничного кола,  диапазон частот і,  головне, - запізнення
y(ω) := sin(ω)
x(ω) := cos(ω)
ω := 0, .02 .. 30
ORIGIN := 1
Tz ≡ 1
# Записуємо робочі формули для частотних характеристик A(ω), F(ω).
Прb := "Гуска К.Р."
A(ω) := |Wроз(1i*ω)|
Az(ω) := A(ω)
Az(ω) := |Wraz(i*ω)*exp(-i*ω*tz)|  # disabled  # (5)
F(ω) := arg(Wроз(1i*ω))
Fz(ω, Tz) := F(ω) - Tz*ω
Fz(ω) := arg(Wraz(i*ω)*exp(-i*ω*tz))  # disabled
# [plot: I2z(ω, Tz), 0, y(ω) vs Rz(ω, Tz), -1, x(ω)]
# [plot: I2z(ω, Tz), 0, y(ω) vs Rz(ω, Tz), -1, x(ω)]
# Контроль №2 - для вас. Побудуйте на цих графіках також частотні характеристики без запізнення - для попереднього порівняльного аналізу.
# [polar plot: Fz(ω, Tz), Az(ω)]
# [polar plot: Fz(ω, Tz), 3.14, Az(ω), 1]
# Альтернативна форма побудови графіків - у полярних координатах. На цих графіках побудовано теж саме, що вище.  Контроль №3 - для вас. Побудуйте на цих графіках маркери: mark1 := 33;  mark2 := 3.14, що проходять через точки АФЧХ, де F(ω) = -180^о ,  A(ω) = 1
# 2б. Визначення запасів стійкості по амплітуді і фазі
# Спочатку,  для кращого освоєння та осмислення визначимо запаси стійкості  пошуковим методом (=вручну), а потім - як результат роз'язання певних рівнянь
ω1 := 2.25
ω2 := 4
зпФ := -2.9
зпА := 0.51
q := -10, -9.8 .. 5
Tz = 1
запасФ := -(-π - зпФ)
запасА := 1 - зпА
запасФ = 0.241593
запасА = 0.49
# [plot: Az(ω), q, Fz(ω, Tz), зпФ, -π vs ω, ω1, ω2]
# [plot: Az(ω), q vs ω, ω1, ω2]
# Контроль №4 - для вас. У вашому розпорядженнні чотири параметри - ω1, ω2, зпФ, зпА. Що це, як роз- шифровуються назви  цих змінних - ви повинні знати. Тут же (вище) виводяться запас стійкості по Фазі і запас стійкості по Амплітуді.
# Ваша задача  - змінювати поло- ження вертикальних і горизонт- альних прямих (маркерів) так, щоб вони пройшли через певні характ- ерні точки.( Зелену -на одиницю АЧХ, червону -на останнє -π ФЧХ)  По координатам цих точок обчислюються  запаси стійкості. Їх треба визначити з максимальною точністю. Як це зробити - змінити масштаби на графіках та ін...- Ваші проблеми.
# Там, далі вам буде виставлена оцінка за це завдання.
# [plot: Fz(ω, Tz), q vs ω, ω1, ω2]
# Увага  - там, праворуч, за полями АЧХ ФЧХ подані на окремих графіках
# 2а. Визначення максимального запізнення
# Типовою задачею аналізу систем автоматичного управління є  визначення гранич- ного, тобто максимального запізнення, при якому система ще стійка (знаходиться на гра- ниці стійкості). Для систем невисокого порядку максимальне запізнення можна визна- чити у виді аналітичних виразів - формул,  для складніших систем можна  знайти його числовими методами. Для будь яких систем, які можна моделювати на ЦОМ, максима- льне запізнення можна визначити експериментально (обчислювальним експеримен- том).
# Контроль №5 - для вас. У вашому розпорядженнні один параметр - tzm - максима- льне запізнення.  Ваша задача  - підібрати значення цієї змінної так , щоб АФЧХ  прохо- дила через певну точку (що це за точка і чому через цю точку - ви повинні знати = дивись критерій Найквіста). Значення  tzm треба знайти з максимальною точністю.  Там, далі вам буде виставлена оцінка за це завдання.  tzm := .44  Tz = 1
# [plot: I(ω), I2z(ω, tzm), y(ω), 0 vs R(ω), Rz(ω, tzm), x(ω), -1]
# [plot: I(ω), I2z(ω, tzm), y(ω), 0 vs R(ω), Rz(ω, tzm), x(ω), -1]
# Проаналізуємо те, що отримали. Якщо запізнення має розкид, або відоме з певним допуском, то  розкид, або допуск повинні не перевищувати  (tzm - Tz)/Tz = -56*1%  - інакше система стає нестійкою.
# 2в. Визначення максимального запізнення числовим методом
# Подивимось на графіки вгорі, згадаємо вивод і формулювання критерія Найквіста і за- пишемо умови, що виконуються для граничної точки. Словесно це: 1) "уявна складова на критичній частоті і при критичному запізненні дорівнює нулю"; 2) "дійсна складова дорів- нює -1. Для розв'язання  цієї системи рівнянь використовуємо вбудовану функцію розв'язання систем алгебраїчних рівнянь.
# Зауваження. Наша система рівняннь має декілька розв'язань. Треба  задати початкові значення змінних поближче до розв"язань. Оці значення можна знайти на відповідних графіках  (де саме?).  Вводимо початкові значення: tZ := 0.4; w := 3
# Дано:  система рівнянь  Given  I2z(w, tZ) == 0 ;  Rz(w, tZ) == -1
# Що шукаємо:  [ω1s; T1z] := Find(w, tZ) .  Відповідь:  [ω1s; T1z] = [2.17641; 0.442682]  (5)
# Контроль №6 - для вас. Далі подано ще дві альтернативи знаходження максимального запізнення (закрито паролем). Напишіть самостійно ці модулі виходячи з словесних описів рівнянь.
# Контроль. Подаємо альтернативне розв'язання на базі іншої системи рівнянь. Записуємо умови для координат тієї ж точки, але в полярних координатах. Ось словесне формулювання: 1) модуль дорівнює одиниці; 2) фаза дорівнює -π.
# (закрито)
# Пароль- "нема його"
# Записуємо розв'язуючий блок  Given  A(w) == 1 ;  Fz(w, tZ) == -π
# Що шукаємо:  [ω2s; T2z] := Find(w, tZ)  ;  Відповідь:  [ω2s; T2z] = [2.17641; 0.442682]  (6)
w1 := 1
clear_sym(w1)
# Контроль. Подаємо ще одне альтернативне розв'язання на базі вбудованої функції пакету root(вираз(х),х)  для знаходження нульового кореня рівняння: вираз(х) = 0.
# Спочатку знаходимо частоту ω1r, на якій  АЧХ дорівнює 1 (АЧХ не залежить від запізнення). Потім  записуємо вираз для ФЧХ системи із запізненням (5)  Fz(ω, Tz) == F(ω) - Tz*ω, під- ставляємо туди знайдену частоту ω1r і визначаємо запізнення T2z, при якому ФЧХ  дорівнює -π.  Можна знайти явний вираз, отак:  Ff(w1) - T2z*w1 == -π solve, T2z → (π + Ff(w1))/w1  але зробіть це за допомогою функцій root(.)
ω1s := 2.176
T1z := 0.443
# ( Рівняння закрито).
# Пароль- "нема його"
ω3s := root(A(ω1) - 1, ω1)
T3z := root(F(ω3s) - Tz*ω3s + π, Tz)  # Отут наберіть свою версію цього модуля.
# Тепер виводимо результати отримані альтернативними методами. Співдає? - ОК
ω1s = 2.176
ω2s = 2.17641
ω3s = 3.72499
T1z = 0.443
T2z = 0.442682
T3z = 0.489214
ω1 = 2.25  # Ü  Оце знайдено вами  ⇒
tzm = 0.44
# Визначаємо частоту, на якій ФЧХ дорівнює -π:  і порівнюємо з тим, що визначено пошу-
# ком - по графікам  ω2r := root(Fz(ω1, Tz) + π, ω1)  ω2r = 1.94986  ω2 = 4
# Визначаємо запаси стійкості по частоті і амплітуді і порівнюємо з тим, що визначено пошуком
zpF := π + Fz(ω1s, Tz)
zpF = -0.239033
запасФ = 0.241593
zpA := 1 - A(ω2r)
zpA = -0.613157
запасА = 0.49
# Запитання. Звідки взялись ці формули? Подивіться на графіки на 5-ій сторінці. Очевид- но, що Запас по фазі - це скільки ще остається до зсуву по фазі у -π, коли АЧХ = 1.
# Запас по амплітуді - це скільки ще остається АЧХ  до 1, коли ФЧХ = -π.
Оцінка_за_настроєння := 10
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Результат_пошуку_помилки = "Студ. Кулик М.С. завдання викона(в/ла)"
# Тут оцінюються: пошук помилки в документі, точ- ність знаходженння значень  ω1, tzm, ω2, запасФ,  запасА.
# Оцінка за програмні модулі - окремо.
Оцінка_за_настроєння = 10  # балів
# Можна набрати додаткові бали виконанням факультативних завдань
# (після контрольних запитань).
# Контрольні запитання
# 1. Визначення поняття стійкості по Ляпунову.
# 2. Необхідна і достатня умови стійкості лінійних динамічних систем.
# 3. Формулювання критерія Найквиста.
# 4. Намалюйте, не роздумуючи, АЧХ та ФЧХ елемента запізнення
# 5. Визначення запасів стійкості по фазі, по амплітуді.
# 7. Що таке "граничне запізнення" і як його визначити?
# 8. Намалюйте, не роздумуючи, АФЧХ системи з граничним запізненням
# 9. Намалюйте на АФЧХ запаси стійкості по фазі і амплітуді.
# 10. Намалюйте на АЧХ та ФЧХ запаси стійкості по фазі і амплітуді.
# 11. Наведіть приклади з практики, де має місце запізнення.
# Факультатив
# 3. Побудова серій АФЧХ та перехідних процесів для ряду запізнень
# Робочі програми закриті**, подано результати їх роботи. Це для вас технічні завдання на розробку своїх версій
tz := .6
h := 1 .. 4
f := 0, .2 .. 2
Ts[h] := .15*h
k := 1 .. 150
ff[k] := -.05 + .03*k
sh(ω) := [0; R(ω); Rz(ω, tz); 0]
g(ω) := [0; I(ω); I2z(ω, tz); 0]
gg[h, k] := I2z(ff[k], Ts[h])
hh[h, k] := Rz(ff[k], Ts[h])
# [plot: I(ω), I2z(ω, tz), g(f)[h], 0 vs R(ω), Rz(ω, tz), sh(f)[h], -1]
# [plot: I(ω), I2z(ω, tz), gg[h, k], 0 vs R(ω), Rz(ω, tz), hh[h, k], -1]
# Не дивлячись на зразки, розробіть програми  для побудови отаких серій графіків
# Додаток - генератор варіантів - додати перехідні процеси на стендах
# контрольні запитання.
# остаточна оцінка роботи
P3(a0, a1, a2, N, T) ≡
    M ← [1, 0, 0; 0, 1, 0; 0, 0, 1] + [0, 1, 0; 0, 0, 1; -a0, -a1, -a2]*T
    X[:, 1] ← [-1; 0; 0]
    for k ∈ 1 .. N
        X[:, k + 1] ← M*X[:, k]
        sto ← 100
    X
q ≡ 1 .. 100
# [plot: P3(1, 2, 2, 30, .5)[1, q], P3(1, 1, 2, 30, .3)[1, q], P3(1, 2, 2, 30, .2)[1, q] vs q*2.5, q*1.5, q]
