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# 4.1 Оцінка якості регулювання
# по перехідним процесам. Альтернативи
# Вступ
# Оцінка якості регулювання системою автоматичного управління (САУ) по перехід- ним процесам - один  із  елементів оцінки САУ  при виборі кращого варіанту з множини  альтернатив. Під перехідним процесом у даному розділі  маємо на увазі реакцію САУ на  ступінчастий вхідний сигнал. Оцінка якості  САУ  залежить від вимог до системи,  що залежать від  ії призначення. Ці вимоги можуть бути подані у вигляді ідеальної або етало- нної САУ. Вимоги  до САУ можуть бути задані у вигляді критеріїв оптимальності, які бажано максимізувати чи мінімізувати. Часто критерії є функціями таких параметрів перехідного процеса (ПП)
# - тривалости  ПП (=САУ, оптимальні по швидкодії);
# - перегулювання,  швидкостей, прискорень..(=САУ, оптимальні по перенавантаженням, що діють на об'єкт);
# - похибки в усталеному стані (= САУ, астатичні,  інваріантні до різних обурень);
# - інтегральних квадратичних помилок (=САУ, оптимальні для захисту дисертацій).
# Для лінійних  САУ, при певних критеріях можна  отримати  аналітичні розв'язання  у вигляді потрібних значень коефіціентів характеристичного рівняння замкненої САУ. На цьому базуються методи модального управління, зокрема, метод  стандартних  ко- ефіцієнтів. Типові критерії відображують якийсь один аспект вимог до САУ.
# В даному документі  виконується дещо абсурдистська задача порівняння різних кри- теріїв оптимальності, і вибір "оптимального критерію оптимальності". Але такі ситуації часто зустрічаються у житті. Наприклад, на чемпіонатах з гімнастики спочатку судді су- дять спортсменів, потім комісія судить суддів - наскільки об"єктивно кожен з них розста- вив спортсменів по сходинкам (до слави).
# Розглядаємо чотири альтернативи САУ:
# - САУ з мінімальними прискореннями в ПП і мінімальним перерегулюванням;
# - САУ з розподіленням Баттерворта, що для усіх мод має однакові власні частоти;
# - САУ оптимальна за квадратичним інтегральним критерієм;
# - САУ оптимальна за інтегральним зваженим критерієм.
# На практиці САУ оцінюють за такими показниками-критеріями:
# тривалість перехідного процеса  - Тр
# викид (максимальне перерегулювання)  - hm
# максимальне прискорення  - um
# інтегральна квадратична похибка  - Iqv
# інтегральна (від модуля) зважена помилка  - Imz
# стійкість перехідного процесу до варіацій параметрів САУ  - Grb
# Обчислимо для кожного варіанта САУ значення усіх критеріїв і проведемо порівняльний аналіз і вибір. Спочатку отримаємо еквівалентну дискретну математичну модель САУ, що задана дифрівнянням третього порядку.
# Вінницький Державний Технічний Університет
# Кафедра комп'ютерних систем  управління
# @  Боровська Т.М., Северілов В.А.  Теорія автоматичного управління
# 1. Отримання базової математичної моделі САУ
# Розглядаємо САУ у безрозмірній формі Вишнєградського. В цій формі і перший і оста- нній коефіцієнти дифрівнянь - одиничні.
ORIGIN := 1
# Записуємо задане дифрівняння САУ  d^3/dt^3(x) + a2*d^2/dt^2(x) + a1*d/dt(x) + a0*x == 0.
# Записуємо початкові значення параметрів САУ: a2 := 3;  a1 := 3;  a0 := 1; і значення кроку квантування  T := 0.2. Подаємо модель САУ у формі Коші, для чого  вводимо нові змінні - x1 = x,  x2 = dx/dt, x3=d^2x/dt^2 ,  що утворюють вектор стану x={x1,x2,x3} . Тоді рівняння можно подати у матрично-векторній формі  - dx/dt = A*x ,  де  A(a2, a1, a0) := [0, 1, 0; 0, 0, 1; -a0, -a1, -a2] ;  I := [1, 0, 0; 0, 1, 0; 0, 0, 1] .  Записуємо наближення перехідної функції стану 1-го і 2-го порядків ( для оцінки точності).
F1(a2, a1, a0, T) := I + A(a2, a1, a0)*T
F2(a2, a1, a0, T) := I + A(a2, a1, a0)*T + A(a2, a1, a0)^2*T^2/2!
# Виводимо для контролю матриці перехідних функцій, порівнюємо...
F1(a2, a1, a0, T) = [1, 0.2, 0; 0, 1, 0.2; -0.2, -0.6, 0.4]
F2(a2, a1, a0, T) = [1, 0.2, 0.02; -0.02, 0.94, 0.14; -0.14, -0.44, 0.52]
# Перехідна функція звязує значення векторів стану для двох моментів часу - наприклад  t  i  t + T. Далі записані рівняння для обчислення перехідних процесів альтернативних варіантів САУ. Ці рівняння відрізняються парамерами а2, а1, а0 - "стандартними коефіці- єнтами". Значення стандартних коефіціентів взято з літератури [1-5]. Задаємо початкові умови для всіх варіантів, крок обчислень, період моделювання.
Period := 10
N := Period/T
x1[:, 1] := [-1; 0; 0]
x2[:, 1] := [-1; 0; 0]
x3[:, 1] := [-1; 0; 0]
x4[:, 1] := [-1; 0; 0]
T := .25
h := 1 .. N
N = 50
# Записуємом рівняння чотирьох процесів:
# 1) з кратними коренями (мінімальний (нульовий) викид, мінімальні прискорення в ПП;
# 2) з розподіленням Баттерворта, що дає процес з рівними власними частотами;
# 3) з розподіленням, оптимальним  за критерієм  J1 == integral(x(t)^2, t = 0 .. Tk) ;
# 4)  з розподіленням, оптимальним за критерієм  J2 == integral(|x(t)|*t, t = 0 .. Tk) .
# В цих інтегральних критеріях х(t) - поточна помилка в ПП.
ORIGIN := 1
x1[:, h + 1] := F2(3, 3, 1, T)*x1[:, h]
x3[:, h + 1] := F2(1, 2, 1, T)*x3[:, h]
x4[:, h + 1] := F2(1.75, 2.15, 1, T)*x4[:, h]
x2[:, h + 1] := F2(2, 2, 1, T)*x2[:, h]
# 2. Обчислення показників якості перехідного процесу
# Конструюємо вираз (алгоритм) для обчислення тривалості перехідного процесу  - Трр. Виходимо з визначення цього поняття, і можливостей пакету - використовуємо функції if(...) та  max(...). Можливі інші альтернативи.
z := 40
k := N, N - 1 .. 8
Tpp[k] := if(|x1[1, k]| > .05, k*T, 0)
Tp1 := max(Tpp)
Tp1 = 6.5
Tpp[k] := if(|x2[1, k]| > .05, k*T, 0)
Tp2 := max(Tpp)
Tp2 = 6
q := -1, -.9 .. 1
Tpp[k] := if(|x3[1, k]| > .05, k*T, 0)
Tp3 := max(Tpp)
Tp3 = 8.75
Tpp[k] := if(|x4[1, k]| > .05, k*T, 0)
Tp4 := max(Tpp)
Tp4 = 3.75
# Будуємо графіки ПП, наносимо на них також зону +5% ,  -5%  і вертикалі, що відповідають закінченню ПП для відповідного варіанта. (обчислення kp - за полями)
# [plot: кn1, кп2, кп3, кп4, x1[1, h], x2[1, h], x3[1, h], x4[1, h] vs Tp1, Tp2, Tp3, Tp4, h*T]
round(Tp1/T) = 26
кп1 := x1[1, round(Tp1/T)]
кп2 := x2[1, round(Tp2/T)]
кп3 := x3[1, round(Tp3/T)]
кп4 := x4[1, round(Tp4/T)]
# Будуємо графіки для прискорень ( для обєкта управління - перевантажень, сил)
# [plot: 0, x1[3, h], x2[3, h], x3[3, h], x4[3, h] vs h*T]
# Знаходимо максимальні значення координат (=перерегулювання), та прискорень для альтернативних систем
v[h] := x1[3, h]
um1 := max(v)
v[h] := x2[3, h]
um2 := max(v)
um1 = 0.208984
um2 = 0.303711
v[h] := x3[3, h]
um3 := max(v)
v[h] := x4[3, h]
um4 := max(v)
um3 = 0.424438
um4 = 0.323455
v[h] := x1[1, h]
hm1 := max(v)
v[h] := x2[1, h]
hm2 := max(v)
hm1 = -0.000460195
hm2 = 0.076246
v[h] := x3[1, h]
hm3 := max(v)
v[h] := x4[1, h]
hm4 := max(v)
hm3 = 0.0652651
hm4 = 0.013445
# Обчислюємо значення критеріїв Kqv  i  Kmz . Оскільки  замість неперервних функцій  х(t) маємо  x[h*T] (у Mathcad це індексована змінна  x_h ) , то замінюємо інтеграли на суми. "Фізичний змисл" критеріїв можна бачити по їх виразам. Квадратичний критерій відріз- няється від інших тим, що тільки нього існують аналітичні розвязання варіаційної задачі синтезу. Іноді він є природним для певної задачі, іноді - навпаки, але ж такий зручний!
K1qv := sum(x1[1, h]^2, h)
K3qv := sum(x3[1, h]^2, h)
K1mz := sum(|x1[1, h]|*h*T, h)
K3mz := sum(|x3[1, h]|*h*T, h)
K2qv := sum(x2[1, h]^2, h)
K4qv := sum(x4[1, h]^2, h)
K2mz := sum(|x2[1, h]|*h*T, h)
K4mz := sum(|x4[1, h]|*h*T, h)
# Виводимо значення критеріїв для чотирьох варіантів САУ.
K1qv = 8.73122
K1mz = 27.1618
K2qv = 7.13354
Kqv == integral(x(t)^2, t = 0 .. tk)
Kmz == integral(|x(t)|*t, t = 0 .. tk)
K2mz = 17.2078
K3qv = 6.46102
K3mz = 22.8103
K4qv = 6.98621
K4mz = 14.4847
# Щоб прояснити суть  інтегральних  критеріїв, подаємо графіки підінтегральних виразів
# 1. Кратні корені  2. Розподіл Батерворта
# [plot: 6*x1[1, h]^2, |x1[1, h]|*h vs h*T, h*T + .2]
# [plot: 6*x2[1, h]^2, |x2[1, h]|*h vs h*T, h*T + .2]
# 3. Квадратичний критерій  4. Критерій зваженої помилки
# [plot: 6*x3[1, h]^2, |x3[1, h]|*h vs h*T, h*T + .1]
# [plot: 6*x4[1, h]^2, |x4[1, h]|*h vs h*T, h*T + .2]
# Тепер, коли обчислені усі критерії для всіх вариантів сформуємо з них матрицю, К кожен рядок  якої - значення усіх критеріїв для відповідного варіанта, а стовпчик -
# значення відповідного критерія для усіх варіантів.
i := 1 .. 4
j := 1 .. 5
K[1, 1] := Tp1
K[1, 2] := 0
K[1, 3] := um1
K[1, 4] := K1qv
K[1, 5] := K1mz
K[2, 1] := Tp2
K[2, 2] := hm2
K[2, 3] := um2
K[2, 4] := K2qv
K[2, 5] := K2mz
K[3, 1] := Tp3
K[3, 2] := hm3
K[3, 3] := um3
K[3, 4] := K3qv
K[3, 5] := K3mz
K[4, 1] := Tp4
K[4, 2] := hm4
K[4, 3] := um4
K[4, 4] := K4qv
K[4, 5] := K4mz
max(K[:, 1]) = 8.75
max(K[:, 2]) = 0.076246
K = [
    6.5, 0, 0.208984, 8.73122, 27.1618;
    6, 0.076246, 0.303711, 7.13354, 17.2078;
    8.75, 0.0652651, 0.424438, 6.46102, 22.8103;
    3.75, 0.013445, 0.323455, 6.98621, 14.4847
]
max(K[:, 3]) = 0.424438
max(K[:, 4]) = 8.73122
# Нормуємо значення критеріїв відносно їх максимального  значення
Knorm[:, j] := K[:, j]/max(K[:, j])
Knorm = [
    0.742857, 0, 0.492378, 1, 1;
    0.685714, 1, 0.715559, 0.817016, 0.633528;
    1, 0.855981, 1, 0.739991, 0.839793;
    0.428571, 0.176337, 0.762078, 0.800142, 0.533276
]
# 3. Вибір варіанта САУ за комплексним критерієм
# Тепер, коли маємо нормовані значення критеріїв, можна науково відповісти на пи- тання  яка ж система краще? Задаємо коефіціенти ваги  a_j  для кожного з кри- теріїв, ну, наприклад  a_j = 1. Обчислюємо комплексний критерій і виводимо його зна- чення (памятаємо, що всі критерії є критеріями мінімізації  (= чим менше, тим краще).
# Порівнюємо системи, памятаючи, що при інших приоритетах (= інших значеннях a_j) результати будуть іншими. Це результат того, що ні один варіант не є домінуючим - кращим по всім критеріям, також ні один варіант не є домінуємим.
# В нашому випадку кожний з варіантів САУ є найкращим хоч по одному з критеріїв. Це означає, що можна так підібрати коефіціенти  a_j ,  що комплексно кращим буде який завгодно з варіантів. Можна сказати, що такі варіанти є множиною Парето - ні один з варіантів не є кращім одразу за усіма критеріями.
a[j] := 1
SumK[i] := sum(Knorm[i, j]*a[j], j)
KK := transpose(Knorm)
SumK = [3.23524; 3.85182; 4.43576; 2.7004]
# Подаємо  значення комплексного критерія та ранг для усіх варіантів
# - САУ з кратними коренями  2 місце
# - САУ з розподіленням Баттерворта  3 місце
# - САУ оптимальна за інтегральним квадратичним критерієм  4 місце
# - САУ оптимальна за інтегральним взваженим критеріем  1 місце
# Подаємо  також матрицю нормованих критеріїв - у числах та у кольорах  (значення критерія відображається інтенсивністю : чим менше, чим темніше - тим краще.
# [3D plot: transpose(KK)]
Knorm = [
    0.742857, 0, 0.492378, 1, 1;
    0.685714, 1, 0.715559, 0.817016, 0.633528;
    1, 0.855981, 1, 0.739991, 0.839793;
    0.428571, 0.176337, 0.762078, 0.800142, 0.533276
]
# Якщо Ви працюєте з цим документом на комп'ютері, то можете мишею змінювати ракурс графіка. Знайдіть відповідність між стовпчиками і рядками матриці. Підпишіть графік - де які критерії,  де які варіанти САУ.
# Висновки. Проведено комплексну оцінку 4-ох альтернатив САУ  за критеріями -
# показниками якості перехідного процесу.
# Найгірша САУ - оптимальна за квадратичним критерієм.
# Контрольні запитання та завдання
# 1. Дайте словесну формулу тривалості перехідного процеса.  5 б
# 2. Наведіть приклади обєктів управління, де обмежується перерегулювання.  7 б
# 3. Наведіть приклади обєктів управління, де обмежується прискорення.  8 б
# 4. Напишіть формули для обчислення всіх використаних критеріїв  10 б
# 5. Напишіть документ для оцінки стійкості  САУ (=грубості)  до варіації параметрів  об'єкта  а0, а1, а2 та регулятора k1, k2, k3  25 б
# 6. Напишіть документ для дослідження перехідних процесів в САУ 2,3,4,5,6
# порядків  для одного з розглянутих класів стандартних коефіціентів.  20 б
# 7. Сконструюйте крітерій для оцінки грубості САУ.  5-50 б
# 8. Сконструюйте крітерій для оцінки енергетичних затрат на управління.  7 б
# 9. Сконструюйте крітерій для оцінки складності реалізації регулятора на ЦОМ  10 б
# 10. Дайте визначення поняття "критерій" для областей: техніка, економіка.  10 б
# 11. Проведіть дослідження на тему - залежність розглянутих критеріїв, та  35 б
# комплексної оцінки від порядку системи (від 2-го до 6-8-го)
