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# 3.2 Дослідження усталених помилок САУ
# Схема усталеного стану
# Вступ
# Система автоматичного регулювання (САР) повинна забезпечувати не тільки стій- кість, потрібну швидкодію, але й потрібну точність в усталених  станах. Для того, щоб вихідний в усталеному стані точно дорівнював вхідному передаточна функція розімкне- ної  САР повинна мати певну кількість інтеграторів. САР що не має уталеної помилки для певного вхідного сигналу називається астатичною. Якщо САР без усталеної помилки відпрацьовує постійний сигнал, то кажуть, що вона має астатизм першого порядку, якщо сигнал, що лінійно змінюється - це буде вже астатизм другого порядку, і так далі.
# Задачі забезпечення астатизму потрібного порядку та визначення усталених помилок потребують - рутина для спеціаліста, обов'язкова, базова складова підготовки. Задачі аналізу і синтезу сучасних систем управління набагато складніші. Ціль роботи - отримати тверді навички аналізу усталених помилок регулювання.
#
# Постанова задачі
# Розглянемо задачу з програми певної олімпіади. Задача рутинна і елементарна (при наявності дійсної підготовки), щоб це не було очевидним, вона формулюється так:
# "Визначити максимальне ціле число μ, при якому для вхідного сигналу  q == t^μ усталена похибка стеження  ε  в системі, що подана на рис.1 буде дорівнювати  нулю". В пе- рекладі на звичайну мову це означає "визначити порядок астатизму (μ+1) заданої САУ".  Маємо задачу  з глибокої класики, від 30-х років.. Відомо (див. будь-який підручник з теорії автоматичного управління) що порядок астатизму визначається кількістю інтегра- торів (або "полюсів") у передаточній функції розімкненої САУ.
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QQ
# Рис. 1.  Структурна схема системи
#
# Зразок виконання завдання
# 1. Визначимо передаточну функцію САУ. Для цього треба виконати ряд структур- них перетворень, щоб привести злегка накручену схему до фундаментальної однокон- турної системи із ЗЗ.
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# qq | kk
# +
# -
# Рис. 2.  Структурна схема системи після переносу точки розгалуження через суматор
# Перенесемо точку розгалуження вхідного сигналу через суматор (увага - сигнал Зворотного Зв'язку (ЗЗ, а не 33) подається із знаком мінус - це від'ємний ЗЗ). Щоб нічого не змінилось на виході, ми в точку сумування (сумирования) сигналів додаємо втрачену при переносі складову. Дивимось одночасно на рис.1 та рис.2 і бачимо, що сума відповідних сигналів у новій структурній схемі  qq + kk  дає той же сигнал, що на схемі рис.1,  тобто:  qq + kk = QQ тому,  що ε  = q - y.
# Тепер дивимось тільки на рис.2 і бачимо там два стандартних з'єднання ланок - паралельне і "зустрічно паралельне" тобто контур із ЗЗ. Ми можемо замінити ці  з'єднан- ня ланками з відповідними передаточними функціями Wpara(s), Wzvzv(s). Дивимось вже на рис.3, і бачимо: отримано елементарну одноконтурну систему.
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# Рис. 3.  Структурна схема системи після заміни елементарних з'єднань еквівалентними ПП (передаточними функціями.)
#
# Тепер виконаємо алгебраічні перетворення відповідно перетворенням структурної схе- ми. Введемо означення  для передаточних функцій заданої схеми (дивимось на рис. 1).
W1(s) := k/(T1*s + 1)  # error: bad_variable mc_k mc_k value_zone
W2(s) := s/(T2*s + 1)  # error: bad_variable mc_T2 mc_T2 value_zone
W3(s) := 1/s
# Знову таки дивимось одночасно на рис.1 та рис.2 і записуємо
Wpara(s) := W1(s) + W2(s)
Wpara(s) → k/(T1*s + 1) + s/(T2*s + 1) simplify → (k*T2*s + k + T1*s^2 + s)/((T1*s + 1)*(T2*s + 1))
(k*T2*s + k + T1*s^2 + s)/((T1*s + 1)*(T2*s + 1)) collect, s → (T1*s^2 + (k*T2 + 1)*s + k)/((T1*s + 1)*(T2*s + 1))
# Отримали першу ланку для еквівалентної схе- ми на рис.3 і згадали, що світові  стандарти забороняють виконувати алгебраїчні перет- ворення вручну (помилки коштують дорого).
Wpara(s) := (T1*s^2 + (k*T2 + 1)*s + k)/((T1*s + 1)*(T2*s + 1))  # error: bad_variable mc_T1 mc_T1 value_zone
Wzvzv(s) := W3(s)/(1 - W3(s)*W2(s))
Wzvzv(s) → (T1*s^2 + (k*T2 + 1)*s + k)/((T1*s + 1)*(T2*s + 1)) simplify → (T2*s + 1)/(s^2*T2)
Wzvzv(s) := (T2*s + 1)/(s^2*T2)  # error: bad_variable mc_T2 mc_T2 value_zone
# Знову дивимось, але тільки на рис.2 і записуємо передаточну функцію (y(s) по q(s))  розімкнутої системи
WyqRoz(s) := Wpara(s)*Wzvzv(s)
WyqRoz(s) → (T1*s^2 + (k*T2 + 1)*s + k)/((T1*s + 1)*s^2*T2)
# Дивимось, тепер у підручник з ТАУ (частина 1) і записуємо передаточну функці. замкненої системи...
WyqRoz(s) expand, T1; simplify; collect, s → (T1*s^2 + (k*T2 + 1)*s + k)/((T1*s + 1)*s^2*T2)
WyqZam(s) := WyqRoz(s)/(1 + WyqRoz(s))
# .... і передаточну функцію для похибки (помилки) по вхідному сигналу:
Wεq(s) := 1/(1 + WyqRoz(s))
Wεq(s) expand, s; simplify; collect, s → (T1*s + 1)*s^2*T2/(s^3*T2*T1 + (T1 + T2)*s^2 + (k*T2 + 1)*s + k)
Wεq(s) := T2*(T1*s + 1)*s^2/(s^3*T2*T1 + (T1 + T2)*s^2 + (k*T2 + 1)*s + k)  # error: bad_variable mc_T2 mc_T2 value_zone
# А тепер трошки теорії і математики. Розкладемо рівняння для помилки в ступеневий ряд  по s
Wεq(s) == ε(s)/q(s)
ε(s) == Wεq(s)*q(s)
ε(s) == (C0 + C1*s + C2*s^2/2*.... + □)*q(s)  # (***)
# Загальновідомо, що коефіцієнти ступеневого ряда визначаються так:
C0 := Wεq(s)
C1 := d/ds(Wεq(s))
C2 := d^2/ds^2(Wεq(s))
C3 == .....
# В цих формулах потрібно підставити s = 0 - це відповідає усталеному стану.
# Зробимо це
Wεq(s) substitute, s == 0 → 0  # - получилося, таким чином  С0 = 0
# Іноді, символьний процесор гальмує і не доганяє, тому підкладемо йому явний вираз
(T1*s + 1)*s^2*T2/(s^3*T2*T1 + (T1 + T2)*s^2 + (k*T2 + 1)*s + k) substitute, s == 0 → 0
# Тепер, ми повинні знайти вирази для похідних, підставити туди s = 0. Це, якщо ми не озброєні символьним процесором. Зробимо спочатку так:
d/ds(Wεq(s)) simplify → T2*s*(T1^2*s^3 + 2*T1*s^2*k*T2 + 2*T1*s^2 + 3*T1*s*k + k*T2*s + s + 2*k)/(s^3*T2*T1 + s^2*T2 + T1*s^2 + k*T2*s + s + k)^2
# Бачимо на власні очі множник  s, який нуліфікує увесь вираз, але не віримо їм і запису- ємо: (похідна, якщо підставити s = 0, дорівнює нулю)
d/ds(Wεq(s)) substitute, s == 0 → 0  # - получилося, таким чином  С1 = 0
# Виявляється, що таки можна і не знаходити вирази для похідних а прямо записувати загальні вирази, а комп'ютер зробить усю рутину:
d^2/ds^2(Wεq(s)) substitute, s == 0 → 2*T2/k  # -маємо ненульовий коефіцієнт  С2  = 2*Т2/k
# Так це і є власне розв'язання задачі, яке було видиме ще спочатку - подивіться на вираз  для передаточної функції розімкнутої системи - бачимо s^2 у знаменнику - система має астатизм другого порядку і відпрацьовує постійні і лінійно зростаючі сигнали без усталених помилок.
WyqRoz(s) → (T1*s^2 + (k*T2 + 1)*s + k)/((T1*s + 1)*s^2*T2)
# Та доведемо задачу до кінця. Виконаємо зворотне перетворення Лапласа від розкладення виразу для помилки в ступеневий ряд (***)
ε(s) == (C0 + C1*s + C2*s^2/2*.... + □)*q(s)  # ==>
ε(t) == C0*q(t) + C1*d/dt(q(t)) + C2/2*d^2/dt^2(q(t))*....
# Для нашої конкретної задачі маємо:  С0 = 0;  С1 = 0;  С2 = 2*Т2, тому :
ε(t) == 0*q(t) + 0*d/dt(q(t)) + 2*Т2/k*d^2/dt^2(q(t))*....
# ...тобто "максимальне ціле число μ, при якому для вхідного сигналу  q == t^μ усталена похибка стеження  ε  в системі буде дорівнювати  нулю"  дорівнює μ= 1
# У випадку, коли система нелінійна, то єдиним універсальним засобом визначення астатизму є моделювання. Так промоделюємо систему
# Моделювання  САУ
# Беремо передаточну функцію замкненої системи, виконуємо зворотне перетворення Лапласа - отримуємо дифрівняння системи.
WyqZam(s) := WyqRoz(s)/(1 + WyqRoz(s))
WyqRoz(s)/(1 + WyqRoz(s)) expand, s; simplify; collect, s → (T1*s^2 + (k*T2 + 1)*s + k)/(s^3*T2*T1 + (T1 + T2)*s^2 + (k*T2 + 1)*s + k)
WyqZam(s) == (T1*s^2 + (k*T2 + 1)*s + k)/(s^3*T2*T1 + (T1 + T2)*s^2 + (k*T2 + 1)*s + k)  # Зворотне перетворення Лапласа:
T2*T1*d^3/dt^3(y) + (T1 + T2)*d^2/dt^2(y) + (k*T2 + 1)*d/dt(y) + k*y == T1*d^2/dt^2(q) + (k*T2 + 1)*d/dt(q) + k*y
# Дифрівняння системи приводимо до форми Коші - вводимо нові змінні
x1 == y
x2 == d/dt(y)
x3 == d^2/dt^2(y)
# записуємо канонічну систему дифрівнянь:
d/dt(x) == A*x + B*qq
# де
x == [x1; x2; x3]
B := [0; 0; 1]
A := [0, 1, 0; 0, 0, 1; -kK/(Tt2*Tt1), -(kK*Tt2 + 1)/(Tt2*Tt1), -(Tt1 + Tt2)/(Tt2*Tt1)]
kK = 1
# Побудуємо еквівалентну дискретну модель динаміки:
x[:, k + 1] == F2(T)*x[:, k] + G2(T)*B*qq[k]
# Записуємо компоненти ПФС (перехідної функції стану) для цієї моделі. Беремо наближення 2-го порядку :
F2(T) := identity(3) + A*T + A^2*T^2/2!
G2(T) := identity(3)*T + A*T^2/2!
# Задаємо число кроків, крок обчислень, початковий стан
ORIGIN := 0
ORIGIN := 0
Kh := 80
Period := 16
Xo := 0
k := 0 .. Kh - 1
T := Period/Kh
# Реакція на постійний сигнал
# Ретельно записуємо вхідну функцію Ulin(t). Можемо погратись з параметрами Т1, Т2, k.
q(t) := 0.7
x[:, 0] := [0; 0; 0]
Ulin(t) := Tt1/(Tt2*Tt1)*d^2/dt^2(q(t)) + (kK*Tt2 + 1)/(Tt2*Tt1)*d/dt(q(t)) + kK/(Tt2*Tt1)*q(t)
Tt1 ≡ 1
Tt2 ≡ 1
kK ≡ 1
x[:, k + 1] := F2(T)*x[:, k] + G2(T)*B*Ulin(k*T)
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# Реакція на лінійно зростаючий сигнал
# Замінюємо вхідний сигнал q і маємо те, що показано.
q(t) := 0.08*t
x[:, 0] := [0; 0; 0]
Ulin(t) := Tt1/(Tt2*Tt1)*d^2/dt^2(q(t)) + (kK*Tt2 + 1)/(Tt2*Tt1)*d/dt(q(t)) + kK/(Tt2*Tt1)*q(t)
Tt1 ≡ 3
kK ≡ 1
x[:, k + 1] := F2(T)*x[:, k] + G2(T)*B*Ulin(k*T)
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# Реакція на квадратично зростаючий сигнал
# Знову підправляємо вхідний сигнал q і маємо те, що показано.
q(t) := 0.005*t^2
Ulin(t) := Tt1/(Tt2*Tt1)*d^2/dt^2(q(t)) + (kK*Tt2 + 1)/(Tt2*Tt1)*d/dt(q(t)) + kK/(Tt2*Tt1)*q(t)
Tt2 ≡ 3
kK ≡ 1
x[:, k + 1] := F2(T)*x[:, k] + G2(T)*B*Ulin(k*T)
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# Бачимо, що квадратичний сигнал відпрацьовується з постійної помилкою 2*Tt2
# Контрольні запитання
# авва
