# Варіанти завдань, група 2
# Зразки виконання  - файли ...
# 1.1 Отримання і аналіз передаточних функцій та
# часових характеристик САУ
# Часові характеристики
# Задано: структурна схема САУ та передаточні функції її елементів
# 1. Отримати передаточні функції для розімкненої і замкненої системи.
# 2. Записати дифрівняння і характеристичне рівняння замкненої САУ.
# 3. Побудувати графік перехідного процесу
# 4. Визначити параметри перехідного процесу**
# kp := 2 ; kr := 0.01 ; T1 := 0.5 ;  T2 := 2 ; Tp := 0.2  ; Tr := 17.5  ; Xz(t) == 0
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T1*T2*d^2/dt^2(X) + (T1 + T2)*d/dt(X) + X == u
Tp*d^2/dt^2(u) + 1*d/dt(u) == kp*i
# Розкладай на елементарні ланки!
i == kr*(Tr*d/dt(X) + X)
# 1. Отримання передаточних функцій для розімкненої і замкненої системи.
# Передаточну функцію обєкта отримаємо замінивши (формально! - деталі читай в підручниках) в дифрівнянні  X(t)  => X(s)  ;  d/dt(X(t)) => s*X(s) ... :
# T1*T2*d^2/dt^2(X) + (T1 + T2)*d/dt(X) + X == u  F T1*T2*s^2*X(s) + (T1 + T2)*s*X(s) + X(s) == u(s)
# Дивимось: на характеристичне рівняння, в підручник і записуємо передаточну функцію обєкта, придивляємось до знаменника і подаємо його добутком елементарних ланок:
# Wob(s) == X(s)/u(s) == 1/(T1*T2*s^2 + (T1 + T2)*s + 1)F Wob(s) := 1/((T1*s + 1)*(T2*s + 1))
# Аналогічно отримуємо (див. на завдання) передаточну  функцію привода (електродвигуна):
# u(s)/i(s) == Wпр(s) ;  Wпр(s) := kp/(s*(Tp*s + 1)) ;
# Аналогічно отримуємо (див. на завдання) передаточну  функцію регулятора (це ПД-регулятор):  i(s)/X(s) == Wрег(s) ;  Wрег(s) := kr*(Tr*s + 1) .
# Дивимось на схему САУ, мисленно розмикаємо її,  і записуємо передаточну функцію (ПФ)
# розімкненої  САУ:  Wroz(s) := Wрег(s)*Wпр(s)*Wob(s) , підставляємо відповідні ПФ
# Wrz(s) := -kr*(Tr*s + 1)*kp/((Tp*s + 1)*s)*1/((T1*s + 1)*(T2*s + 1))  ;
# Дивимось (в посібники, підручники, конспекти) і записуємо ПФ замкненої  САУ:  Wzs(s) := Wrz(s)/(1 + Wrz(s))
# Після ряду символьних операцій (в середовищі пакету) та редактирування того, що записано вище, отримуємо передаточну функцію замкненої САУ  в термінах вхідних  даних:
# Wzm(s) := (kr*kp*(Tr*s + 1))/(Tp*s^4*T1*T2 + (T1*T2 + Tp*T2 + Tp*T1)*s^3 + (T2 + T1 + Tp)*s^2 + (kr*kp*Tr + 1)*s + kr*kp)
# В солідних  пакетах символьний процесор входить в Д-набір наукових отмичок. Для освоєння отримаємо вирази  для ПФ розімкненої  і замкненої систем "в числах": kp*kr*(Tr*s + 1)/((Tp*s + 1)*s)*1/((T1*s + 1)*(T2*s + 1)) expand, s; simplify; collect, s; float, 1 → .1*(40*s + 2.)/((s + 5.)*s*(s + 2.)*(2.*s + 1.))
kr*kp*(Tr*s + 1)/(Tp*s^4*T1*T2 + (T1*T2 + Tp*T2 + Tp*T1)*s^3 + (T2 + T1 + Tp)*s^2 + (kr*kp*Tr + 1)*s + kr*kp) expand, s; simplify → (35.*s + 2.)/(20.*s^4 + 150.*s^3 + 270.*s^2 + 135.*s + 2.)
# 2. Записуємо дифрівняння і характеристичне рівняння замкненої САУ
# Дивимось на знаменник (і в підручники)  ПФ замкненої  САУ і записуємо:
# Tp*s^4*T1*T2 + (T1*T2 + Tp*T2 + Tp*T1)*s^3 + (T2 + T1 + Tp)*s^2 + (kr*kp*Tr + 1)*s + kr*kp == 0
# К1.  Приведення диференційного рівняння до форми Коші
# Маємо диференційне рівняння 4-го порядку:
Tp*T1*T2*d^4/dt^4(X) + (T1*T2 + Tp*T2 + Tp*T1)*d^3/dt^3(X) + (T2 + T1 + Tp)*d^2/dt^2(X) + (kr*kp*Tr + 1)*d/dt(X) + kr*kp*X == 0
# Визначимо його кооефіцієнти
# A4 := 1 ;  A3 := (T1*T2 + Tp*T2 + Tp*T1)/(Tp*T1*T2) ;  A2 := (T2 + T1 + Tp)/(Tp*T1*T2) ;
# A1 := (kr*kp*Tr + 1)/(Tp*T1*T2) ;  A0 := (kr*kp)/(Tp*T1*T2) .  Для даних варіанту вони дорівнюють:
# A4 = 1;  A3 = 7.5;  A2 = 13.5  ; A1 = 6.75 ;  A0 = 0.1
# В цих  означеннях маємо:
# A4*d^4/dt^4(X) + A3*d^3/dt^3(X) + A2*d^2/dt^2(X) + A1*d/dt(X) + A0*X == 0
# Задаємо крок обчислень:  ORIGIN := 1  T := .25
# Приводимо задане дифрівняння до форми Коші. Для цього вводимо нові змінні:
# x[1] == X ;  x[2] == d/dt(X) ;  x[3] == d^2/dt^2(X) ;  x[4] == d^3/dt^3(X)  тобто  d/dt(x1) == x2 ; d/dt(x2) == x3 ;d/dt(x3) == x4 ; а останнє рівняння отримуємо підстановкою нових  змінних  в дифрівняння замкненої  системи
# Подаємо систему у матрично-векторному вигляді:  dх/dt == А*х  де  A := [0, 1, 0, 0; 0, 0, 1, 0; 0, 0, 0, 1; -A0, -A1, -A2, A3] , а  х - вектор стану. Запишемо систему в розгорнутому виді. Навіщо? - тому що всі лінійні і лінеаризовані системи "вписуються" в таку модель:  dх/dt == А*х + B*u + D*v , де u - вектор управління,  v - вектор збурень. На цій моделі базується вся сучасна теорія управління. Якщо не засвоїти її (цю модель), то її (сучасну ТАУ) можна і не вивчати... В цій роботі робимо перший крок. Подивимось на канонічну модель динаміки одновимірної  системи в розгорнутому виді: .
# [d/dt(x1); d/dt(x2); d/dt(x3); d/dt(x4)] == [0, 1, 0, 0; 0, 0, 1, 0; 0, 0, 0, 1; -A0, -A1, -A2, -A3]*[x1; x2; x3; x4] == [0 + x2 + 0 + 0; 0 + 0 + x3 + 0; 0 + 0 + 0 + x4; -A0*x1 - A1*x2 - A2*x3 - A3*x4]
# К2.  Подання розв'язання диференційного рівняння в формі Коші
# Читаємо посібники і підручники, узнаємо, що розвязання рівняння  dх/dt == А*х  має вид
# (ще одна форма Коші)  x(t2) == e^(A*(t2 - t1))*x(t1)  F x(t2) == F(t2, t1)*x(t1) ,
# де F(t2, t1) - перехідна функція функці стану . Моделювання САУ, управління виконуються за допомогою мікропроцесорів, мікроконтролерів - дискретних пристроїв, що обробляють дані з певним кроком квантування Т , в нашому випадку за таким алгоритмом:
# x((k + 1)*T) == F(T)*x(k*T)  F в стандартній формі так:  x[:, k + 1] == F(T)*x[:, k] .
# Матрична експонента  e^(A*Т)  наближується (нескінченим) степеневим рядом:
# F2(T) == I + A*T + A^2*T^2/2! + A^3*T^3/3! + A^4*T^4/4! + ......
# Обмежимось наближенням другого порядку для Перехідної Функції Стану (ПФС, не плутаємо з ПФ - передаточною функцією, що залежить від змінної s). Подаємо ПФС як функцію кроку квантування Т  I := identity(4) .  ORIGIN := 1  Задаємо початковий стан САУ:
# F2(T) := I + A*T + A^2*T^2/2!  F2(T) = [ 1, 0.25, 0.03125, 0; 0, 1, 0.25, 0.03125; -0.003125, -0.210938, 0.578125, 0.484375; -0.0484375, -3.27266, -6.75, 4.21094 ]  x[:, 1] := [-0.1; 0; 0; 0]
# Задаємо період моделювання, крок квантування та кількість кроків  T := 0.1  k := 1 .. 50
# Записуємо робоче рівняння, за яким обчислюється перехідний процес
# x[:, k + 1] := F2(T)*x[:, k]
# Виводимо таблицю і графік процесу
Wrz(i*w) → 2*((-.175)*i*w - 0.01)/((.2*i*w + 1)*i*w*(.5*i*w + 1)*(2*i*w + 1))
x = [
    -0.1, -0.1, -0.0999998, -0.0999971, -0.0999868, -0.0999576, -0.0998887, -0.099743, -0.0994571, -0.0989257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;
    0, 0, 1.1875e-5, 6.0347e-5, 0.000189886, 0.000477284, 0.00105125, 0.00212258, 0.00403016, 0.00731021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;
    0, 5e-5, 0.000285688, 0.000863343, 0.00204117, 0.00423718, 0.00811677, 0.0147239, 0.0256759, 0.0434491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;
    0, 0.001375, 0.00398066, 0.00864103, 0.016656, 0.030049, 0.0519316, 0.0870372, 0.142491, 0.228915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]
-2*1i*(12.5*1i*w + 5)/((.2*1i*w + 1)*w*(.5*1i*w + 1)*(2*1i*w + 1)) expand; simplify; collect, w → 50.*((-5.)*w + 2.*1i)/(w*(2.*1i*w^3 + 15.*w^2 - 27.*1i*w - 10.))
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# Процес виявився нестійким  - закон управління для системи 4 порядку занадто зпрощений:
# настроювання і снтез регуляторів - центральний момент ТАУ - в наступних РГЗ
# Варіанти  завдань
# Зaвдання № 1. Задано структурну схему системи і передаточні функції елементів.
# 1. Отримати передаточні функції для розімкненої і замкненої системи.
# 2. Записати дифрівняння і характеристичне рівняння САУ.
# 3. Отримати АЧХ,ФЧХ розімкненої системи. Побудувати (приблизно) АФЧХ
# 4. Побудувати асимптотичну ЛАЧХ розімкненої системи.
kp := 2
Kрег := 5
T1 := 0.5
T2 := 2
Tp := 0.2
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K1 := 1
K2 := 2
K3 := 1
Wоб(s) := 1/((T1*s + 1)*(T2*s + 1))
Wприв(s) := kp/((Tp*s + 1)*s)
# Пам"ятай про елементарні ланки!
# А small Giftячок for Uou.
# 1. Отримати передаточні функції для розімкненої і замкненої системи.
# Спочатку виконуємо еквівалентне перетворення структурної схеми САУ, потім, дивлячись на неї записуємо...
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# Введемо
# означення:
Tr := sqrt(K3/K1)
ξ := K2/2*sqrt(K1/K3)
K3*s^2 + K2*s + K1 == K1*(Tr^2*s^2 + 2*ξ*Tr*s + 1)
Woc(s) := K1*(Tr^2*s^2 + 2*ξ*Tr*s + 1)
Wraz(s) := Kрег*Wпр(s)*Wob(s)*Woc(s)
Wrz(s) := Kрег*kp/((Tp*s + 1)*s)*1/((T1*s + 1)*(T2*s + 1))*K1*(Tr^2*s^2 + 2*ξ*Tr*s + 1)
Wzs(s) := Wrz(s)/(1 + Wrz(s))
# Після ряду символьних операцій (вони потім були стерті) та редактирування (вводили змінні без присвоєних значень) того, що записано вище, отримуємо передаточну функцію замкненої САУ у загальному виді:
Wza(s) := Kрег*kp*K1*(Tr^2*s^2 + 2*ξ*Tr*s + 1)/(Tp*T1*T2*s^4 + (T1*T2 + Tp*T1 + Tp*T2)*s^3 + (Kрег*kp*K1*Tr^2 + T1 + T2 + Tp)*s^2 + (2*Kрег*kp*K1*ξ*Tr + 1)*s + Kрег*kp*K1)
# При символьному ви- воді значення  змін- них підставляються
Wza(s) → (10*s^2 + 20*s + 10)/(.20*s^4 + 1.50*s^3 + 12.7*s^2 + 21*s + 10)
(s^2 + 2*s + 1)/(.02*s^4 + .15*s^3 + 1.27*s^2 + 2.1*s + 1)
# 2. Записати дифрівняння і характеристичне рівняння САУ.
# У загальному виді характеристичне рівняння -  це те, що у знаменнику Wza(s). Він (вираз) досить довгий, тому подаємо його після підстановки значень параметрів:
Xarura(s) == .02*s^4 + .15*s^3 + 1.27*s^2 + 2.1*s + 1 == 0
# А дифрівняння - це те, що маємо післі заміни у Xarura(s) s->d/dt:
Difura(X, t)
0.02*d^4/dt^4(X) + .15*d^3/dt^3(X) + 1.27*d^2/dt^2(X) + 2.1*d/dt(X) + 1*X == 0
# 3. Отримати АЧХ, ФЧХ розімкненої системи. Побудувати (приблизно) АФЧХ
Wrz(s) := Kрег*kp*K1*(Tr^2*s^2 + 2*ξ*Tr*s + 1)/(s*(Tp*s + 1)*(T1*s + 1)*(T2*s + 1))
Aa(ω) := kr*kp*sqrt(ω^2*Tr^2 + 1)/(ω*sqrt((1 + T2^2*ω^2)*(1 + T1^2*ω^2)*(1 + Tp^2*ω^2)))
A(ω) := |Wrz(1i*ω)|
φ(ω) := arg(Wrz(1i*ω))
Wrz(1i*ω) == -1i*(-10*ω^2 + 20i*ω + 10)/(ω*(.2i*ω + 1)*(.5i*ω + 1)*(2i*ω + 1))
Aa(ω) := Kрег*kp*K1/ω*sqrt(((1 - Tr^2*ω^2)^2 + (2*ω*ξ*Tr)^2)/((1 + T2^2*ω^2)*(1 + T1^2*ω^2)*(1 + Tp^2*ω^2)))
ω := 0.01, 0.06 .. 10
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# 4. Побудувати асимптотичну ЛАЧХ розімкненої системи.
ω := 0.01, 0.06 .. 100
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# Найпростіше - просто побудувати графік АЧХ в логарифмічних масштабах. Для побудови асимптотичної ЛАЧХ використаємо вираз:
Wrz(s) := Kрег*kp*K1*(Tr^2*s^2 + 2*ξ*Tr*s + 1)/(s*(Tp*s + 1)*(T1*s + 1)*(T2*s + 1))
# По останньому виразу неважко побудувати асимптотичну ЛАЧХ. Дещо важче зробити це за допомогою символьного процесора. Копіюємо з роботи Т122 відповідний блок:
Diap := 100000000
Kolhag := 50
j := -1 .. Kolhag
lhag := log(Diap)/Kolhag
ω(j) := 10^(j*lhag)
lw := -1, lhag - 1 .. log(Diap)
lin(lw, T) := (log(1/T) - lw)
lap(lw, T) := Φ(lw - log(1/T))*(log(1/T) - lw)
lfo(lw, T) := Φ(lw - log(1/T))*(lw - log(1/T))
ЛAЧХ(lw) := lap(lw, Tp) + lap(lw, T1) + lap(lw, T2) + 2*lfo(lw, Tr) + lin(lw, 1/(kp*kr))
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# Підставляємо у вираз для асимптотичної ЛАЧХ параметри Wraz(s) даного варіанта і будуємо - асимптотичну ЛАЧХ, її складові та  точну ЛАЧХ - для порівняння і контроля.
# Бачимо, що точна ЛАЧХ не має різких кутів на середніх частотах і співпадає на малих і великих частотах з асимптотичною.
#
# Копіюємо вхідні дані  та показуємо відповідність між передаточними функціями і відповідними складовими на графіку,
# Зaвдання № 2.  Задано передаточні функції елементів САУ
# 1. Отримати передаточні функції для розімкненої і замкненої системи.
# 2. Записати дифрівняння і характеристичне рівняння замкненої САУ.
# 3. Отримати АЧХ, ФЧХ розімкненої системи. Побудувати (приблизно) АФЧХ
# 4. Побудувати асимптотичну ЛАЧХ розімкненої системи.
kp := 4
kr := 1
T1 := 0.1
ζ := 1
Tp := 0.2
Tr := 1
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Wобєкт(s) := 1/(T1^2*s^2 + 2*ζ*T1*s + 1)
Wприв(s) := kp/((Tp*s + 1)*s)
Wрегул(s) := kr*(Tr*s + 1)
# Розкладай на елементарні ланки!
# Зaвдання № 3.  Задано диференційні рівняння елементів САУ
# 1. Отримати передаточні функції для розімкненої і замкненої системи.
# 2. Записати дифрівняння і характеристичне рівняння замкненої САУ.
# 3. Отримати АЧХ, ФЧХ розімкненої системи. Побудувати (приблизно) АФЧХ
# 4. Побудувати асимптотичну ЛАЧХ розімкненої системи.
kp := 5
kr := 2
T1 := 1
ζ := 1
Tp := 0.25
Tr := 1
Xz(t) == 0
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T1^2*d^2/dt^2(X) + 2*ζ*T1*d/dt(X) + X == u
Tp*d^2/dt^2(u) + 1*d/dt(u) == i
i == kr*(Tr*d/dt(X) + X)
# Розкладай на елементарні ланки!
# Зaвдання № 4. Задано структурну схему системи і передаточні функції елементів.
# 1. Отримати передаточні функції для розімкненої і замкненої системи.
# 2. Записати дифрівняння і характеристичне рівняння САУ.
# 3. Отримати АЧХ,ФЧХ розімкненої системи. Побудувати (приблизно) АФЧХ
# 4. Побудувати асимптотичну ЛАЧХ розімкненої системи.
kp := 2
Kрег := 5
T1 := 0.5
T2 := 2
Tp := 0.2
Tr := 1
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K1 := 1
K2 := 2
K3 := 1
Wоб(s) := 1/((T1*s + 1)*(T2*s + 1))
Wприв(s) := kp/((Tp*s + 1)*s)
# Пам"ятай про елементарні ланки!
# Зaвдання № 5.  Задано передаточні функції елементів САУ
# 1. Отримати передаточні функції для розімкненої і замкненої системи.
# 2. Записати дифрівняння і характеристичне рівняння замкненої САУ.
# 3. Отримати АЧХ, ФЧХ розімкненої системи. Побудувати (приблизно) АФЧХ
# 4. Побудувати асимптотичну ЛАЧХ розімкненої системи.
kp := 4
kr := 2
T1 := 0.2
ζ := 1
Tp := 0.5
Tr := 2
T2 := 2
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Wобєкт(s) := 1/(T1^2*s^2 + 2*ζ*T1*s + 1)
Wприв(s) := kp/((Tp*s + 1)*s)
Wрегул(s) := kr*(Tr*s + 1)*(T2*s + 1)/(0.1*T2*s + 1)
# Розкладай на елементарні ланки!
# Зaвдання № 6.  Задано диференційні рівняння елементів САУ
# 1. Отримати передаточні функції для розімкненої і замкненої системи.
# 2. Записати дифрівняння і характеристичне рівняння замкненої САУ.
# 3. Отримати АЧХ, ФЧХ розімкненої системи. Побудувати (приблизно) АФЧХ
# 4. Побудувати асимптотичну ЛАЧХ розімкненої системи.
kp := 5
kr := 4
T1 := 1
ζ := .4
Tp := 0.25
Tr := 2
T2 := .1
T3 := 0.01
Xz(t) == 0
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T1^2*d^2/dt^2(X) + 2*ζ*T1*d/dt(X) + X == u
Tp*d^2/dt^2(u) + 1*d/dt(u) == i
(T3*d/dt(i) + i) == kr*(Tr*T2*d^2/dt^2(X) + (Tr + T2)*d/dt(X) + X)
# Розкладай на елементарні ланки!
# Зaвдання № 7.  Задано структурну схему системи і передаточні функції елементів.
# 1. Отримати передаточні функції для розімкненої і замкненої системи.
# 2. Записати дифрівняння і характеристичне рівняння САУ.
# 3. Отримати АЧХ,ФЧХ розімкненої системи. Побудувати (приблизно) АФЧХ
# 4. Побудувати асимптотичну ЛАЧХ розімкненої системи.
kp := 2
Kрег := 5
T1 := 0.25
T2 := 2
Tp := 0.2
Tr := 1
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K1 := 1
K2 := 0.5
K3 := 0.25
Wоб(s) := 1/((T1*s + 1)*(T2*s + 1))
Wприв(s) := kp/((Tp*s + 1)*s)
# Пам"ятай про елементарні ланки!
# Зaвдання № 8.  Задано передаточні функції елементів САУ
# 1. Отримати передаточні функції для розімкненої і замкненої системи.
# 2. Записати дифрівняння і характеристичне рівняння замкненої САУ.
# 3. Отримати АЧХ, ФЧХ розімкненої системи. Побудувати (приблизно) АФЧХ
# 4. Побудувати асимптотичну ЛАЧХ розімкненої системи.
kp := 4
kr := 4
T1 := 0.8
ζ := .5
Tp := 0.1
Tr := 1
T2 := 2
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Wоб(s) := 1/(T1^2*s^2 + 2*ζ*T1*s + 1)
Wпр(s) := kp/((Tp*s + 1)*s)
Wрег(s) := kr*(Tr*s + 1)*s
# Розкладай на елементарні ланки!
# А small Giftунок for Uou.
# 1. Отримати передаточні функції для розімкненої і замкненої системи.
# Спочатку виконуємо еквівалентне перетворення структурної схеми САУ, потім, дивлячись на неї записуємо...
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# Визначимо передаточну функцію відповідного <===  контуру:
Wqq(s) := Wпр(s)*Wоб(s)/(1 + Wпр(s)*Wоб(s))
Wrz(s) := Wрег(s)*Wqq(s)*1
Wzs(s) := Wrz(s)/(1 + Wrz(s))
Wqq(s) → 4/((.1*s + 1)*s*(.64*s^2 + .80*s + 1)*(1 + 4/((.1*s + 1)*s*(.64*s^2 + .80*s + 1))))
# Після спрощення і підстановки
# значень параметрів маємо:
Wqq(s) := 1000./(16.*s^4 + 180.*s^3 + 225.*s^2 + 250.*s + 1000.)
# Після ряду символьних операцій (вони потім були стерті) та редактирування (вводили змінні без присвоєних значень) того, що записано вище, отримуємо передаточну функцію замкненої САУ у загальному виді: .......
Wzs(s) := 4000.*(s + 1.)*s/(16.*s^4 + 180.*s^3 + 4225.*s^2 + 4250.*s + 1000.)
# Зaвдання № 9.  Задано диференційні рівняння елементів САУ
# 1. Отримати передаточні функції для розімкненої і замкненої системи.
# 2. Записати дифрівняння і характеристичне рівняння замкненої САУ.
# 3. Отримати АЧХ, ФЧХ розімкненої системи. Побудувати (приблизно) АФЧХ
# 4. Побудувати асимптотичну ЛАЧХ розімкненої системи.
kp := 5
kr := 2
T1 := 1
ζ := .5
Tp := 0.25
Tr := 2
T2 := .2
Xz(t) == 0
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# Об"єкт:  Привод:
T1^2*d^2/dt^2(X) + 2*ζ*T1*d/dt(X) + X == u
Tp*d^2/dt^2(u) + 1*d/dt(u) == i
i == kr*(Tr*d^2/dt^2(X) + Tr*d/dt(X))
# Розкладай на елементарні
# ланки!
# Зaвдання № 10. Задано структурну схему системи і передаточні функції елементів.
# 1. Отримати передаточні функції для розімкненої і замкненої системи.
# 2. Записати дифрівняння і характеристичне рівняння САУ.
# 3. Отримати АЧХ,ФЧХ розімкненої системи. Побудувати (приблизно) АФЧХ
# 4. Побудувати асимптотичну ЛАЧХ розімкненої системи.
kp := 2
Kрег := 5
T1 := 0.3
ζ := 0.7
Tp := 0.2
Tr := 1
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K1 := 1
K2 := 2
K3 := 1
Wоб(s) := 1/(T1^2*s^2 + 2*ζ*T1*s + 1)
Wприв(s) := kp/((Tp*s + 1)*s)
# Пам"ятай про елементарні ланки!
# Зaвдання № 11.  Задано передаточні функції елементів САУ
# 1. Отримати передаточні функції для розімкненої і замкненої системи.
# 2. Записати дифрівняння і характеристичне рівняння замкненої САУ.
# 3. Отримати АЧХ, ФЧХ розімкненої системи. Побудувати (приблизно) АФЧХ
# 4. Побудувати асимптотичну ЛАЧХ розімкненої системи.
kp := 2
kr := 1
T1 := 0.2
ζ := .4
Tp := 0.2
Tr := 1
T2 := 2
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Wоб(s) := 1/(T1^2*s^2 + 2*ζ*T1*s + 1)
Wпр(s) := kp/((Tp*s + 1)*s)
Wрег(s) := kr*(Tr*s + 1)
# Розкладай на елементарні ланки!
# Зaвдання № 12.  Задано диференційні рівняння елементів САУ
# 1. Отримати передаточні функції для розімкненої і замкненої системи.
# 2. Записати дифрівняння і характеристичне рівняння замкненої САУ.
# 3. Отримати АЧХ, ФЧХ розімкненої системи. Побудувати (приблизно) АФЧХ
# 4. Побудувати асимптотичну ЛАЧХ розімкненої системи.
kp := 5
kr := 2
T1 := 1
ζ := .4
Tp := 0.25
Tr := 1
T2 := .3
Xz(t) == 0
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# Об"єкт:  Привод:
T1^2*d^2/dt^2(X) + 2*ζ*T1*d/dt(X) + X == u
Tp*d^2/dt^2(u) + 1*d/dt(u) == i
i == kr*(Tr*d/dt(X) + X)
# Розкладай на елементарні
# ланки!
# А smallынькый Giftяк for Uou.
# 1. Отримати передаточні функції для розімкненої і замкненої системи.
# Спочатку дивлячмсь на дифрівняння записуємо передаточні функції елементів, потім виконуємо еквівалентне перетворення структурної схеми САУ, а вже потім, дивлячись на неї записуємо...
Wоб(s) := 1/(T1^2*s^2 + 2*ζ*T1*s + 1)
Wпр(s) := kp/((Tp*s + 1)*s)
Wрег(s) := kr*(Tr*s + 1)
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# Визначимо передаточну функцію
# <=== відповідного  контуру:
Wzz(s) := Wрег(s)*Wпр(s)/(1 + Wрег(s)*Wпр(s))
Wrz(s) := Wzz(s)*Wоб(s)*1
Wzs(s) := Wrz(s)/(1 + Wrz(s))
Wzz(s) → 5*(2*s + 2)/((.25*s + 1)*s*(1 + 5*(2*s + 2)/((.25*s + 1)*s)))
................
# Зaвдання № 13.  Задано структурну схему системи і передаточні функції елементів.
# 1. Отримати передаточні функції для розімкненої і замкненої системи.
# 2. Записати дифрівняння і характеристичне рівняння САУ.
# 3. Отримати АЧХ,ФЧХ розімкненої системи. Побудувати (приблизно) АФЧХ
# 4. Побудувати асимптотичну ЛАЧХ розімкненої системи.
kp := 2
Kr := 3
T1 := 0.5
ζ := 0.7
Tp := 0.1
Tr := 1
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k1 := 1
k2 := 0.5
k3 := 0.25
Wоб(s) := 1/(T1^2*s^2 + 2*ζ*T1*s + 1)
Wприв(s) := kp/((Tp*s + 1)*s)
# Пам"ятай про елементарні ланки!
# Зaвдання № 14.  Задано структурну схему системи і передаточні функції елементів.
# 1. Отримати передаточні функції для розімкненої і замкненої системи.
# 2. Записати дифрівняння і характеристичне рівняння САУ.
# 3. Отримати АЧХ,ФЧХ розімкненої системи. Побудувати (приблизно) АФЧХ
# 4. Побудувати асимптотичну ЛАЧХ розімкненої системи.
kp := 3
Kрег := 6
T1 := 0.5
T2 := 2
Tp := 0.2
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K1 := 1
K2 := 2
K3 := 1
Wоб(s) := 1/((T1*s + 1)*(T2*s + 1))
Wприв(s) := kp/((Tp*s + 1)*s)
# Пам"ятай про елементарні ланки!
# Зaвдання № 15.  Задано передаточні функції елементів САУ
# 1. Отримати передаточні функції для розімкненої і замкненої системи.
# 2. Записати дифрівняння і характеристичне рівняння замкненої САУ.
# 3. Отримати АЧХ, ФЧХ розімкненої системи. Побудувати (приблизно) АФЧХ
# 4. Побудувати асимптотичну ЛАЧХ розімкненої системи.
kp := 4
kr := 1
T1 := 0.1
ζ := 0.5
Tp := 0.2
Tr := 2
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Wобєкт(s) := 1/(T1^2*s^2 + 2*ζ*T1*s + 1)
Wприв(s) := kp/((Tp*s + 1)*s)
Wрегул(s) := kr*(Tr*s + 1)
# Розкладай на елементарні ланки!
# Зaвдання № 16.  Задано диференційні рівняння елементів САУ
# 1. Отримати передаточні функції для розімкненої і замкненої системи.
# 2. Записати дифрівняння і характеристичне рівняння замкненої САУ.
# 3. Отримати АЧХ, ФЧХ розімкненої системи. Побудувати (приблизно) АФЧХ
# 4. Побудувати асимптотичну ЛАЧХ розімкненої системи.
kp := 4
kr := 3
T1 := 1
ζ := 0.4
Tp := 0.25
Tr := 1
Xz(t) == 0
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T1^2*d^2/dt^2(X) + 2*ζ*T1*d/dt(X) + X == u
Tp*d^2/dt^2(u) + 1*d/dt(u) == i
i == kr*(Tr*d/dt(X) + X)
# Розкладай на елементарні ланки!
# Зaвдання № 17. Задано структурну схему системи і передаточні функції елементів.
# 1. Отримати передаточні функції для розімкненої і замкненої системи.
# 2. Записати дифрівняння і характеристичне рівняння САУ.
# 3. Отримати АЧХ,ФЧХ розімкненої системи. Побудувати (приблизно) АФЧХ
# 4. Побудувати асимптотичну ЛАЧХ розімкненої системи.
kp := 2
Kрег := 5
T1 := 0.2
T2 := 3
Tp := 0.25
Tr := 2
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K1 := 1
K2 := 3
K3 := 1
Wоб(s) := 1/((T1*s + 1)*(T2*s + 1))
Wприв(s) := kp/((Tp*s + 1)*s)
# Пам"ятай про елементарні ланки!
# Зaвдання № 18.  Задано передаточні функції елементів САУ
# 1. Отримати передаточні функції для розімкненої і замкненої системи.
# 2. Записати дифрівняння і характеристичне рівняння замкненої САУ.
# 3. Отримати АЧХ, ФЧХ розімкненої системи. Побудувати (приблизно) АФЧХ
# 4. Побудувати асимптотичну ЛАЧХ розімкненої системи.
kp := 5
kr := 2
T1 := 0.5
ζ := 0.7
Tp := 0.5
Tr := 2
T2 := 4
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Wобєкт(s) := 1/(T1^2*s^2 + 2*ζ*T1*s + 1)
Wприв(s) := kp/((Tp*s + 1)*s)
Wрегул(s) := kr*(Tr*s + 1)*(T2*s + 1)/(0.1*T2*s + 1)
# Розкладай на елементарні ланки!
# Зaвдання № 19.  Задано диференційні рівняння елементів САУ
# 1. Отримати передаточні функції для розімкненої і замкненої системи.
# 2. Записати дифрівняння і характеристичне рівняння замкненої САУ.
# 3. Отримати АЧХ, ФЧХ розімкненої системи. Побудувати (приблизно) АФЧХ
# 4. Побудувати асимптотичну ЛАЧХ розімкненої системи.
kp := 5
kr := 4
T1 := 1.5
ζ := .4
Tp := 0.3
Tr := 2
T2 := .1
T3 := 0.01
Xz(t) == 0
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T1^2*d^2/dt^2(X) + 2*ζ*T1*d/dt(X) + X == u
Tp*d^2/dt^2(u) + 1*d/dt(u) == i
(T3*d/dt(i) + i) == kr*(Tr*T2*d^2/dt^2(X) + (Tr + T2)*d/dt(X) + X)
# Розкладай на елементарні ланки!
# Зaвдання № 20.  Задано структурну схему системи і передаточні функції елементів.
# 1. Отримати передаточні функції для розімкненої і замкненої системи.
# 2. Записати дифрівняння і характеристичне рівняння САУ.
# 3. Отримати АЧХ,ФЧХ розімкненої системи. Побудувати (приблизно) АФЧХ
# 4. Побудувати асимптотичну ЛАЧХ розімкненої системи.
kp := 2
Kрег := 6
T1 := 0.25
T2 := 2
Tp := 0.3
Tr := 1
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K1 := 1
K2 := 0.5
K3 := 0.25
Wоб(s) := 1/((T1*s + 1)*(T2*s + 1))
Wприв(s) := kp/((Tp*s + 1)*s)
# Пам"ятай про елементарні ланки!
# Зaвдання № 21. Задано передаточні функції елементів САУ
# 1. Отримати передаточні функції для розімкненої і замкненої системи.
# 2. Записати дифрівняння і характеристичне рівняння замкненої САУ.
# 3. Отримати АЧХ, ФЧХ розімкненої системи. Побудувати (приблизно) АФЧХ
# 4. Побудувати асимптотичну ЛАЧХ розімкненої системи.
kp := 4
kr := 4
T1 := 0.8
ζ := .5
Tp := 0.1
Tr := 1
T2 := 2
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Wоб(s) := 1/(T1^2*s^2 + 2*ζ*T1*s + 1)
Wпр(s) := kp/((Tp*s + 1)*s)
Wрег(s) := kr*(Tr*s + 1)*s
# Розкладай на елементарні ланки!
# А little Giftяк for Uou.
# 1. Отримати передаточні функції для розімкненої і замкненої системи.
# Спочатку виконуємо еквівалентне перетворення структурної схеми САУ, потім, дивлячись на неї записуємо...
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# Визначимо передаточну функцію відповідного <===  контуру:
Wqq(s) := Wпр(s)*Wоб(s)/(1 + Wпр(s)*Wоб(s))
# підказка??
Wrz(s) := Wрег(s)*Wqq(s)*1
Wzs(s) := Wrz(s)/(1 + Wrz(s))
Wqq(s) → 4/((.1*s + 1)*s*(.64*s^2 + .80*s + 1)*(1 + 4/((.1*s + 1)*s*(.64*s^2 + .80*s + 1))))
# Після спрощення і підстановки
# значень параметрів маємо:
Wqq(s) := 1000./(16.*s^4 + 180.*s^3 + 225.*s^2 + 250.*s + 1000.)
# Після ряду символьних операцій (вони потім були стерті) та редактирування (вводили змінні без присвоєних значень) того, що записано вище, отримуємо передаточну функцію замкненої САУ у загальному виді: .......
Wzs(s) := 4000.*(s + 1.)*s/(16.*s^4 + 180.*s^3 + 4225.*s^2 + 4250.*s + 1000.)
# Зaвдання № 22  Задано диференційні рівняння елементів САУ
# 1. Отримати передаточні функції для розімкненої і замкненої системи.
# 2. Записати дифрівняння і характеристичне рівняння замкненої САУ.
# 3. Отримати АЧХ, ФЧХ розімкненої системи. Побудувати (приблизно) АФЧХ
# 4. Побудувати асимптотичну ЛАЧХ розімкненої системи.
kp := 5
kr := 2
T1 := 1
ζ := .5
Tp := 0.25
Tr := 2
T2 := .2
Xz(t) == 0
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# Об"єкт:  Привод:
T1^2*d^2/dt^2(X) + 2*ζ*T1*d/dt(X) + X == u
Tp*d^2/dt^2(u) + 1*d/dt(u) == i
i == kr*(Tr*d^2/dt^2(X) + Tr*d/dt(X))
# Розкладай на елементарні
# ланки!
# Зaвдання № 23  Задано структурну схему системи і передаточні функції елементів.
# 1. Отримати передаточні функції для розімкненої і замкненої системи.
# 2. Записати дифрівняння і характеристичне рівняння САУ.
# 3. Отримати АЧХ,ФЧХ розімкненої системи. Побудувати (приблизно) АФЧХ
# 4. Побудувати асимптотичну ЛАЧХ розімкненої системи.
kp := 2
Kрег := 5
T1 := 0.3
ζ := 0.7
Tp := 0.2
Tr := 1
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K1 := 1
K2 := 2
K3 := 1
Wоб(s) := 1/(T1^2*s^2 + 2*ζ*T1*s + 1)
Wприв(s) := kp/((Tp*s + 1)*s)
# Пам"ятай про елементарні ланки!
# Зaвдання № 24  Задано передаточні функції елементів САУ
# 1. Отримати передаточні функції для розімкненої і замкненої системи.
# 2. Записати дифрівняння і характеристичне рівняння замкненої САУ.
# 3. Отримати АЧХ, ФЧХ розімкненої системи. Побудувати (приблизно) АФЧХ
# 4. Побудувати асимптотичну ЛАЧХ розімкненої системи.
kp := 2
kr := 1
T1 := 0.2
ζ := .4
Tp := 0.2
Tr := 1
T2 := 2
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Wоб(s) := 1/(T1^2*s^2 + 2*ζ*T1*s + 1)
Wпр(s) := kp/((Tp*s + 1)*s)
Wрег(s) := kr*(Tr*s + 1)
# Розкладай на елементарні ланки!
# Зaвдання № 25  Задано диференційні рівняння елементів САУ
# 1. Отримати передаточні функції для розімкненої і замкненої системи.
# 2. Записати дифрівняння і характеристичне рівняння замкненої САУ.
# 3. Отримати АЧХ, ФЧХ розімкненої системи. Побудувати (приблизно) АФЧХ
# 4. Побудувати асимптотичну ЛАЧХ розімкненої системи.
kp := 5
kr := 2
T1 := 1
ζ := .4
Tp := 0.25
Tr := 1
T2 := .3
Xz(t) == 0
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# Об"єкт:  Привод:
T1^2*d^2/dt^2(X) + 2*ζ*T1*d/dt(X) + X == u
Tp*d^2/dt^2(u) + 1*d/dt(u) == i
i == kr*(Tr*d/dt(X) + X)
# Розкладай на елементарні
# ланки!
# 1. Отримати передаточні функції для розімкненої і замкненої системи.
# Спочатку дивлячмсь на дифрівняння записуємо передаточні функції елементів, потім виконуємо еквівалентне перетворення структурної схеми САУ, а вже потім, дивлячись на неї записуємо...
Wрег(s) := kr*(Tr*s + 1)
Wоб(s) := 1/(T1^2*s^2 + 2*ζ*T1*s + 1)
Wпр(s) := kp/((Tp*s + 1)*s)
# Визначимо передаточну функцію
# <=== відповідного  контуру:
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Wzz(s) := Wрег(s)*Wпр(s)/(1 + Wрег(s)*Wпр(s))
Wrz(s) := Wzz(s)*Wоб(s)*1
Wzs(s) := Wrz(s)/(1 + Wrz(s))
Wzz(s) → 5*(2*s + 2)/((.25*s + 1)*s*(1 + 5*(2*s + 2)/((.25*s + 1)*s)))
.*підказка
# Зaвдання № 26 Задано структурну схему системи і передаточні функції елементів.
# 1. Отримати передаточні функції для розімкненої і замкненої системи.
# 2. Записати дифрівняння і характеристичне рівняння САУ.
# 3. Отримати АЧХ,ФЧХ розімкненої системи. Побудувати (приблизно) АФЧХ
# 4. Побудувати асимптотичну ЛАЧХ розімкненої системи.
kp := 2
Kr := 3
T1 := 0.5
ζ := 0.7
Tp := 0.1
Tr := 1
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k1 := 1
k2 := 0.5
k3 := 0.25
Wоб(s) := 1/(T1^2*s^2 + 2*ζ*T1*s + 1)
Wприв(s) := kp/((Tp*s + 1)*s)
# Пам"ятай про елементарні ланки!
# Зaвдання № 27 Задано структурну схему системи і передаточні функції елементів.
# 1. Отримати передаточні функції для розімкненої і замкненої системи.
# 2. Записати дифрівняння і характеристичне рівняння САУ.
# 3. Отримати АЧХ,ФЧХ розімкненої системи. Побудувати (приблизно) АФЧХ
# 4. Побудувати асимптотичну ЛАЧХ розімкненої системи.
kp := 2
Kr := 3
T1 := 0.55
ζ := 0.7
Tp := 0.1
Tr := 1
k1 := 1
k2 := 0.5
k3 := 0.25
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Wобєкт(s) := 1/((T1*s + 1)*(T2*s + 1))
Wприв(s) := kp/((Tp*s + 1)*s)
Wрегул(s) := kr*(Tr*s + 1)
# Розкладай на елементарні ланки!
