# Зразок виконання
# РГЗ 1.1 Отримання і аналіз частотних характеристик САУ
# Задано: структурна схема САУ та передаточні функції її елементів
# 1. Отримати вирази для  АЧХ, ФЧХ розімкненої системи.
# 2. Побудувати АФЧХ САУ
# 2.1 визначити контрольні точки і нарисувати  вручну,
# 2.2 записати відповідні робочі вирази і побудувати - в середовищі пакету
# 3. Побудувати ЛАЧХ розімкненої системи
# 3.1 побудувати асимптотичну ЛАЧХ розімкненої системи
# 3.2 побудувати точну ЛАЧХ розімкненої системи
# kp := 2 ; kr := 5 ; T1 := 0.5 ;  T2 := 2 ; Tp := 0.2  ; Tr := 2.5  ; Xz(t) == 0
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T1*T2*d^2/dt^2(X) + (T1 + T2)*d/dt(X) + X == u
Tp*d^2/dt^2(u) + 1*d/dt(u) == kp*i
# Розкладай на елементарні ланки!
i == kr*(Tr*d/dt(X) + X)
# 1. Отримання передаточних функцій для розімкненої і замкненої системи.
# Передаточну функцію обєкта отримаємо замінивши (формально! - деталі читай в підручниках) в дифрівнянні  X(t)  => X(s)  ;  d/dt(X(t)) => s*X(s) ... :
# T1*T2*d^2/dt^2(X) + (T1 + T2)*d/dt(X) + X == u  F T1*T2*s^2*X(s) + (T1 + T2)*s*X(s) + X(s) == u(s)
# Дивимось: на характеристичне рівняння, в підручник і записуємо передаточну функцію обєкта, придивляємось до знаменника і подаємо його добутком елементарних ланок:
# Wob(s) == X(s)/u(s) == 1/(T1*T2*s^2 + (T1 + T2)*s + 1)F Wob(s) := 1/((T1*s + 1)*(T2*s + 1))
# Аналогічно отримуємо (див. на завдання) передаточну  функцію привода (електродвигуна):
# u(s)/i(s) == Wпр(s) ;  Wпр(s) := kp/(s*(Tp*s + 1)) ;
# Аналогічно отримуємо (див. на завдання) передаточну  функцію регулятора (це ПД-регулятор):  i(s)/X(s) == Wрег(s) ;  Wрег(s) := kr*(Tr*s + 1) .
# Дивимось на схему САУ, мисленно розмикаємо її,  і записуємо передаточну функцію (ПФ)
# розімкненої  САУ:  Wroz(s) := Wрег(s)*Wпр(s)*Wob(s) , підставляємо відповідні ПФ
# Wrz(s) := kr*(Tr*s + 1)*kp/((Tp*s + 1)*s)*1/((T1*s + 1)*(T2*s + 1))  ;
# Дивимось (в посібники, підручники, конспекти) і записуємо ПФ замкненої  САУ:  Wzs(s) := Wrz(s)/(1 + Wrz(s))
# Після ряду символьних операцій (в середовищі пакету) та редактирування того, що записано вище, отримуємо передаточну функцію замкненої САУ  в термінах вхідних  даних:
# Wzm(s) := (kr*kp*(Tr*s + 1))/(Tp*s^4*T1*T2 + (T1*T2 + Tp*T2 + Tp*T1)*s^3 + (T2 + T1 + Tp)*s^2 + (kr*kp*Tr + 1)*s + kr*kp)
# В солідних  пакетах символьний процесор входить в Д-набір наукових отмичок. Для освоєння отримаємо вирази  для ПФ розімкненої  і замкненої систем "в числах": kp*kr*(Tr*s + 1)/((Tp*s + 1)*s)*1/((T1*s + 1)*(T2*s + 1)) expand, s; simplify; collect, s; float, 1 → 50*(5.*s + 2.)/(s*(s + 5.)*(s + 2.)*(2.*s + 1.))
kr*kp*(Tr*s + 1)/(Tp*s^4*T1*T2 + (T1*T2 + Tp*T2 + Tp*T1)*s^3 + (T2 + T1 + Tp)*s^2 + (kr*kp*Tr + 1)*s + kr*kp) expand, s; simplify → 50.*(5.*s + 2.)/(2.*s^4 + 15.*s^3 + 27.*s^2 + 260.*s + 100.)
# Підшліфовуємо (!вручну?) робочі вирази, що видав символьний процесор і перевіримо їх  порівнянням з "некрасивими", але коректними виразами символьного процесора (задаємо довільне тестове значення s := 11 )
# Wразомкн(s) := 10*(2.5*s + 1)/(s*(0.2*s + 1)*(0.5*s + 2.)*(2.*s + 1))  перевіримо
# 10*(2.5*s + 1)/(s*(0.2*s + 1)*(0.5*s + 1)*(2.*s + 1)) == 5.*10^1*(5.*s + 2.)/((s + 5.)^1.*s^1.*(s + 2.)^1.*(2.*s + 1.)^1.) = 1 - точно
# Wзамкн(s) := 100*(2.5*s + 1)/(2*s^4 + 15*s^3 + 27*s^2 + 260*s + 100)  Wzm(s) == Wзамкн(s) = 1- істинно
# Згадуємо сучасні і класичні прописні істини (  Підшліфовуємо (!вручну?) робочі вирази, що видав символьний процесор і перевіримо їх  порівнянням з "некрасивими", але коректними виразами символьного процесора (задаємо довільне тестове значення s := 11 )
# Wразомкн(s) := 10*(2.5*s + 1)/(s*(0.2*s + 1)*(0.5*s + 2.)*(2.*s + 1))  перевіримо
# Пропозиція:  оцей  і  оцей  вирази  еквівалентні
# 10*(2.5*s + 1)/(s*(0.2*s + 1)*(0.5*s + 1)*(2.*s + 1)) == 5.*10^1*(5.*s + 2.)/((s + 5.)^1.*s^1.*(s + 2.)^1.*(2.*s + 1.)^1.) = 1 - точно
# Wзамкн(s) := 100*(2.5*s + 1)/(2*s^4 + 15*s^3 + 27*s^2 + 260*s + 100)
# Пропозиція:  Wzm(s) == Wзамкн(s) = 1- істинна
# Згадуємо класичні і сучасні прописні істини (π)
# π1. В тексті програми (робочого виразу) не повинно бути чисел
# π2. Програма більше 7 (семи) рядків не відлагоджується
# π3. Забороняється виконувати будь-які алгебраїчні перетворення вручну при
# виконанні службових обов'язків
10*(2.5*s + 1)/(s*(0.2*s + 1)*(0.5*s + 1.)*(2.*s + 1)) = 0.0541578
2.84/2.686 = 1.05733
5.*10^1*(5.*s + 2.)/((s + 5.)^1.*s^1.*(s + 2.)^1.*(2.*s + 1.)^1.) = 0.0541578
# 2. Записуємо дифрівняння і характеристичне рівняння замкненої САУ
# Дивимось на знаменник  (і підручники)  ПФ замкненої  САУ і записуємо:
# Tp*s^4*T1*T2 + (T1*T2 + Tp*T2 + Tp*T1)*s^3 + (T2 + T1 + Tp)*s^2 + (kr*kp*Tr + 1)*s + kr*kp == 0
Tp*T1*T2*d^4/dt^4(X) + (T1*T2 + Tp*T2 + Tp*T1)*d^3/dt^3(X) + (T2 + T1 + Tp)*d^2/dt^2(X) + (kr*kp*Tr + 1)*d/dt(X) + kr*kp*X == 0
# Факультатив
# Перечитаємо π1 - π3 і запишемо характеристичне рівняння САУ в такому виді:
# A4(Tp, T1, T2) := 1  A3(Tp, T1, T2) := (T1*T2 + Tp*T2 + Tp*T1)/(Tp*T1*T2)  A2(Tp, T1, T2) := (T2 + T1 + Tp)/(Tp*T1*T2) ;
# A1(Tp, T1, T2, Tr, kr, kp) := (kr*kp*Tr + 1)/(Tp*T1*T2) ;  A0(Tp, T1, T2, kr, kp) := (kr*kp)/(Tp*T1*T2) .
# A4(Tp, T1, T2)*s^4 + A3(Tp, T1, T2)*s^3 + A2(Tp, T1, T2)*s^2 + A1(Tp, T1, T2, Tr, kr, kp)*s + A0(Tp, T1, T2, kr, kp) == 0
# Можна піти далі  - ввести вектор параметрів САУ vp і вектор коефіцієнтів характеристичного рівняння vA: Харпол(s, vA(vp)) == sum(vA(vp)[i]*s^i, i = 0 .. length(vA))  ..тоді  все буде компактним і узагальненим.
# 3. Отримання АЧХ, ФЧХ розімкненої системи. Побудова АФЧХ
# Читаємо відповідні розділи посібників і посібників і отримуємо відповідні характеристики.
# В ПФ розімкненої  системи  підствляємо i := sqrt(-1)  s := i*ω
# Перша альтернатива: використання вбудованих  функцій пакету (модуль і аргумент комплексної  змінної):
# АЧХ:  A(ω) := |Wrz(1i*ω)|  ;  ФЧХ  φ(ω) := arg(Wrz(1i*ω)) ;
#
# Друга альтернатива - вручну, або  за допомогою символьного процесора отримуємо явні вирази для амплітудної частотної характеристики - АЧХ
# Ay(ω) := kr*kp*sqrt(ω^2*Tr^2 + 1)/(ω*sqrt((1 + T2^2*ω^2)*(1 + T1^2*ω^2)*(1 + Tp^2*ω^2))) ;
# і фазової частотної  характеристики - ФЧХ (між іншим, це алгебраїчна сума ФЧХ елементарних  ланок на які може бути розбита лінійна динамічна система):
# φa(ω) := atan(Tr*ω/1) - atan((Tp*ω)/1) - atan((T1*ω)/1) - atan((T2*ω)/1) - π/2 ;  трохи спрощуємо:
# φa(ω) := atan(Tr*ω) - atan(Tp*ω) - atan(T1*ω) - atan(T2*ω) - π/2.
# Задаємо ран жовану змінну - частоту  ω := 0.01, 0.06 .. 100 , будуємо відповідні графіки
Wrz(s) := kr*(Tr*s + 1)*kp/((Tp*s + 1)*s)*1/((T1*s + 1)*(T2*s + 1))
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Wrz(i*w) → (-2)*1i*(12.5*1i*w + 5)/((.2*1i*w + 1)*w*(.5*1i*w + 1)*(2*1i*w + 1))
-2*1i*(12.5*1i*w + 5)/((.2*1i*w + 1)*w*(.5*1i*w + 1)*(2*1i*w + 1)) expand; simplify; collect, w → 50.*((-5.)*w + 2.*1i)/(w*(2.*1i*w^3 + 15.*w^2 - 27.*1i*w - 10.))
.
# Побудова АФЧХ. Будуємо цю  характеристику двома альтернативними способами - в полярних координатах, як залежність амплітуди  від фази (полярний графік ліворуч), і як залежність уявної (не воображаемой, а мнимой) частині  N(ω) := Im(Wrz(1i*ω)) від дійсної частини (реальной)  M(ω) := Re(Wrz(1i*ω)) . Будуємо також одиничне коло: y(ω) := 1*sin(ω)  ; x(ω) := 1*cos(ω) - воно потрібне для визначення запасів стійкості.
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# 4. Побудова асимптотичної ЛАЧХ розімкненої системи
# Будуємо логарифмічну амплітудно-частотну характеристику двома альтернативними методами:
# - А1 просто використовуємо вбудовану опцію пакету - логарифмічні масштаби по осях.  побудови асимптотичної ЛАЧХ виконаємо перетворення.
# - А2 (факультатив) будуємо асимптотичну "натуральну" ЛАЧХ (беремо логарифми від змінних).
# Передаточну функцію розімкненої системи розкладаємо на елементарні ланки. Використовуємо замість постійних часу зворотні величини - "власні частоти":
# ωp := 1/Tp  ;  ω1 := 1/T1 ;  ω2 := 1/T2 ;  ωr := 1/Tr
# Wrz(s) := kp*kr/((Tp*s + 1)*s)*(Tr*s + 1)/((T1*s + 1)*(T2*s + 1))  розбиваємо цей вираз:
# Wrz(s) := (kp*kr/s)*1/(Tp*s + 1)*1/(T1*s + 1)*1/(T2*s + 1)*(Tr*s + 1)  виносимо відповідні постійні часу
# Wrz(s) := kp*kr*Tr/(Tp*T1*T2)*1/s*1/(s + ωp)*1/(s + ω1)*1/(s + ω2)*(s + ωr)
# По останньому виразу неважко побудувати асимптотичну ЛАЧХ.
# Формуємо ранжовану змінну для логаримічних характеристик.  Diap := 100000000 ; Kolhag := 50 ;  j := -1 .. Kolhag  ; lhag := log(Diap)/Kolhag ; ω1(j) := 10^(j*lhag)  lw := -1, lhag - 1 .. log(Diap)
# Формуємо функції користувача для ЛАЧХ елементарних  ланок
# - інтегральна:  lin(lw, T) := (log(1/T) - lw) ;
# - апериодична:  lap(lw, T) := Φ(lw - log(1/T))*(log(1/T) - lw) ;
# - коливальна:  lkol(lw, T) := Φ(lw - log(1/T))*(log(1/T) - 2*lw)
#
# - форсуюча:  lfo(lw, T) := Φ(lw - log(1/T))*(lw - log(1/T)) .
# Збираємо з цих функцій асимптотичну ЛАЧХ для розімкненої  САУ.
# ЛAЧХ(lw) := lap(lw, Tp) + lap(lw, T1) + lap(lw, T2) + lfo(lw, Tr) + lin(lw, 1/(kp*kr)).
# Підставляємо у вираз для асимптотичної ЛАЧХ параметри Wraz(s) СВОГО варіанта і будуємо - асимптотичну ЛАЧХ, її складові та  точну ЛАЧХ - для порівняння і контроля.
lkol(lw, T) := Φ(lw - log(1/T))*(log(1/T) - 2*lw)
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# Висновки (про  користність ЧХ для інженера)
# Зразок виконання
# РГЗ 1.2 Отримання і аналіз передаточних функцій та
# часових характеристик САУ
# Задано: структурна схема САУ та передаточні функції її елементів
# 1. Отримати передаточні функції для розімкненої і замкненої системи.
# 2. Записати дифрівняння і характеристичне рівняння замкненої САУ.
# 3. Побудувати графік перехідного процесу
# 4. Визначити параметри перехідного процесу**  (якщо  стійкий)
# kp := 2 ; kr := 0.01 ; T1 := 0.5 ;  T2 := 2 ; Tp := 0.2  ; Tr := 17  ; Xz(t) == 0
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T1*T2*d^2/dt^2(X) + (T1 + T2)*d/dt(X) + X == u
Tp*d^2/dt^2(u) + 1*d/dt(u) == kp*i
# Розкладай на елементарні ланки!
i == kr*(Tr*d/dt(X) + X)
# 1. Отримання передаточних функцій для розімкненої і замкненої системи.
# Передаточну функцію обєкта отримаємо замінивши (формально! - деталі читай в підручниках) в дифрівнянні  X(t)  => X(s)  ;  d/dt(X(t)) => s*X(s) ... :
# T1*T2*d^2/dt^2(X) + (T1 + T2)*d/dt(X) + X == u  F T1*T2*s^2*X(s) + (T1 + T2)*s*X(s) + X(s) == u(s)
# Дивимось: на характеристичне рівняння, в підручник і записуємо передаточну функцію обєкта, придивляємось до знаменника і подаємо його добутком елементарних ланок:
# Wob(s) == X(s)/u(s) == 1/(T1*T2*s^2 + (T1 + T2)*s + 1)F Wob(s) := 1/((T1*s + 1)*(T2*s + 1))
# Аналогічно отримуємо (див. на завдання) передаточну  функцію привода (електродвигуна):
# u(s)/i(s) == Wпр(s) ;  Wпр(s) := kp/(s*(Tp*s + 1)) ;
# Аналогічно отримуємо (див. на завдання) передаточну  функцію регулятора (це ПД-регулятор):  i(s)/X(s) == Wрег(s) ;  Wрег(s) := kr*(Tr*s + 1) .
# Дивимось на схему САУ, мисленно розмикаємо її,  і записуємо передаточну функцію (ПФ)
# розімкненої  САУ:  Wroz(s) := Wрег(s)*Wпр(s)*Wob(s) , підставляємо відповідні ПФ
# Wrz(s) := -kr*(Tr*s + 1)*kp/((Tp*s + 1)*s)*1/((T1*s + 1)*(T2*s + 1))  ;
# Дивимось (в посібники, підручники, конспекти) і записуємо ПФ замкненої  САУ:  Wzs(s) := Wrz(s)/(1 + Wrz(s))
# Після ряду символьних операцій (в середовищі пакету) та редактирування того, що записано вище, отримуємо передаточну функцію замкненої САУ  в термінах вхідних  даних:
# Wzm(s) := (kr*kp*(Tr*s + 1))/(Tp*s^4*T1*T2 + (T1*T2 + Tp*T2 + Tp*T1)*s^3 + (T2 + T1 + Tp)*s^2 + (kr*kp*Tr + 1)*s + kr*kp)
# В солідних  пакетах символьний процесор входить в Д-набір наукових отмичок. Для освоєння отримаємо вирази  для ПФ розімкненої  і замкненої систем "в числах": kpl*krl*(Trl*sl + 1)/((Tpl*s1 + 1)*sl)*1/((T1l*sl + 1)*(T2l*sl + 1)) expand, s1; collect, sl; simplify → kpl*krl*(Trl*sl + 1)/((Tpl*s1 + 1)*sl*(T1l*sl + 1)*(T2l*sl + 1))
s := 1
s := s
# Отримуємо такий такий результат
# в символьному виді (тимчасово приліпили літеру "l"
# до усіх змінних, щоб у мати безчислові змінні. Потім "l" зняли
Wz(s) == kp*kr*(Tr*s + 1)/((Tp*s + 1)*s*(T1*s + 1)*(T2*s + 1))
kr*kp*(Tr*s + 1)/(Tp*s^4*T1*T2 + (T1*T2 + Tp*T2 + Tp*T1)*s^3 + (T2 + T1 + Tp)*s^2 + (kr*kp*Tr + 1)*s + kr*kp) expand, s; simplify; float, 3 → (17.*s + 1.)/(10.*s^4 + 75.*s^3 + 135.*s^2 + 67.*s + 1.)
# Отримуємо такий результат
# "в числах"
Wz(s) == (17.*s + 1.)/(10.*s^4. + 75.*s^3. + 135.*s^2. + 67.*s + 1.)^1.
# 2. Записуємо дифрівняння і характеристичне рівняння замкненої САУ
# Дивимось на знаменник (і в підручники)  ПФ замкненої  САУ і записуємо:
# Tp*s^4*T1*T2 + (T1*T2 + Tp*T2 + Tp*T1)*s^3 + (T2 + T1 + Tp)*s^2 + (kr*kp*Tr + 1)*s + kr*kp == 0
# К1.  Приведення диференційного рівняння до форми Коші
# Маємо диференційне рівняння 4-го порядку:
Tp*T1*T2*d^4/dt^4(X) + (T1*T2 + Tp*T2 + Tp*T1)*d^3/dt^3(X) + (T2 + T1 + Tp)*d^2/dt^2(X) + (kr*kp*Tr + 1)*d/dt(X) + kr*kp*X == 0
# Визначимо його кооефіцієнти
# A4 := 1 ;  A3 := (T1*T2 + Tp*T2 + Tp*T1)/(Tp*T1*T2) ;  A2 := (T2 + T1 + Tp)/(Tp*T1*T2) ;
# A1 := (kr*kp*Tr + 1)/(Tp*T1*T2) ;  A0 := (kr*kp)/(Tp*T1*T2) .  Для даних варіанту вони дорівнюють:
# A4 = 1;  A3 = 7.5;  A2 = 13.5  ; A1 = 6.7 ;  A0 = 0.1
# В цих  означеннях маємо:
# A4*d^4/dt^4(X) + A3*d^3/dt^3(X) + A2*d^2/dt^2(X) + A1*d/dt(X) + A0*X == 0
# Задаємо крок обчислень:  ORIGIN := 1  T := .25
# Приводимо задане дифрівняння до форми Коші. Для цього вводимо нові змінні:
# x[1] == X ;  x[2] == d/dt(X) ;  x[3] == d^2/dt^2(X) ;  x[4] == d^3/dt^3(X)  тобто  d/dt(x1) == x2 ; d/dt(x2) == x3 ;d/dt(x3) == x4 ; а останнє рівняння отримуємо підстановкою нових  змінних  в дифрівняння замкненої  системи
# Подаємо систему у матрично-векторному вигляді:  dх/dt == А*х  де A := [0, 1, 0, 0; 0, 0, 1, 0; 0, 0, 0, 1; -A0, -A1, -A2, -A3] , а  х - вектор стану. Запишемо систему в розгорнутому виді. Навіщо? - тому що всі лінійні і лінеаризовані системи "вписуються" в таку модель:  dх/dt == А*х + B*u + D*v , де u - вектор управління,  v - вектор збурень. На цій моделі базується вся сучасна теорія управління. Якщо не засвоїти її (цю модель), то її (сучасну ТАУ) можна і не вивчати... В цій роботі робимо перший крок. Подивимось на канонічну модель динаміки одновимірної  системи в розгорнутому виді: .
# [d/dt(x1); d/dt(x2); d/dt(x3); d/dt(x4)] == [0, 1, 0, 0; 0, 0, 1, 0; 0, 0, 0, 1; -A0, -A1, -A2, -A3]*[x1; x2; x3; x4] == [0 + x2 + 0 + 0; 0 + 0 + x3 + 0; 0 + 0 + 0 + x4; -A0*x1 - A1*x2 - A2*x3 - A3*x4]
A := [0, 1, 0, 0; 0, 0, 1, 0; 0, 0, 0, 1; -A0, -A1, -A2, A3]
# К2.  Подання розв'язання диференційного рівняння в формі Коші
# Читаємо посібники і підручники, узнаємо, що розвязання рівняння  dх/dt == А*х  має вид
# (ще одна форма Коші)  x(t2) == e^(A*(t2 - t1))*x(t1)  F x(t2) == F(t2, t1)*x(t1) ,
# де F(t2, t1) - перехідна функція функці стану . Моделювання САУ, управління виконуються за допомогою мікропроцесорів, мікроконтролерів - дискретних пристроїв, що обробляють дані з певним кроком квантування Т , в нашому випадку за таким алгоритмом:
# x((k + 1)*T) == F(T)*x(k*T)  F в стандартній формі так:  x[:, k + 1] == F(T)*x[:, k] .
# Матрична експонента  e^(A*Т)  наближується (нескінченим) степеневим рядом:
# F2(T) == I + A*T + A^2*T^2/2! + A^3*T^3/3! + A^4*T^4/4! + ......
# Обмежимось наближенням другого порядку для Перехідної Функції Стану (ПФС, не плутаємо з ПФ - передаточною функцією, що залежить від змінної s). Подаємо ПФС як функцію кроку квантування Т  I := identity(4) .  ORIGIN := 1  Задаємо початковий стан САУ:
# F2(T) := I + A*T + A^2*T^2/2!  F2(T) = [ 1, 0.25, 0.03125, 0; 0, 1, 0.25, 0.03125; -0.003125, -0.209375, 0.578125, 0.484375; -0.0484375, -3.24844, -6.74844, 4.21094 ]  x[:, 1] := [-0.1; 0; 0; 0]
# Задаємо період моделювання, крок квантування та кількість кроків  T := 0.1  k := 1 .. 50
# Записуємо робоче рівняння, за яким обчислюється перехідний процес
# x[:, k + 1] := F2(T)*x[:, k]
# Виводимо таблицю і графік процесу
x = [
    -0.1, -0.1, -0.0999998, -0.0999971, -0.0999868, -0.0999576, -0.0998887, -0.099743, -0.099457, -0.0989256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;
    0, 0, 1.1875e-5, 6.03471e-5, 0.000189888, 0.000477294, 0.0010513, 0.00212277, 0.00403075, 0.00731185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;
    0, 5e-5, 0.000285688, 0.000863348, 0.00204122, 0.0042374, 0.0081176, 0.0147265, 0.0256829, 0.0434663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;
    0, 0.001375, 0.00398067, 0.00864121, 0.016657, 0.0300526, 0.0519426, 0.0870665, 0.142562, 0.229075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]
Wrz(i*w) → (-2)*1i*((-.17)*1i*w - 0.01)/((.2*1i*w + 1)*w*(.5*1i*w + 1)*(2*1i*w + 1))
-2*1i*(12.5*1i*w + 5)/((.2*1i*w + 1)*w*(.5*1i*w + 1)*(2*1i*w + 1)) expand; simplify; collect, w → 50.*((-5.)*w + 2.*1i)/(w*(2.*1i*w^3 + 15.*w^2 - 27.*1i*w - 10.))
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# Процес виявився нестійким  - закон управління для системи 4 порядку занадто зпрощений:
# настроювання і снтез регуляторів - центральний момент ТАУ - в наступних РГЗ
# Підсумки  (список операцій аналізу  і отриманих характеристик):
# 1. Частотні характеристики:
# 1.1 визначили
# 1.2 обчислили
# 1.3 побудували
# 2. Часові характеристики:
# 2.1 визначили
# 2.2 обчислили
# 2.3 побудували
