# footer: © В.Северілов, Т.Боровська
# Т2.1.1 Синтез та дослідження САУ
# з "швидким" імпульсним регулятором
# Теоретичні основи швидких регуляторів та методичні вказівки подано в розділі 1.2
#
# Задача
# Задано об'єкт управління  X[:, k + 1] == F(T)*X[:, k] + G(T)*B*u[k] ,  де
# T == 0.8 - крок квантування, k - номер крока квантування
# F(T) == [1, T, 0; 0, 1, T; -1*T1, -3*T1, 1 - 3*T]  ;  G(T) == [T, 0, 0; 0, T, 0; 0, 0, T]  ;  X == [X[1]; X[2]; X[3]] ; B == [0; 0; 1] ;
# Рівняння регулятора:  u[k] == X[1, k]*K[1] + X[2, k]*K[2] + X[3, k]*K[3]
# 1. Знайти параметри [K[1], K[2], K[3]] імпульсного  закону управління ("швидкого регулятора") , що забезпечують перехідний для довільного початкового стану тривалістю точно в три такти квантування.
# 2. Розробити програму моделювання динаміки керованої системи.
# 3. Побудувати графіки перехідного процесу.
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# 1. Знаходження параметрів [K[1], K[2], K[3]] "швидкого регулятора"
# Швидкий регулятор відноситься до класу регуляторів по вектору стану, а метод його синтезу є окремим випадком метода стандартних коефіцієнтів.
# Виконаємо синтез (розрахунок параметрів) регулятора у загальному виді.
# Порядок розрахунку параметрів регулятора є таким:
# 1) отримати характеристичне рівняння для замкненої системи у загальному вигляді (задані параметри об'єкта та невідомі параметри регулятора входять як символьні змінні;
# 2) прирівняти загальні вирази при коефіціентах характеристичного рівняння їх потрі- бним значенням. Потрібні значення, згідно з теорією УКЧУ, повинні бути усі =0
# 3) розв'язати якимось методом систему рівнянь (вона може бути і нелінійною) - отримуємо пошукуваня значення параметрів регулятора.
# Випишемо вхідні дані  задачі (згідно варіанту завдання):
# Замість заданих числових параметрів об'єкта введемо "вектор коефіцієнтів":
# .ORIGIN := 1 .  A[3] := -3 ;  A[2] := -2 ;  A[1] := -1;  ;  крок квантування  T := 0.8
#
# За поданим нижче прикладом самостійно для свого варіанту набираємо (в своєму документі) тільки робочі рівняння.
# Записуємо  матриці F, G, B - згідно завданню.
# Об'єкт управління  X[:, k + 1] == F(T)*X[:, k] + G(T)*B*u[k] ,  де  (1)
# T = 0.8 - крок квантування, k - номер крока квантування
# F(A, T) := [1, T, 0; 0, 1, T; A[1]*T, A[2]*T, 1 + A[3]*T] ;  G(T) := [T, 0, 0; 0, T, 0; 0, 0, T]  ;  X == [X[1]; X[2]; X[3]] ; B := [0; 0; 1] ;
# Рівняння регулятора:  u[k] == X[1, k]*K[1] + X[2, k]*K[2] + X[3, k]*K[3]  (2) Введемо означення:  і виводимо для контролю:
# K := [K1; K2; K3]  ;  I := identity(3)  ;  transpose(K) → [K1, K2, K3]  I = [1, 0, 0; 0, 1, 0; 0, 0, 1]
# Записуємо характеристичне рівняння (для його отримання підставляємо (2) в (1), виконуємо Z-перетворення і алгебраїчні перетворення)  Читається цей вираз: "детермінант матриці .. повинен дорівнювати  нулю. Нижче виводимо цю матрицю для контролю.  |I*z - (F(A, T) + G(T)*B*transpose(K))| == 0  (3)
# I*z - (F(A, T) + G(T)*B*transpose(K)) → [z - 1, -0.8, 0; 0, z - 1, -0.8; -0.8*K1 + 0.8, -0.8*K2 + 1.6, z - 0.8*K3 + 1.4]  .
# Розкриваємо і спрощуємо визначник (3)  за допомогою символьного процесора
solve block
    # guess values
    K1 := -244/255
    K2 := -27/16
    K3 := -3/4
    K := [K1; K2; K3]
    # constraints
    -0.8*K3 - 0.6 == 0
    1.6*K3 - 0.64*K2 + 0.12 == 0
    0.64*K2 - 0.51*K1 - 8.0*10^-3 - 0.8*K3 == 0
    # solver
    ksi_ := Find(K)
end solve block
|I*z - (F(A, T) + G(T)*B*transpose(K))|
# Отримали Z-характеристичне рівняння лінійної імпульсної системи:
z^3. + (-0.8*K3 - 0.6)*z^2. + (1.6*K3 - 0.64*K2 + 0.12)*z + (0.64*K2 - 0.51*K1 - 8.0*10^-3 - 0.8*K3) == 0
# Прирівнюємо його коефіцієнти до нуля - отримуємо систему з трьох рівнянь для трьох невідомих - параметрів "швидкого" регулятораК1, К2, К3. Розвязуємо цю систему за допомогою вбудованого методу (підпрограми) "Given - Find"
# 1. Задаємо початкові значення змінних:
# 2. Після ключового слова  Given  записуємо систему рівнянь:
#
# 3. Пишемо, що ми власне шукаємо (вектор коефіцієнтів К)  і виводимо результат
# transpose(ksi_) = [-0.956863, -1.6875, -0.75]
# Знайшли параметри регулятора.
# Альтернативний метод визначення параметрів регулятора.  Факультатив
# В загальному випадку вирази для коефіцієнтів є занадто великими. Існує альтерна- тивний метод визначення коефіцієнтів -  без отриманння явних виразів для коефіцієнтів.
# Можна записати вираз для характеристичного рівняння (4) у ще більш компактному виді:
# |(I*z - Mp)| == 0  ; де  Mp(K_, T_) := F(A, T_) + G(T_)*B*transpose(K_)  ;  (4)
# Вибираємо орієнтований на використання сучасних пакетів метод [8]. "неявні вирази для коефіціентів характеристичного рівняння", при якому не треба розкривати детермі- нант. Визначимо такі функції користувача:
# I := identity(3)  ;  determinant(K_, T_, z_) := |I*z_ - Mp(K_, T_)|;
# polinom(V2_, V1_, V0_, z_) := (z_^3 + V2_*z_^2 + V1_*z_ + V0_)  (5)
solve block
    # guess values
    V0 := 0
    V1 := 0
    V2 := 0
    K1 := 2
    K2 := 2
    K3 := -99
    z1 := 1
    z2 := 0
    z3 := -5
    K := [K1; K2; K3]
    # constraints
    polinom(V2, V1, V0, z1) == determinant(K, T, z1)
    polinom(V2, V1, V0, z2) == determinant(K, T, z2)
    polinom(V2, V1, V0, z3) == determinant(K, T, z3)
    # solver
    KoReg(T) := Find(K)
end solve block
# Тепер задаємо потрібні значення коефіціентів V2, V1, V0 характеристичного рівняння. Згідно завданню потрібно синтезувати "швидкий" регулятор, для якого перехідний процес закінчується за N кроків (в даному випадку N=3). Для забезпеченння цього усі корені характеристичного рівняння  повинні бути: Zi = 0; i = 1.. N. Це означає , що усі коефіцієнти характеристичного рівняння, крім першого, повинні бути нульовими Vi = 0; i = 0.. N-1.
# Задаємо потрібні значення коефіціентів V:
# початкові значення  пошукуваних параметрів
# деякі значення  Записуємо (в означеннях (5)) систему рівнянь для коефіцієнтів і розв'язуємо ¿¿ вбудованим методом "Given - Find".
# Given  (= дано)
#
# <== Пишемо, що ми власне шукаємо.
# З точки зору математики тут написано "функція змінної Т дорівнює функції іншої змінної К" - таке можливе, коли ці функції  є константами. З точки зору програмування (С++) це: визначимо функцію користувача через функцію  "Given - Find". Транслятор знайде вирази (6), функції (5) побачить, як там входить Т  і зкомпілює програму, що буде знаходити розв'язання  системи рівнянь (6) для заданого Т.
# Виводимо результат синтезу, порівнюємо з отриманим альтернативним методом:
# T = 0.8 ; KoReg(T) = [-0.953125; -2.6875; -0.75] ;  ksi_ = [-0.956863; -1.6875; -0.75]- якщо не збіглося, десь помилки.
ORIGIN := 1
# 2. Розробка програми моделювання динаміки керованої системи
# В середовищі пакету дуже просто побудувати програму моделювання - вирази для різницевих рівнянь є виконувані. Необхідно тільки задати кількість кроків моделювання та інші параметри. Переписуємо рівняння (1), підставляємо в нього рівняння регулятора (2), а в рівняння регулятора підставляємо знайдені параметри  ( ks - коефіцієнт синтезований)
#
# Задаємо  Nq := 9  ;  k := 1 .. Nq  ;  початковий стан  ψχ := [-1, 0, 0] ;  X[:, 1] := transpose(ψχ) / Записуємо рівняння процесу (скоротіть запис)
# X[:, k + 1] := F(A, T)*X[:, k] + G(T)*B*(X[1, k]*ksi_[1] + X[2, k]*ksi_[2] + X[3, k]*ksi_[3]) .
# Виводимо результат: X = [ -1, -1, -1, 0.00191373, 0.00191373, 0.643139, -3.66235e-6, 0.41038, -0.412842, 0.262646; 0, 0, 1.25239, 0, 0.801531, -0.803928, 0.51298, -1.02903, 0.844359, -0.987866; 0, 1.56549, -1.56549, 1.00191, -2.00682, 1.64613, -1.92751, 2.34173, -2.29028, 2.736 ]
transpose([-1; 0; 0]) → [-1, 0, 0]
# [plot: X[1, k]*1, X[2, k]*0.5, X[3, k]*0.2 vs k]
# Ввод кроку квантування T ≡ .8  ;
# Початковий стан X[:, 1] = [-1; 0; 0]
# Параметри об'єкта  A → [-1; -2; -3]
# Параметри
# регулятора  ksi_ = [-0.956863; -1.6875; -0.75]
# Додаток
# АЛЬТЕРНАТИВА. Можна ж зробити це і у вигляді звичної програми  - ну як на Паскалі:
ПрМ(x0) :=
    x[:, 1] ← x0
    for n ∈ 1 .. Nq
        upr ← x[1, n]*ksi_[1] + x[2, n]*ksi_[2] + x[3, n]*ksi_[3]
        x[:, n + 1] ← F(A, T)*x[:, n] + G(T)*B*upr
    x
x1 := [.3; .3; .2]
x2 := [-.1; -.3; .2]
x3 := [-0.5; 0.3; 0.2]
# [plot: ПрМ(x1)[1, k], ПрМ(x2)[1, k], ПрМ(x3)[1, k] vs k]
# Ми зробили програму функцієї від початкового стану.
# Будуємо перехідні процеси для різних початкових станів.
# Бачимо - все сходиться до заданого кінцевого стану, завжди з а три кроки.
