# footer: © В.Северілов, Т.Боровська
# Т2.1.2 Синтез та дослідження САУ
# з довільним імпульсним регулятором
# Теоретичні основи швидких регуляторів та методичні вказівки подано в розділах 1.2, 2.2.
#
# Задача
# Задано об'єкт управління  X[:, k + 1] == F(T)*X[:, k] + G(T)*B*u[k] ,  де
# T == 0.8 - крок квантування, k - номер крока квантування
# F(T) == [1, T, 0; 0, 1, T; -1*T1, -3*T1, 1 - 3*T]  ;  G(T) == [T, 0, 0; 0, T, 0; 0, 0, T]  ;  X == [X[1]; X[2]; X[3]] ; B == [0; 0; 1] ;
# Рівняння регулятора:  u[k] == X[1, k]*K[1] + X[2, k]*K[2] + X[3, k]*K[3]
# 1. Знайти параметри [K[1], K[2], K[3]] імпульсного  закону управління що забезпечує задані параметри перехідного процесу: тривалість Tpp := 5  і викид  hmp := 0.2  .
# 2. Розробити програму моделювання динаміки керованої системи.
# 3. Побудувати графіки перехідного процесу.
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# 1. Знаходження параметрів [K[1], K[2], K[3]]  регулятора
# Порядок розрахунку параметрів регулятора є таким:
# 1) отримати характеристичне рівняння для замкненої системи у загальному виді (задані параметри об'єкта та невідомі параметри регулятора входять як символьні змінні;
# 2) прирівняти загальні вирази при коефіціентах характеристичного рівняння їх потрі- бним значенням.
# 3) розв'язати якимось методом систему рівнянь (вона може бути і нелінійною) - отримуємо пошукуваня значення параметрів регулятора.
# Випишемо вхідні дані  задачі (згідно варіанту завдання):
# Замість заданих числових параметрів об'єкта введемо "вектор коефіцієнтів":
# .ORIGIN := 1 .  A[3] := -3 ;  A[2] := -3 ;  A[1] := -1;  ;  крок квантування  To = 0.2
# За поданим нижче прикладом самостійно для свого варіанту набираємо (в своєму документі) тільки робочі рівняння.
ORIGIN := 1
N := 30
l := -1, -.9 .. 1
my := .4
sy := -.5
n := 1 .. N
mx := 4
sx := 25
v[n] := mx*cos(.3*n) + sx
y[n] := my*sin(.3*n) + sy
# Знайдемо залежності коефіцієнтів характеристичного рівняння від коренів. Неважко довести, що у алгебраїчного рівняння третього порядку з дійсними коефіцієнтами може бути або три дійсних кореня, або один дійсний і два комплексних. Тому можемо подати корені у такому виді: Z1 == Re + IM*1i; Z2 == Re - IM*1i ; Z3 == Z3, де re - дійсна,  im - уявна частини. Згідно теоремі алгебри алгебраічне рівняння так записується через корені:
(Z - Z1)*(Z - Z2)*(Z - Z3) == (Z - (Re + IM*1i))*(Z - (Re - IM*1i))*(Z - Z3) expand, Z →  # no stored result; disabled
# Використовуємо послідовно опції expand  та collect (подаємо тільки результати - для прикладу (самостійно записати рівняння повністю). Великі і малі літери використовуємо, щоб відділити змінні для символьних перетворень - без числових значень і змінні, яким присвоюються числові значення.  )
Z^3 - Z^2*Z3 - 2*Z^2*Re + 2*Z*Re*Z3 + Re^2*Z - Re^2*Z3 + IM^2*Z - IM^2*Z3 collect, Z →  # no stored result; disabled
Z^3 + (-Z3 - 2*Re)*Z^2 + (Re^2 + IM^2 + 2*Re*Z3)*Z - Re^2*Z3 - IM^2*Z3
# Записуємо аналітичні вирази для коефіцієнтів різницевого рівняння, як функцій коренів характеристичного рівняння (вивід виразів не подається).
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E2(im, re, z3) := -2*re - z3
E1(im, re, z3) := (im^2 + re^2) + 2*re*z3  # (1)
E0(im, re, z3) := -(im^2 + re^2)*z3
# Початкові умови для розрахунку ПП:  Крок обчислень:
x[1] := -1
x[2] := -1
x[3] := -1
To = 0.2
# Записуємь різницве рівняння лінійного процесу третього порядку:
x[n + 3] := -E2(im, re, z3)*x[n + 2] - E1(im, re, z3)*x[n + 1] - E0(im, re, z3)*x[n]
# Обчислюємо показники ПП, а саме: тривалість ПП та викид (перерегулювання):
k := N, N - 1 .. 4
Tpp[k] := if(|x[k]| > .05, k*To, 0)
ТривД := max(Tpp)
ВикидД := max(x)
ТривЗ := Tpz
t[n] := To*n
t[30] = 6  # ñåê
ТрЗ := ТривЗ/To
ТрД := ТривД/To
ВикидЗ := hmz
# Обчислюємо допоміжні дані для побудови "стенду":
z1 := re - im*1i
z2 := re + im*1i
i3 := sy
r3 := mx*z3 + sx
r2 := mx*re + sx
r1 := r2
i2 := sy + my*im
i1 := sy - my*im
# [plot: x[n], y[n], i3, i2, i1 vs n, v[n], r3, r2, r1]
# Вводимо (підбираємо) параметри  z-коренів:
# re ≡ .4  im ≡ 0.5  z3 ≡ -.4
# Виводимо значення коренів:
# z1 = 0.4 - 0.5i
# z2 = 0.4 + 0.5i
# z3 = -0.4
# Тривалість ПП:
# дійсна  ТривД = 1.8 с ;
# задана  ТривЗ = 5  с.
# Викид:
# дійсний  ВикидД = 25.538*1%
# заданий  ВикидЗ = 20*1%
# Крок квантування To ≡ 0.2
# Задаємо вимоги до ПП тривалість ПП  Tpz ≡ 5 ;
# викид  hmz ≡ 0.2.
# Рис.2  Вибір еталонного перехідного процесу
#
# Виводимо значення коефіцієнтів еталонного характеристичного рівняння:
# E0(im, re, z3) = 0.164 ;  E1(im, re, z3) = 0.09  ;  E2(im, re, z3) = -0.4.
# Тепер, коли вибрано значення коренів, які забезпечують потрібну якість ПП, вводимо нові означення для коефіціентів  Z-характеристичного рівняння (це тепер константи).
# Vtr[1] := E0(im, re, z3)  ;  Vtr[2] := E1(im, re, z3)  ; Vtr[3] := E2(im, re, z3)  .
# Контроль. Ніколи не відомо де і як виникне помилка в програмі розрахунку САУ. Перевіряємо: а) характеристичне  рівняння дійсно = 0 при підстановці кореня; б) корені отриманого еталонного характеристичного рівняння - ті ж самі, що ми задавали.
# 1*z2^3 + E2(im, re, z3)*z2^2 + E1(im, re, z3)*z2 + E0(im, re, z3) = 0;
# polyroots([E0(im, re, z3); E1(im, re, z3); E2(im, re, z3); 1]) = [-0.4; 0.4 - 0.5i; 0.4 + 0.5i];  [z3; z2; z1] = [-0.4; 0.4 + 0.5i; 0.4 - 0.5i].
# Записуємо  матриці F, G, B - згідно завданню.
# Об'єкт управління  X[:, k + 1] == F(T)*X[:, k] + G(T)*B*u[k] ,  де  (1)
# To = 0.2 - крок квантування, k - номер кроку квантування
# F(A, T) := [1, T, 0; 0, 1, T; A[1]*T, A[2]*T, 1 + A[3]*T] ;  G(T) := [T, 0, 0; 0, T, 0; 0, 0, T]  ;  X == [X[1]; X[2]; X[3]] ; B := [0; 0; 1] ;
#
# Рівняння регулятора:  u[k] == X[1, k]*K[1] + X[2, k]*K[2] + X[3, k]*K[3]  (2) Введемо означення:  і виводимо для контролю:
# K := [K1; K2; K3]  ;  I := identity(3)  ;  transpose(K) → [K1, K2, K3]  I = [1, 0, 0; 0, 1, 0; 0, 0, 1]
solve block
    # guess values
    K1 := -108
    K2 := -219/4
    K3 := -10
    K := [K1; K2; K3]
    # constraints
    -0.2*K3 - 2.4 == Vtr[3]
    0.4*K3 - 4.*10^-2*K2 + 1.9 == Vtr[2]
    4*10^-2*K2 - 8*10^-3*K1 - 0.51 - 0.2*K3 == Vtr[1]
    # solver
    ksi_ := Find(K)
    K → [-108; -219/4; -10]
end solve block
# Записуємо характеристичне рівняння (для його отримання підставляємо (2) в (1), виконуємо Z-перетворення і алгебраїчні перетворення)  Читається цей вираз: "детермінант матриці .. повинен дорівнювати  нулю. Нижче виводимо цю матрицю для контролю.  |I*z - (F(A, T) + G(T)*B*transpose(K))| == 0  (3)
# I*z - (F(A, T) + G(T)*B*transpose(K)) → [z - 1, -T, 0; 0, z - 1, -T; T - T*K1, 3*T - T*K2, 3*T + z - T*K3 - 1]  .
# Розкриваємо і спрощуємо визначник (3)  за допомогою символьного процесора
|I*z - (F(A, To) + G(To)*B*transpose(K))| collect, z; float, 2 → 0.04*K2 - 0.2*K3 + z^3 - z^2*(0.2*K3 + 2.4) + z*(0.4*K3 - 0.04*K2 + 1.9) - 0.008*K1 - 0.51
# Отримали Z-характеристичне рівняння лінійної імпульсної системи:
z^3 + (-.2*K1 - 2.4)*z^2. + (.4*K3 - 4.*10^-2*K[2] + 1.9)*z + (4*10^-2*K2 - 8*10^-3*K1 - .51 - .2*K3) == 0
# Прирівнюємо його коефіцієнти до нуля - отримуємо систему з трьох рівнянь для трьох невідомих - параметрів "швидкого" регулятораК1, К2, К3. Розвязуємо цю систему за допомогою вбудованого методу (підпрограми) "Given - Find"
# 1. Задаємо початкові значення змінних:  K[1] := 1  ;  K[2] := -2  ;  K[3] := -3 .
# 2. Після ключового слова  Given  записуємо систему рівнянь:
# -.2*K[3] - 2.4 == Vtr[3] ; .4*K[3] - 4.*10^-2*K[2] + 1.9 == Vtr[2] ; 4*10^-2*K[2] - 8*10^-3*K[1] - .51 - .2*K[3] == Vtr[1]
# 3. Пишемо, що ми власне шукаємо (вектор коефіцієнтів К)  і виводимо результат
# ksi_ == Find(K)  ;  transpose(ksi_) = [-108, -54.75, -10]
# Знайшли параметри регулятора.
# Тут подано альтернативний метод визначення параметрів регулятора.  Факультатив
# В загальному випадку вирази для коефіцієнтів є занадто великими. Існує альтерна- тивний метод визначення коефіцієнтів -  без отриманння явних виразів для коефіцієнтів.
# Можна записати вираз для характеристичного рівняння (4) у ще більш компактному виді:
# |(I*z - Mp)| == 0  ; де  Mp(K_, T_) := F(A, T_) + G(T_)*B*transpose(K_)  ;  (4)
# Вибираємо орієнтований на використання сучасних пакетів метод [8]. "неявні вирази для коефіціентів характеристичного рівняння", при якому не потрібно розкривати детермі- нант. Визначимо такі функції користувача:
# I := identity(3);  determinant(K_, T_, z_) := |I*z_ - Mp(K_, T_)|;
# polinom(V2_, V1_, V0_, z_) := (z_^3 + V2_*z_^2 + V1_*z_ + V0_)  (5)
solve block
    # guess values
    V0 := Vtr[1]
    V1 := Vtr[2]
    V2 := Vtr[3]
    K1 := -108
    K2 := -219/4
    K3 := -10
    # constraints
    polinom(V2, V1, V0, z1) == determinant(K, T, z1)
    polinom(V2, V1, V0, z2) == determinant(K, T, z2)
    polinom(V2, V1, V0, z3) == determinant(K, T, z3)
    # solver
    KoReg(To) := Find(K)
    KoReg(To) =  # error: These units are not compatible.
end solve block
# Тепер задаємо потрібні значення коефіціентів V2, V1, V0 характеристичного рівняння. Згідно завданню потрібно синтезувати "швидкий" регулятор, для якого перехідний процес закінчується за N кроків (в даному випадку N=3). Для забезпеченння цього усі корені характеристичного рівняння  повинні бути: Zi = 0; i = 1.. N.
# Задаємо потрібні значення коефіціентів V:  V0 := Vtr[1] ;  V1 := Vtr[2] ;  V2 := Vtr[3] ,
# початкові значення  пошукуваних параметрів K[1] := 2 ;K[2] := 2; K[3] := -99 ,
# деякі значення  z1 := 1;  z2 := 0;  z3 := -5. Записуємо (в означеннях (5)) систему рівнянь для коефіцієнтів і розв'язуємо її вбудованим методом "Given - Find".
# Given  (= дано)  polinom(V2, V1, V0, z1) == determinant(K, T, z1)  ;
# polinom(V2, V1, V0, z2) == determinant(K, T, z2)  ;  (6)
# polinom(V2, V1, V0, z3) == determinant(K, T, z3)  .
# KoReg(T) := Find(K)  <== Пишемо, що ми власне шукаємо
# З точки зору математики тут написано "функція змінної Т дорівнює функції іншої змінної К" - таке можливе, коли ці функції  є константами. З точки зору програмування (С++) це: визначимо функцію користувача через функцію  "Given - Find". Транслятор знайде вирази (6), функції (5) побачить, як там входить Т  і зкомпід.є програму, що буде знаходити розв'язання  системи рівнянь (6) для заданого Т.  ї
# Виводимо результат синтезу, порівнюємо з отриманим альтернативним методом:
# To = 0.2 ; KoReg(To) =  - якщо не збіглося, десь там помилки.
transpose(ksi_) = [-108, -54.75, -10]
# 2. Розробка програми моделювання динаміки керованої системи
# В середовищі пакету дуже просто побудувати програму моделювання - вирази для різницевих рівнянь є виконуємими. Нам потрібно тільки задати кількість кроків моделювання та інші параметри. Переписуємо рівняння (1), підставляємо в нього рівняння регулятора (2), а в рівняння регулятора підставляємо знайдені параметри  ( ks - коефіцієнт синтезований)
# Задаємо  Nq := 40  ;  k := 1 .. Nq  ;  початковий стан  ψχ := [-1, 0, 0] ;  X[:, 1] := transpose(ψχ) . Записуємо рівняння процесу
# X[:, k + 1] := F(A, To)*X[:, k] + G(To)*B*(X[1, k]*ksi_[1] + X[2, k]*ksi_[2] + X[3, k]*ksi_[3]) .
#
# Виводимо результат:
X = [
    -1, -1, -1, -0.128, 0.2208, 0.2644, 0.102208, -0.0239704, -0.0636638, -0.0393865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;
    0, 0, 4.36, 1.744, 0.218, -0.81096, -0.630892, -0.198467, 0.121387, 0.172591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;
    0, 21.8, -13.08, -7.63, -5.1448, 0.90034, 2.16212, 1.59927, 0.256019, -0.423776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]
# [plot: X[1, k]*1, X[2, k]*0.5, X[3, k]*0.2 vs k]
# Ввод кроку
# квантування To = 0.2  ;
# Початковий стан X[:, 1] = [-1; 0; 0]
#
# Параметри об'єкта A = [-1; -3; -3]
#
# Регулятор ksi_ = [-108; -54.75; -10]
# Додаток
# АЛЬТЕРНАТИВА. Можна ж зробити це і у вигляді звичної програми  - як на Паскалі:
# Ми зробили програму функції від початкового стану.
# Будуємо перехідні процеси для різних початкових станів.
ПрМ(x0) :=
    x[:, 1] ← x0
    for n ∈ 1 .. Nq
        upr ← x[1, n]*ksi_[1] + x[2, n]*ksi_[2] + x[3, n]*ksi_[3]
        x[:, n + 1] ← F(A, To)*x[:, n] + G(To)*B*upr
    x
x1 := [.3; .3; .2]
x2 := [-.1; -.3; .2]
x3 := [-0.5; 0.3; 0.2]
# [plot: ПрМ(x1)[1, k], ПрМ(x2)[1, k], ПрМ(x3)[1, k] vs k]
