# footer: © В.Северілов, Т.Боровська
# Т2.2.1 Синтез та дослідження САУ
# з "швидкими" регулятором та спостерігачем
# Вступ
# Постановка задачі
# Задано об"єкт управління  X[:, k + 1] == F(T)*X[:, k] + G(T)*B*u[k] ,  де
# T == 0.8 - крок квантування,  k - номер крока квантування
# F(T) == [1, T; 0, 1]  ;  G(T) == [T, 0; 0, T]  ;  X == [X[1]; X[2]] ; B == [0; 1] ;
# Рівняння регулятора:  u[k] == X[1, k]*K[1] + X[2, k]*K[2] , де K[1] , K[2]  - параметри регулятора .
# Компонент вектору стану Х2 не вимірюється, а вектор стану оцінюється за допомогою асимптотичного ідентифікатора.
# Рівняння вимірювачів: Y[k] == C*X[k] ;  рівняння моделі вимірювачів: Yn[k] == C*Xn[k]  , де
# С == [1, 0; 0, 0] - матриця вимірювання;  Xn == [Xn[1]; Xn[2]] - оцінка вектору стану (вихід)
# 1. Скласти систему рівнянь для повної системи (згідно рис.1)
# 2. Знайти такі параметри імпульсного закону управління ("швидкий регулятор"), та спостерігача ("швидкий спостерігач"),  що забезпечують повній системі перехідний процес (з довільного початкового стану) тривалістю точно в чотири такти квантування.
# 3. Розробити програму моделювання динаміки керованої системи.
# 4. Побудувати графіки перехідного процесу.
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# Рис.1 Структурна схема системи з регулятором.
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# Рис.2 Структурна схема системи з асимптотичним ідентифікатором (неперервна система)
# 1. Cистема рівнянь для повної системи (згідно рис.2)
# Неперервна система.:
# об'єкт  d/dt(X) == A*X + B*U  ; вимірювачі  Y == C*X ;  cпостерігач  = модель об'єкта:  d/dt(Xn) == A*Xn + B*U + L*(Yn - Y) ; модель вимірювачів  Yn == C*Xn  ;
# регулятор  U == K*Xn . для управління використовується оцінка вектору стану Xn.
# Дискретна (імпульсна) система:
# об'єкт  Xo[:, k + 1] == F(T)*Xo[:, k] + G(T)*B*u[:, k]  ; вимірювачі  Y[:, k] == C*X[:, k] ;
# cпостерігач  = модель об'єкта:  Xn[:, k + 1] == F(T)*Xn[:, k] + G(T)*B*u[:, k] + G(T)*L*C*ΔX[:, k] ; модель вимірювачів  Yn[:, k] == C*Xn[:, k]  ;  ΔX == (Xn - X)
# регулятор  u[:, k] == K*Xn[:, k - 1] . для управління використовується оцінка вектору стану Xn.
# 2. Визначення параметрів
# "швидкого" регулятора, та "швидкого" спостерігача.
# Одна з головних властивостей спостерігача вектора стану  в тому, що корені основ- ного контуру залежать тільки від параметрів регулятора, а корені контуру спостерігача залежать тільки від параметрів спостерігача. Це дозволяє розраховувати параметри регулятора і спостерігача НЕЗАЛЕЖНО, що ми і зробимо. Спочатку:
# 2.1 Знаходження параметрів [K[1], K[2]] "швидкого регулятора"
# Швидкий регулятор відноситься до класу регуляторів по вектору стану, а метод його синтезу є окремим випадком метода стандартних коефіцієнтів.
# Порядок розрахунку параметрів регулятора є таким:
# 1) отримати характеристичне рівняння для замкненої системи у загальному виді (задані параметри об'єкта та невідомі параметри регулятора входять як символьні змінні;
# 2) прирівняти загальні вирази при коефіціентах характеристичного рівняння їх потрібним значенням.
# 3) розв'язати якимось методом систему рівнянь (вона може бути і нелінійною) - отримуємо пошукуваня значення параметрів регулятора.
#
# Випишемо вхідні дані  задачі :  .ORIGIN := 1
# Задано об"єкт управління  X[:, k + 1] == F(T)*X[:, k] + G(T)*B*u[k]  ,  де
# T := 0.8  - крок квантування,  QQ := 10 ;  k := 1 .. QQ  - номер кроку квантування
# F(T) := [1, T; 0, 1]  ;  G(T) := [T, 0; 0, T]  ;  X := [X[1]; X[2]] ; B := [0; 1] ;  K := [K[1]; K[2]]
# Рівняння регулятора:  u[k] := (X[1, k]*K[1] + X[2, k]*K[2]) , де K[1] , K[2]  - параметри регулятора .
#
# Компонент вектору стану Х2 не вимірюється, а вектор стану оцінюється за допомогою асимптотичного ідентифікатора.
# Рівняння вимірювачів: Y[k] := C*X[k] ;  рівняння моделі вимірювачів: Yn[k] := C*Xn[k]  , де
# С := [1, 0; 0, 0] - матриця вимірювання;  Xn := [Xn[1]; Xn[2]] - оцінка вектору стану (вихід)
I := identity(2)
# - контроль
I = [1, 0; 0, 1]
transpose(K) → [K[1], K[2]]
# Записуємо характеристичне рівняння (для його отримання підставляємо (2) в (1), виконуємо Z-перетворення і алгебраїчні перетворення)  Читається цей вираз:"детермінант матриці .. повинен дорівнювати  нулю. Нижче виводимо цю матрицю для контролю.
|I*z - (F(T) + G(T)*B*transpose(K))| == 0  # (3)
I*z - (F(T) + G(T)*B*transpose(K)) → [z - 1, -0.8; -0.8*K[1], z - 0.8*K[2] - 1]
# Розкриваємо детермінант
|I*z - (F(T) + G(T)*B*transpose(K))| collect, z → z^2 - (0.8*K[2] + 2.0)*z + 0.8*K[2] - 0.64*K[1] + 1.0
# Нарешті  записуємо характеристичне рівняння
z^2 + (-0.8*K[2] - 2)*z + (0.8*K[2] - .64*K[1] + 1) == 0
# Прирівнюємо його коефіцієнти до нуля - отримуємо пару рівнянь. Елементарних, але,
-0.8*K[2] - 2 == 0
0.8*K[2] - 0.64*K[1] + 1 == 0
# розв"яжемо їх розв"язальним блоком математичного пакета:
# задаємо початкові значення змінних
K[1] := 2003
K[2] := -1333
solve block
    # constraints
    -0.8*K[2] - 2 == 0
    0.8*K[2] - 0.64*K[1] + 1 == 0
    # solver
    Kры := Find(K)
end solve block
Kры = [-1.5625; -2.5]
# 2.2 Знаходження параметрів [L[1], L[2]] "швидкого спостерігача"
# Порядок синтезу спостерігача такий же як і для синтезу регулятора. Скопіюємо і відпо- відні блоки попереднього розділу, скоротимо коментарі, виконаємо необхідні модифікації.  Запишемо задану матрицю  вимірювання С та матрицю L пошукуваних параметрів спостерігача.
C := [1, 0; 0, 0]
L := [ls[1], 0; ls[2], 0]  # error: This variable is undefined. Check that the label is set correctly.
L*C → [ls[1], 0; ls[2], 0]
# З пункту 1 (виконання задачі) виписуємо рівняння состерігача спостерігача:
# Xn[:, k + 1] == F(T)*Xn[:, k] + G(T)*B*u[:, k] + G(T)*L*C*Δy[:, k] ;  (1)
# модель вимірювачів  Yn[:, k] == C*Xn[:, k]  ;  Δy[:, k] == C*(Xn[:, k] - X[:, k])  (2)
# Підставляємо (2) в (1) і записуємо рівняння власного (без зовнішніх дій) руху обсервера (X u - це зовнішні дії для контуру спостерігача):
# Xn[:, k + 1] == F(T)*Xn[:, k] + G(T)*L*C*Xn[:, k] == (F(T) + G(T)*L*C)*Xn[:, k]
# Виконуємо Z-перетворення і отримуємо Z-характеристичне рівняння
# (I*z - (F(T) + G(T)*L*C))*z^k*Xn(z) == 0  ;
|I*z - (F(T) + G(T)*L*C)| == 0
I*z - (F(T) + G(T)*L*transpose(C)) → [z + (-0.8*ls[1]) - 1, -0.8; -0.8*ls[2], z - 1]
# Розкриваємо детермінант
|I*z - (F(T) + G(T)*L*C)| collect, z → z^2 + (-(0.8*ls[1]) - 2.0)*z + 0.8*ls[1] - 0.64*ls[2] + 1.0
# Нарешті  записуємо характеристичне рівняння  спостері гача
z^2 + (-0.8*ls[1] - 2)*z + (0.8*ls[1] - 0.64*ls[2] + 1) == 0
# Прирівнюємо його коефіцієнти до нуля - отримуємо пару рівнянь. Елементарних, але,
-0.8*ls[1] - 2 == 0
0.8*ls[1] - 0.64*ls[2] + 1 == 0
# щоб не думати, розв"яжемо їх розв"язальним блоком математичного пакета:
# задаємо початкові значення змінних
ls[1] := 2003
ls[2] := -1333
solve block
    # constraints
    -0.8*ls[1] - 2 == 0
    0.8*ls[1] - 0.64*ls[2] + 1 == 0
    # solver
    Lно := Find(ls)
end solve block
Lно = [-2.5; -1.5625]
# 3. Розробка програми моделювання динаміки керованої системи;
# 4. Побудовка графіків перехідного процесу.
# Так можна ж зробити це і у вигляді звичної програми  - ну як на Паскалі:
X_почат := [-0.5; 0]
Xn_кове := [-0.4; 0]
L := [Lно[1], 0; Lно[2], 0]
[X; Xn] :=
    ORIGIN ← 1
    x[:, 1] ← X_почат
    xn[:, 1] ← Xn_кове
    for n ∈ 1 .. QQ
        Δx[:, n] ← xn[:, n] - x[:, n]
        upr ← xn[1, n]*Kры[1] + xn[2, n]*Kры[2]
        x[:, n + 1] ← F(T)*x[:, n] + G(T)*B*upr
        xn[:, n + 1] ← F(T)*xn[:, n] + G(T)*B*upr + G(T)*L*C*Δx[:, n]
    [x; xn]
X_почат = [-0.5; 0]
Xn_кове = [-0.4; 0]
X = [-0.5, -0.5, -0.1, 0.3, 0, 0, 0, 0, 0, 0, 0; 0, 0.5, 0.5, -0.375, 0, 0, 0, 0, 0, 0, 0]
Xn = [-0.4, -0.6, -0.1, 0.3, 0, 0, 0, 0, 0, 0, 0; 0, 0.375, 0.5, -0.375, 0, 0, 0, 0, 0, 0, 0]
# [plot: X[1, k]*1, Xn[1, k], X[2, k], Xn[2, k] vs k]
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