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# Наблюдение
# Вінницький державний технічний університет
# Кафедра компютерних систем  управління
# @  Боровська Т.М.,  Северілов В.А.
# Теорія автоматичного управлінння
# Лабораторна робота ¹ 2.1 Дослідження САУ з спостерігачем вектора стану.
# Синтез неперервної САУ з спостерігачем
# Ціль роботи - освоєння методів синтезу типових систем управління - з спостерігачем вектору стану.
# Постановка задачі. Розглянемо конкретну задачу. Для робота-прибиральника великих  виробничих приміщень потрібно розробити підсистему управління положенням робота відносно лінії розмітки проходів. Особливість підсистеми в тому, що параметри моделі динаміки залежать від  швидкості руху, а швидкість руху задається іншою підсистемою в залежності від характеристик  шляху. Вимірюється відхилення (Y) робота від  лінії розмітки швидкість - dY/dt  не вимірюється, або вимірюється із значними завадами і похибками. Для прецізійного управління необхідно досить точно знати вектор стану  (Y, dY/dt).
# Необхідно розрахувати  і дослідити регулятор по вектору стану з спостерігачем (ідентифікатором), що формує для  регулятора на базі виміреного відхилення Y , оцінку швидкості dY/dt. Далі подано схему об'єкта та  блок-схему системи (в стандартних означеннях).
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# Завдання
# Для свого варіанту даних:
# 1. Побудувати структурну схему САУ з спостерігачем*  5б
# 2. Обгрунтувати вибір методу синтезу і критерія оптимальності  САУ*  10б
# 3. Отримати еквівалентну дискретну модель САУ*  15б
# 4. Визначити параметри регулятора по вектору стану  20б
# 5. Визначити параметри спостерігача  вектора стану  15б
# 6. Розробити програму моделювання САУ для випадків: а) САУ з спостерігачем,
# б) САУ без спостерігача, + факультатив: г) при наявності завад у вимірювачі
# швидкості  25б
# 7. Оцінити можливостіі потенціальні змішаного управління з використанням і
# вимірювача швидкості і спостерігача стану.  10б
# Варіанти завдань
# Т1, l- параметри  об'єкта;
# Th, hm -показники якості перехідного  процесу;
# Варіація - параметр, резуль- тати зміни  якого треба дослідити.
[
    Варіант, 1, 2, 3, 4, 5, 6, 7, 8, 9, 10, 11, 12, 13, 14, 15;
    T1, 1, 1, 1, .5, .5, 2, 2, 1, 1, 1, .5, .5, 2, 2, 1.1;
    λ, .2, .7, 1.2, .5, 1, .1, 2, .3, .4, 1, .6, .9, .2, 2, .2;
    Tp, 8, 4, 5, 9, 9, 4, 5, 8, 4, 5, 9, 9, 4, 5, 8;
    hm, 0, .3, .2, 0, .15, .15, .3, 0, .3, .2, 0, .15, .15, 3, 0;
    Варіація, l1, l2, l1, l2, l1, l2, l1, k1, k2, k1, k2, k1, k2, k1, k2
]
[
    Варіант, 16, 17, 18, 19, 20, 21, 22, 23, 24, 25, 26, 27, 28, 29, 30;
    T1, .9, .8, .6, .6, 1.9, 1.9, 1, 1, 1.1, .5, .5, 1.5, 1.2, .9, 1.1;
    λ, .2, .8, 1.1, .6, 1.1, .2, 1.5, .4, .3, 1.1, .7, 1, .1, 1.4, .4;
    Tp, 4, 4, 5, 5, 2, 2, 8, 5, 3, 6, 7, 8, 6, 3, 7;
    hm, 0, .2, .1, 0, .3, .15, .3, 0, .3, .2, .05, .06, .25, 3, 0;
    Варіація, k1, l2, k1, l2, l1, k2, l1, k1, l2, l1, k2, k1, l2, l1, k2
]
# Зразок виконання
# 1 Побудувати структурну схему САУ з спостерігачем.
# Теоретичні відомості.  Спостерігач (інші назви: динамічний компенсатор, асимптотичний ідентифікатор) використовуючи безпосередньо вимірювані компоненти вектора стану  Х і вектор управління  u дає оцінку усього вектора стану (але може оцінювати тільки невимірювані компоненти вектору стану). Це завжди можливе, якщо система СПОСТЕРІГАЛЬНА, а модель об'єкта ТОТОЖНА "ІСТИННІЙ" моделі. Структурно це модель об"єкта із зворотним зв"язком по помилкам оцінки вимірюваних координат
# Структурна схема САУ зі спостерігачем  На цій схемі:
# Х - вектор стану; х - оцінка вектора стану ;Y - вектор вимірювань; U- вектор управління.
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# 2. Обгрунтувати вибір методу синтезу і критерія оптимальності  САУ.  10б
# Сьогодні для синтезу використовуються такі методи синтезу - метод ЛАЧХ - зруч- ний для безмашинного визначення параметрів регулятора, але приблизний і незручний для багатомірних САУ; метод кореневих годографів - теж приблизний, графоаналі- тичний, зручний для оціночних розрахунків, група аналітичних методів коструювання регуляторів, до яких належить метод стандартних коефіціентів. Цей метод зручний для формалізації і алгоритмізації, його суттєва перевага в тому, що процедуру синтезу можна повністю віддати ЦОМ, зробити онлайновою -параметри регулятора периодично обчислюються в процесі функціонування САУ. Недоліки методу - чутливість до розмір- ності об"єкта. Для поставлених цілей переваги має цей метод. Вибір критерія - у п. 4  !!
# 3. Отримати еквівалентну дискретну модель САУ.  1б
# Записуємо вхідні дані - передаточні функцію об'єкта управління  та регулятора
# ДАНО:
Х(s)/U(s) == W(s) == ko/(T1^2*s^2 + 2*λ*T1*s + 1)
U(s)/Y(s) == Wr(s) == k1 + k2*s
# Згідно завданню вимірюється тільки координата - записуємо відповідну цьому випадку матрицю вимірювання . Рівняння вимірювань:Y = C*X,  де X, Y- вектори стану та вимірювань, а C - матриця вимірювань.
C := [1, 0; 0, 0]
X := [x1; x2]  # error: This variable is undefined. Check that the label is set correctly.
Y := C*X
Y → [x1; 0]
# Спочатку приведемо до стандартної форми Коші неперервну ММ САУ. Переходимо від передаточних функцій до дифрівнянь (виконуємо зворотне перетворення Лапласа), враховуємо визначення спостерігача  і записуємо дифрівняння повної системи. ВИВЕДІТЬ рівняння (1) САМОСТІЙНО  -  обов'язково. В цих рівняннях принято означення:  X1 - координата, x1 - оцінка координати;  При виводі рівнянь спостерігача дивимось на структурну схему (виходимо із цієї схеми).
# Підставимо у (1) рівняння регулятора  U = k1*x1+k2*x2 (поки вважаємо , що регулятор використовує тільки оцінки координат х1 та х2).
# ь
# ъ
# ъ
# э  (1)
# ъ
# ъ
# ю
d/dt(X2) == -1/T1^2*X1 - 2*λ/T1*X2 + ko/T1^2*U
d/dt(X1) == X2
d/dt(x1) == x2 + l1*(x1 - X1)
d/dt(x2) == -1/T1^2*x1 - 2*λ/T1*x2 + ko/T1^2*U + l2*(x1 - X1)
# Запишемо також рівняння регулятора у матрично векторному виді:
U == K*x  # тобто:
U == [k1; k2]*[x1, x2] == k1*x1 + k2*x2  # (2)
# Підстановку рівняння (2) в (1) і алгебраічні перетворення можна виконати засобами математичного пакету. Отримали нарешті систему з 4-ох дифрівнянь з 4-ма невідомими Х1, Х2, х1, х2. Вводимо нові змінні D1 = x1-X1; D2 = x2-X2 і розширений вектор стану: Хr=(X1,X2,D1,D2). Записуємо систему (1) у матрично-векторному виді:
# Для початку наведемо приклад отримання деяких основних параметрів:
# Отримання виразу для матриці M1 == [A + B*K, B*K; 0, A + L*C]  символьним процесором
# Дано:
Lс := [l1, 0; l2, 0]
Aс := [0, 1; -1/T1с^2, -2*λс/T1с]
Bс := [0; ko/T1с^2]
Kс := [k1с, k2с]
# Вводимо означення для матрицних виразів (необов"язково)
A_BK := Aс + Bс*Kс
A_LC := Aс + Lс*C
O := [0, 0; 0, 0]
# Розкриваємо ці вирази,
# дивимось на них ,
# для контролю
A_BK expand, 1; collect, T1с → [0, 1; (ko*k1с - 1)/T1с^2, (ko*k2с - 2*T1с*λс)/T1с^2]
A_LC expand, 1 → [l1, 1; l2 - 1/T1с^2, -2*λс/T1с]
Bс*Kс expand, 1 → [0, 0; ko*k1с/T1с^2, ko*k2с/T1с^2]
# Отак формуємо матрицю М1:
M1 == [A + B*K, B*K; 0, A + L*C]
Mc := augment(stack(A_BK, O), stack(Bс*Kс, A_LC))
# Оце маємо остаточний результат. Його можна скопіювати та підставити куди завгодно
Mc expand, 1 → [
    0, 1, 0, 0;
    ko*k1с/T1с^2 - 1/T1с^2, ko*k2с/T1с^2 - 2*λс/T1с, ko*k1с/T1с^2, ko*k2с/T1с^2;
    0, 0, l1, 1;
    0, 0, l2 - 1/T1с^2, -2*λс/T1с
]
# А далі продовжуємо основні обрахунки:
# де М1 - блочна матриця замкненої
# системи з спостерігачем
d/dt(Xr) == M1*Xr
M1 == [A + B*K, B*K; 0, A + L*C]  # (3а)
# вводимо параметри об'єкта згідно варіанту:
a2 := 1
a1 := 2
a0 := 0.1
T1 := 0.8
λ := .2
ko := 1
hm := 0
Tp := 2
ORIGIN := 1
# Дивлячись на повну систему рівнянь (1) записуємо вирази для матриць A, B, K, L,C:
K(k1, k2) := [k1, k2]
A := [0, 1; -1/T1^2, -2*λ/T1]
B := [0; ko/T1^2]
C := [1, 0; 0, 0]
L(l1, l2) := [l1, 0; l2, 0]
# Завдання. Отримайте ці вирази для матриць САМОСТІЙНО.
# Зауваження. В спрощеній задачі синтезу спостерігача в матриці L досить взяти тільки два ненульових елементи. Підставляємо вирази для всіх складових матриць у  (3). Оскільки k1, k2, l1, l2 - пошукувані параметри, записуємо М1 як функцію цих параметрів.
# Завдання. Ну, за дуже великі бали отримайте вирази  (3б) та (4) символьним процесором
d/dt(x) == M1(k1, k2l1, l2)*x
# (3б)
# де
M1(k1, k2, l1, l2) := [
    0, 1, 0, 0;
    (k1 - 1)/T1^2, (k2 - 2*λ*T1)/T1^2, k1/T1^2, k2/T1^2;
    0, 0, l1, 1;
    0, 0, l2 - 1/T1^2, -2*λ/T1
]
x == [X1; X2; Δx1; Δx2]
Δx1 == x1 - X1
Δx2 == x2 - X2
# Для порівняльного аналізу, як еталон беремо САУ без спостерігача, дифрівняння якої у матрично-векторному виді подано нижче:
d/dt(X) == m1(k1, k2)*X
X == [X1; X2]
# де
m1(k1, k2) := [0, 1; (k1 - 1)/T1^2, (k2 - 2*λ*T1)/T1^2]  # (4)
# І тепер переходимодо отримання еквівалентної дискретної  моделі  (ЕДМ) САУ.  Використаємо для отримання такої моделі відому форму подання розв'язання дифрів- няння у формі Коші. Подаємо цю процедуру такою схемою:
d/dt(X(t)) == М*X(t)  # р
X(t2) == e^(М*(t2 - t1))*X(t1)  # р
X((k + 1)*T) == e^(М*T)*X(k*T)
# Розкладаючи матричну експоненту в ступеневий ряд Тейлора і обмежуючись конеч- ною кількістю членів ряда можемо отримати більш-менш еквівалентні дискретні моделі.
# Тут задаємо та змінюємо крок квантування, кількість кроків моделювання процесу.
dT := .25
kolhag := 60
n := 1 .. kolhag
I2 := identity(2)
I4 := identity(4)
# Обмежимся наближенням другого порядку для перехідні функції стану  САУ
# з спостерігачем
F(k1, k2, l1, l2) := I4 + M1(k1, k2, l1, l2)*dT + (M1(k1, k2, l1, l2)*dT)^2/2
# і еталонної САУ - без спостерігача
f(k1, k2) := I2 + m1(k1, k2)*dT + (m1(k1, k2)*dT)^2/2
# 4. Визначити параметри регулятора по вектору стану  20б
# 5 Визначити параметри спостерігача  вектора стану  15б
# Синтез САУ з спостерігачем - це знаходження для заданого об'єкта  управління параметрів  k1, k2, l1, l2, при яких управління відповідає заданим вимогам. Серед відомих типових критеріїв  вибираємо критерій "інтегралу від зваженого модуля помилки". Суть метода  в тому, що для поширених критеріїв знайдені значення потрібних коефіціентів  характеристичного рівняння замкненої САУ. Ці коефіціенти обчислені для нормалізованих характеристичних рівнянь (форма Вишнеградського з безрозмірним часом). Для конкретної САУ треба відповідно перерахувати ці коефіціенти. Потім прирівнюючи ці (потрібні для забезпечення заданого ПП)  виразам для коефіціентів характеристичного рівняння замкненої САУ знаходимо значення параметрів регулятора. Виконаємо це крок закроком
#
# FI. Отримання характеристичних рівнянь  Для отримання характеристичного рівняння основного контура беремо дифрівняння САУ без спостерігача і  виконаємо  перетворення Лапласа:
d/dt(X(t)) == (A + B*K)*X(t)
I*s*X(s) == (A + B*K)*X(s)
(I*s - A - B*K)*X(s) == 0  # (5)
# р | р
# Останнє рівняння в (5) є системою однорідних алгебраічних рівнянь, що має нетрівіальне розвязання,  якщо det|(I*s - A - B*K)| = 0. Розкриваючи цей визначник отримаємо характеристичне рівняння основного контуру:
|I*s - A - B*K| == det([s, -1; (1 - k1)/T1^2, s - (k2 - 2*λ*T1)/T1^2]) == s^2 + (2*λ*T1 - k2)/T1^2*s + (-k1 + 1)/T1^2 == 0
# Прирівнюємо коефіціенти при однакових ступенях в рівняннях  (6а)  та  (6г) і отримаємо два рівняння для визначення k1, k2.
s^2 + (2*λ*T1*(-k2))/T1^2*s + (1 - k1)/T1^2 == 0
# (6а)
s^2 + a1b*ω0*s + a0b*ω0^2 == 0  # (6г)
# Зробимо теж саме для контуру спостерігача:
|I*s - A - L*C| == det([s - l1, -1; 1/T1^2 - l2, s + 2*λ/T1]) == s^2 + (-l1 + 2/T1*λ)*s + (1/T1^2 - l2 - 2/T1*l1*λ) == 0
# (7а)
s^2 + A1b*ωn*s + A0b*ωn^2 == 0  # (7г)
# FII.Визначення власних частот w0, wn  Власна частоті для основного контуру визначається по формулі  w0 = Трb/Тр ,  де Трb - безрозмірна тривалість ПП для  вибраного розподілення коренів (береться з таблиць),  Тр - задана тривалість ПП. Для спостерігача тривалість ПП  береться в ¿¿=3-10 разів меншою:  Трн = Тр*¿¿
# Беремо з електроного довідника для критерія "інтеграл зваженого модуля помилки".
# Зводимо дані у таблицю:  Регулятор  Спостерігач
Tp := 9
її := .15
Tpn := її*Tp
# Задана тривалість ПП
# Безрозмірна тривалість ПП  Безрозмірні коефіціенти
# характеристичних рівнянь
tpb := 3.2
Tpb := 3.2
ω0 := tpb/Tp
ωn := Tpb/Tpn
a1b := 1.4
A1b := 1.4
a0b := 1
ω0 = 0.355556
A0b := 1
ωn = 2.37037
solve block
    # guess values
    k1 := -.3
    k2 := -.4
    # constraints
    (2*λ*T1 - k2)/T1^2 == a1b*ω0
    (1 - k1)/T1^2 == a0b*ω0^2
    # solver
    [K1; K2] := Find(k1, k2)
    [K1; K2] = [0.919091; 0.00142222]
end solve block
# FII². Розв'язання систем рівнянь для визначення  k1, k2, l1, l2. Записуємо (на основі (6а-6г), (7а- 7г) системи рівнянь для визначення k1, k2, l1, l2. В загальному випадку ці рівняння нелінійні. Для розв'язання використовуємо вбудовану функцію пакета - блок  Given - Find.
# Задаємо початкові значення параметрів регулятора:
# після слова "Given"  записуємо систему рівнянь:
k1 := -.3
k2 := -.4
Given  # disabled
(2*λ*T1 - k2)/T1^2 == a1b*ω0
(1 - k1)/T1^2 == a0b*ω0^2
# Записуємо, що ми шукаємо через функцію Find(..) і виводимо значення ПАРАМЕТРІВ РЕГУЛЯТОРА:  [K1; K2] := Find(k1, k2);
[K1; K2] = [0.919091; 0.00142222]
solve block
    # guess values
    l2 := 2
    l1 := 1
    # constraints
    2*λ/T1 - l1 == A1b*ωn
    -2*λ*l1/T1 + 1/T1^2 - l2 == A0b*ωn^2
    # solver
    [L1; L2] := Find(l1, l2)
end solve block
# Задаємо початкові значення параметрів спостерігача:
# після слова "Given"  записуємо систему рівнянь:
l1 := 1
l2 := 2
Given
2*λ/T1 - l1 == A1b*ωn
-2*λ*l1/T1 + 1/T1^2 - l2 == A0b*ωn^2
# Записуємо, що ми шукаємо через функцію Find(..) і виводимо значення ПАРАМЕТРІВ СПОСТЕРІГАЧА:  [L1; L2] := Find(l1, l2);
[L1; L2] = [-2.81852; -2.6469]
# 6 Розробити програму моделювання САУ для випадків: а) САУ з спостерігачем,
# б) САУ без спостерігача при наявності завад у вимірювачі швидкості  25
# Використовуючи отримані в п.3 перехідні функції стану F(.) та  f(.) записуємо різницьові рівняня для  САУ без  та з спостерігачем
n := 1 .. 75  # Задаємо початкові умови моделюванння цих САУ:
X[:, 1] := [-1; 0]
X[:, n + 1] := f(K1, K2)*X[:, n]  # (8)
x[:, 1] := [-1; 0; 0.5; 0]
x[:, n + 1] := F(K1*.8, K2*(-50), L1*.05, L2)*x[:, n]
xk[n] := x[1, n] + x[3, n]
xv[n] := x[2, n] + x[4, n]
# Ці рівняння - фактично програми обчислення перехідних процесів. Нижче подано приклад результатів - побудовано ПП для  спостерігача  з граничним значенням параметру L1 = 0.05*L1
# [plot: x[1, n], xk[n] vs n*dT]
# Прокоментуйте оці приклади перехідних процесів, знайдіть параметри L1,L2,K1,K2, за яких це отримано.
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# Контрольні запитання
# 1. Коли потрібен спостерігач в складі САУ?
# 2. Що таке спостерігач ("формула", блок-схема, рівняння)?
# 3. Функції спостерігача?
# 4.Необхідні умови длї коректної роботи спостерігача?
# 5. Чому може бути незадовільною САУ оптимальна  за інтегральним квадратичним, чи  якимсь іншим критерієм? (Чи існує "абсолютний критерій")
# 6. Головні недоліки спостерігача.
# 7. Що таке "форма Коші" для запису системи дифрівнянь (приклад).
# 8. Що таке "форма Коші" для запису розв"язання системи дифрівнянь  і "перехідна функція стану"  (приклади).
# Факультатив.
# Розробка ММ для моделювання:  САУ без спостерігача при наявності завад у вимірювачі швидкості. Для цього краще написати природно структуровану програму - так, щоб в ній були відображені "регулятор", "вимірювачі", "об"єкт", "спостерігач" - і от тоді легко буде виконати завдання 6 і 7 .
шум := 0.05
X[:, 1] := [-1; 0]
[X[1, n + 1]; X[2, n + 1]] := f(K1, K2)*[X[1, n]; X[2, n]] + [0; шум*(rnd(1) - 0.5)]
# (9)
# [plot: X[1, n], x[1, n], xk[n] vs n*dT]
# Аналогічно (САМОСТІЙНО) вводиться шум у матмодель САУ з спостерігачем. При амплітуді шума 5-10% від максимального значення х2 бачимо, що САУ без спостерігача незадовільна. Останнє завдання пов'язане з цією проблемою:
# 7. Оцінити потенціальні можливості  змішаного управління з використанням і вимірювача швидкості і спостерігача стану. -  10 б
# Саме така потенціальна можливість реалізується фільтром Калмана. Він структурно іден- тичний спостерігачу, але параметри L1 i L2 розраховуються як результат  складної оптимі- заційної задачі. Словесна суть цієї оптимізації - чим менше рівень завад тим більше  L1 i L2 - тобто в регулятор подаються фактично вимірені координати, і навпаки чим більше  завади, тим менше  L1 i L2 - в регулятор подаються фактично модельні оцінки координат, зроблені майже автономним спостерігачем.
#
# Фільтр Калмана має багато недоліків і спираючісь на сучасну практику автоматичного управління.  Можна реалізувати процедуру настройки L1 i L2 на рівень і статистичні характеристики завад (шумів) за допомогою fuzzy-контролера, що випускаються навіть у виді спецмікросхем.
Х(s)/U(s) == W(s) == ko/(T1^2*s^2 + 2*λ*T1*s + 1)
T1^2*d^2/dt^2(X1) + 2*λ*T1*d/dt(X1(t)) + X1 == U
U(s)/X1(s) == Wr(s) == k1 + k2*s
k1*d/dt(X1(t)) + k2*X1(t) == U(t)
X2 == d/dt(X1)
X := [X1; X2]  # error: This variable is undefined. Check that the label is set correctly.
K == [k1, k2]
U == [k1, k2]*[x1; x2] == k1*x1 + k2*x2
C := [1, 0; 0, 0]
Y := C*X  # error: This variable is undefined. Check that the label is set correctly.
Y → [X1; 0]
x == [x1; x2]
solve block
    # constraints
    (2*λc*T1c - k2)/T1c^2 == aa1*ω0c
    (1 - k1)/T1c^2 == aa0*ω0c^2
    # Розв"язуємо систему рівнянь у символьному видісуємо, що ми шукаємо через функцію Find(..) і :
    Find(k1, k2) → Find(-0.3, -0.4)
end solve block
# Теж саме робимо для спостерігача
solve block
    # constraints
    2*λс/T1с - l1 == Aa1*ωnc
    -2*λc*l1/T1c + 1/T1c^2 - l2 == Aa0*ωnc^2
    # Записуємо, що ми шукаємо через функцію Find(..) і
    Find(l1, l2) → [
        (2*λс - Aa1*T1с*ωnc)/T1с;
        (2*Aa1*λc*T1с*T1c*ωnc - Aa0*T1с*T1c^2*ωnc^2 - 4*λc*λс*T1c + T1с)/(T1c^2*T1с)
    ]
end solve block
simplify
-Aa0*ωnc^2 + (-4*λc*λс + 2*λc*Aa1*ωnc*T1с)/(T1с*T1c) + 1/T1c^2 simplify; collect, T1c; expand, T1c → 1/T1c^2 - Aa0*ωnc^2 - 4*λc*λс/(T1c*T1с) + 2*Aa1*λc*ωnc/T1c
# Програма майже не потребує коментарів.
# Нагадаємо тільки означення:
#
# Хо - вектор стану об"єкта;
#
# Хn - вектор стану
# спостерігача, (тобто оцінка вектору стану об"єкта)
# - онлайновий синтез регулятора і спомтерігача.
#
# - чисто технічний момент: з вектора формуємо матрицю.
#
# - управління;
#
# - вектор вимірювань;
# - оцінка вектора вимірювань;
#
# - об"єкт;
#
# - помилка оцінювання;
# - зовнішній вхід спостерігача;
# - спостерігач;
#
# - формуємо вектор
# стану повної системи.
[-(-2*λс + Aa1*ωnc*T1с)/T1с; -Aa0*ωnc^2 + (-4*λc*λс + 2*λc*Aa1*ωnc*T1с)/(T1с*T1c) + 1/T1c^2]
l1 := 2*λс/T1с - Aa1*ωnc
k1 := 1 - aa0*ω0c^2*T1c^2  # error: This variable is undefined. Check that the label is set correctly.
k2 := 2*λc*T1c - aa1*ω0c*T1c^2  # error: This variable is undefined. Check that the label is set correctly.
l2 := □
xs(K, L) :=
    ORIGIN ← 1
    I ← identity(2)
    A ← Az
    B ← Bz
    Xo[:, 1] ← xo
    Xn[:, 1] ← xn
    for k ∈ 1 .. Tm
        u[:, k] ← K[1]*Xn[1, k] + K[2]*Xn[2, k]
        Yo[:, k] ← C*Xo[:, k]
        Yn[:, k] ← C*Xn[:, k]
        Xo[:, k + 1] ← F1(A, T)*Xo[:, k] + G1(A, T)*B*u[:, k]
        Δy[:, k] ← Yn[:, k] - Yo[:, k]
        vxod ← G1(A, T)*B*u[:, k] + G1(A, T)*L*C*Δy[:, k]
        Xn[:, k + 1] ← F1(A, T)*Xn[:, k] + vxod
        XX[:, k] ← stack(Xo[:, k], Xn[:, k])
    XX
# Дано:
Lс := [l1, 0; l2, 0]
Aс := [0, 1; -1/T1с^2, -2*λс/T1с]
Bс := [0; ko/T1с^2]
Kс := [k1с, k2с]
# з спостерігачем
F(k1, k2, l1, l2) := I4 + M1(k1, k2, l1, l2)*dT + (M1(k1, k2, l1, l2)*dT)^2/2
# і еталонної САУ - без спостерігача
f(k1, k2) := I2 + m1(k1, k2)*dT + (m1(k1, k2)*dT)^2/2
