# footer: ©БС
# Т2.1.3 САУ з цифровим регулятором.
# Дослідження впливу запізнення
# Ціль даної роботи - отримання навичок використання документованих і недокумен- тованих можливостей сучасних математичних пакетів  для моделювання систем автоматичного управління (САУ) при наявності запізнення.
# Причинами запізнення управління можуть:
# $  запізнення спрацьовування виконавчих елементів;
# Q  транспортне запізнення, повязане з конечними швидкостями передачі сигналів, або
# матеріальних компонентів процесу - рідини, газу....  ;
# Q  запізнення у самому об'єкті управління;
# $ запізнення у самому цифровому регуляторі ( воно може бути малим, але завжди  присутнє у ЦОМ)
# Урахувати запізнення на ціле число кроків управління  d (або моделювання) дуже просто: на вхід об'єкта управління повинно подавати  не u[k*T]  a u[(k-d)*T]. Виникає  лише незначна технічна проблема повязана з середовищем і методом моделювання - необхідність визначати  перші d  значень вектора стану до початку цикла обчислень.
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# Рис.1 Схема САУ з запізненням
# Завдання
# 1. Розробити математичну модель запізнення та програму для моделювання
# запізнення  10-25 б
# 2. Побудувати "стенд" для досліджень впливу запізнення  15 б
# 3. Дослідити вплив запізнення на перехідні процеси  15 б
# 4. Знайти граничне значення запізнення, за яких САУ: а) ще задовольнє
# вимогам до якості ПП, б) втрачає стійкість.  12+13 б
#
# Зразок виконання
# 1. Розробка математичної моделі САУ з запізненням
# Беремо дані з попередньої роботи:  ORIGIN := 1
# параметри об'єкта  a := [-1; 2; -2]  ; параметри регулятора  kr := [-1.659; 0.486; -2.87]  ; крок квантування (крок моделювання) T := 0.2  ; вимоги  до перехідного процесу: тривалість Tpz := 10 с ; викид (перерегулювання)  hmz := 0.15 ; число кроків моделювання  N := 90  ;  n := 1 .. N  Зауваження. Є наступні основні способи передачі необхідних даних між документами: а) через файлові операції (там - записати в файл,  тут прочитати): WRITEPRN("t21.prn", [k1, k2, k3, a2, a1, a0, T, Tpz, hmz]) =  Дані := READPRN("t21.prn")
# б) через посиланння (тоді в цьому документі будуть доступними дані того документу):
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# в) через інтернет та інші мережі. Головна проблема, - щоб потрібні  документи (файли) були, бажано на вказаних місцях).
# З розділу 2.1 візьмемо евівалентну дискретну математичну модель САУ другого  порядку без запізнення, що  буде
# 1) еталоном для оцінки коректності математичної моделі з  урахуванням запізнення  і
# 2) еталоном для оцінки впливу запізнення.
# Маємо: матрицю неперервного об'єкта,  одиничну матрицю,  вектор початкового стану
# A := [0, 1, 0; 0, 0, 1; kr[1] - a[1], kr[2] - a[2], kr[3] - a[3]]  ;  I := identity(3)  ; I = [1, 0, 0; 0, 1, 0; 0, 0, 1] ;  xo[:, 1] := [-1; 0; 0]  ;
# Записуємо наближення 2-го  порядку перехідної матриці стану  Mp := I + A*T + A^2*T^2/2! , і, нарешті, еквівалентну дискретну модель керованого  об'єкта:  xo[:, n + 1] := Mp*xo[:, n]  (1)
xo = [
    -1, -1, -0.994957, -0.981089, -0.955762, -0.91751, -0.865982, -0.801855, -0.726686, -0.642745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;
    0, 0.01318, 0.0479338, 0.0986886, 0.159657, 0.225132, 0.289761, 0.348782, 0.398209, 0.434975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;
    0, 0.120333, 0.214089, 0.279439, 0.316059, 0.325047, 0.308768, 0.270648, 0.214927, 0.146384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]
# Розробка математичної моделї  САУ  з урахуванням запізнення
# Вибираємо з можливих альтернатиив побудови математичної моделі оптимальну, за критерієм витрат інтелекту. На перших d кроках моделювання САУ управління в наслідок запізнення дорівнює нулю. Також припустимо, що помилки вектору стану на цих кроках дорівнюють нулю.
# Для урахування запізнення використовуємо еквівалентну дискретну матмодель першого порядку (подаємо паралельно дві можливі форми запису, друга - робоча):
# x[n+1] = (I+Ao*T)*x[n] + B*T*u[n-d] = (I+Ao*T)*x[n] + B*T*K*x[n-d]  ;
# x[n + 1] == (I + Ao*T)*x[n] + B*T*u[n - d] == (I + Ao*T)*x[n] + B*T*K*x[n - d]  .  (2)
# Наводимо у розгорнутому вигляді усі компоненти  рівняння (2) отримані за допомогою символьного процесора.
# B := [0; 0; 1]  ;  K := [kr[1], kr[2], kr[3]]  ;  B*K == [0; 0; 1]*[k1, k2, k3] == [0, 0, 0; 0, 0, 0; k1, k2, k3]  ;
# B*K*T*x[n] == [0, 0, 0; 0, 0, 0; k1, k2, k3]*[x[1, n]; x[2, n]; x[3, n]] == [0; 0; k1*x[1, n]*T + k2*x[2, n]*T + k3*x[3, n]*T]  ;
# (I + Ao*T)*x[n] == ([1, 0, 0; 0, 1, 0; 0, 0, 1] + [0, 1, 0; 0, 0, 1; -a[1], -a[2], -a[3]]*T)*[x[1, n]; x[2, n]; x[3, n]] == □
# □ == [ x[1, n] + T*x[2, n]; x[2, n] + T*x[3, n]; -a[1]*T*x[1, n] + (-a[2]*T*x[2, n]) + (1 - a[3]*T*x[3, n]) ] ;  нарешті маємо:
# x[n + 1] == (I + Ao*T)*x[n] + B*T*K*x[n] <== ось цьому рівнянню відповідає така система рівнянь:
#
# [x[1, n + 1]; x[2, n + 1]; x[3, n + 1]] == [ x[1, n] + T*x[2, n]; x[2, n] + T*x[3, n]; (-a[1] + k1)*T*x[1, n] + (-a[2] + k2)*T*x[2, n] + 1 + (-a[3] + k3)*x[3, n] ]
# Бачимо, що тепер не можна в правій частині винести x[n]  - власний рух залежить від x[n], а рух обумовлений управлінням - від x[n - d]  .  Для тих, хто не звик до матриць та векторів, подаємо (за полями документу) матрично-векторне рівняння (2) у розгорнутому вигляді, як систему з трьох скалярних рівнянь
# Задаємо  "нульовий стан",  початковий стан  і матрицю некерованого об'єкта
# B := [0; 0; 1] ; K := [kr[1], kr[2], kr[3]] ; x0 := [0; 0; 0] ;  xnat := [-1; 0; 0]  ; Ao := [0, 1, 0; 0, 0, 1; -a[1], -a[2], -a[3]]  .
# Для моделювання  САУ з запізненням використовуємо еквівалентну дискретну модель першого порядку, а щоб забезпечити рівень точності  як у моделі другого порядку, змен- шуємо крок обчислень у стільки := 4  разів, тобто, беремо крок обчислень T1 := T/стільки;  M := N*стільки  ; q := 2 .. M ;  x[:, 2] := x0 . Виводимо все для
#
# контролю: N = 90;  M = 360 ; T = 0.2;  T1 = 0.05. Для контролю матмоделі задаємо запізнення  d := 0 .  Записуємо робоче рівняння  x[:, d + 1] := xnat  ;  q := (1 + d) .. 360  ;
# x[:, q + 1] := (I + Ao*T1)*x[:, q] + B*K*T1*x[:, q - d]
# Будуємо графіки перехідних  процесів для базової моделі і отриманої нами моделі (більш спрощеної, але з меншим кроком обчислень). Бачимо, що модель коректна, і  при вибраному кроці обчислень має задовільну точність:
# [plot: xo[1, n], x[1, q], 0 vs 4*(n - 1), q]
# Дослідження впливу запізнення. Визначення граничного запізнення.
# Копіюємо попередній блок, незначно доповнюєм його. Вводимо запізнення: d := 5.0 , отримуємо відповідні процеси. Аналізуємо, робимо висновки.
# Тривалість_пп := Tpz/T1  ;  ; qq := 1 .. d ;  x[:, qq] := x0 ; x[:, d + 1] := xnat  ;  q := (1 + d) .. 360 .  x[:, q + 1] := (I + Ao*T1)*x[:, q] + B*K*T1*x[:, q - d]
Length(□)
f(a, b) := 1
Тривалість_пп := Тривалість_пп*matrix(1, 20, f)
j := -1, -.9 .. 1
Тривалість_пп = [200, 200, 200, 200, 200, 200, 200, 200, 200, 200, 200, 200, 200, 200, 200, 200, 200, 200, 200, 200]
# [plot: xo[1, n], x[1, q], 0, j vs n*4, q + d, q, тривалість_пп]
# Запізнення
# d
# Шукаємо граничне запізнення. Для даної системи воно виявляється рівним d = 5?  при запізненні у  d + 1 = 6кроків квантування, система стає нестійкою. Це дорівнює T1*d = 0.25 секунди. Далі подано графік граничного перехідного процесу.
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# Розробка програми моделювання системи з запізненням
# Багато переваг можемо отримати, якщо модель динаміки системи оформимо як програму.  Крім того ми на один рівень стаємо ближче до "істинного" програмування - на мові С++, на якій написано математичний пакет.
PP(z) :=
    IAT ← (I + Ao*T1)
    BKT ← B*K*T1
    for j ∈ 0 .. z
        x[:, j + 1] ← xnat
    x[:, z + 1] ← xnat
    for i ∈ (1 + z) .. 200
        x[:, i + 1] ← IAT*x[:, i] + BKT*x[:, i - z + 1]
    Vyxod ← transpose(x)[:, 1]
PP(1) = [
    -1; -1; -1; -1; -0.999918; -0.999674; -0.999194; -0.998407; -0.997245; -0.995646
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]
(I + Ao*T1) = [1, 0.05, 0; 0, 1, 0.05; 0.05, -0.1, 1.1]
xnat = [-1; 0; 0]
B*K*T1 = [0, 0, 0; 0, 0, 0; -0.08295, 0.0243, -0.1435]
# Дивимось на програму, бачимо, що там закладені тіж самі рівняння, що ми писали  "врозсип". Програму ми оформили як функцію (визначену користувачем) від запізнення.  Продемонструємо переваги - побудуємо серію процесів у виді тривимірного графіка. Це робиться так:  zap := 1 .. 8  ;  Mpp[:, 9 - zap] := PP(zap)
# [3D plot: Mpp]
# Факультатив
# "Зразок виконання" дозволяє швидко розв'язати деяку задачу нескладною модіфіка- цією "зразка". Але "зразок виконання" нав'язує певні шаблони мишлення, з певними наслідками.
# Розглянемо деякі альтернативні підходи у дослідженні впливу запізнення. Нижче пода- на орієнтована на специфіку пакета  альтернатива рівняння для обчислення перехідних процесів для будь-якого запізнення d:
q := (d + 1) .. 360
x[:, q + 1] := (I + Ao*T1)*x[:, q] + B*K*T1*if(q > d, x[:, q - d], 0)
# Пакет дозволяє виконати дослідження з використанням апарату  Z-перетворень.  Відомо, що необхідна і достатня  умова стійкості лінійної імпульсної системи - знаходження усіх коренів Z-характеристичного рівняння в середині одиничного кола. При досягенні критичного запізнення система матиме Z-корені з модулем рівним одиниці. Використання символь- них обчислень дозволяє отримати відповідні залежності у загальному вигляді. Далі наведено початковий фрагмент документа для визначення Z-коренів.
d := 4
x[:, q + 1] == (I + Ao*T1)*x[:, q] + B*K*T1*x[:, q - d]
d := 5
