# Т2.1.4 САУ з цифровим регулятором.
# Дослідження впливу нелінійностей "обмеження"
# і "зона нечутливості"
# Вступ. Постановка задачі
# Ціль даної роботи - моделювання та дослідження системи автоматичного управ- ління (САУ) при наявності нелінійностей. Джерелами нелінійностей можуть бути ви- конавчі елементи (приводи) і вимірювачі. Не завжди нелінійності є результатом недо- сконалості цих елементів: їх вводять, щоб система просто відключалась біля стану рівноваги (нечутливість), або щоб система була безпечною при великих відхиленнях (обмеження).
# В попередніх роботах ми аналітично розраховували параметри регулятора. Однак це можливе тільки якщо система лінійна. В даному випадку ми визначаємо параметри регулятора без урахування нелінійності, а потім моделюємо систему і уточнюємо па- раметри регулятора. В даній роботі досліджується вплив так званих статичних нелі- нійностей. Статичними називають нелінійності, у яких поточний вихід залежить тільки від поточного входу  z[k] = f(y[k]). На рис.1 подана схема САУ.
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# Рис.1  Схема системи
#
# Завдання
# 1. Розробити робочі математичні моделі нелінійностей  8-20 б
# 2. Розробити програму для моделювання САУ з нелінійностями  12 б
# 3. Дослідити вплив а) нечутливості, б) обмеження,  в) нечутливості + обмеження на перехідний процес при варіації величини початкової помилки  15,13,12 б
# 4. Знайти граничні значення параметрів нелінійностей, за яких САУ:
# а) ще задовольняє вимогам до якості ПП,  б) втрачає стійкість.  12+13 б
# 5. Дослідити САУ із зоною нечутливості при наявності шумів у вимірювачах  50 б
# Зразок виконання
# 1. Розробка математичних моделей нелінійностей
# Можна придумати багато версій програми моделювання нелінійностей "зона нечутливості" і "обмеження рівня". Далі подано дві версії такої програми: а) "перше, що прийшло в голову", б) "якщо задуматись".
NO(x, ob, ne, k) :=
    if 0 ≤ |x| < ne
        0
    also if 0 < |x| - ne ≤ 1/k
        k*(|x| - ne)*sign(x)
    else
        ob*sign(x)
NO(x, ob, ne, k) :=
    if 0 ≤ |x| < ne
        0
    else
        min(ob, k*(|x| - ne))*sign(x)  # Пароль 123 нао
# Завдання. Наберіть тут свою версію програми моделюванняя нелінійності. або перенаберіть подану вище (закрито від копіювання).  Тестуємо програму:
# [plot: NO(x, 1, 0.3, 0.4), NO(x, 0.8, 0.9, 0.15) vs x]
# Рис. 2 Залежності "зона нечутливості + обмеження рівня виходу"
#
# 2. Розробка програми  моделювання САУ з нелінійностями
# Беремо дані з попередньої роботи (Т211)  ORIGIN := 1
# параметри об'єкта  a := [-1; 2; -2]  ; параметри регулятора  kr := [-1.659; 0.486; -2.87]  ; крок квантування (крок моделювання) T1 := 0.1  ; вимоги  до перехідного процесу: тривалість Tpz := 10 с ; викид (перерегулювання)  hmz := 0.15 ; число кроків моделювання  N := 150  ;  n := 1 .. N.
# Маємо: матрицю неперервного об'єкта,  одиничну матрицю,  вектор початкового стану
# A := [0, 1, 0; 0, 0, 1; kr[1] - a[1], kr[2] - a[2], kr[3] - a[3]]  ; I := identity(3)  ; I = [1, 0, 0; 0, 1, 0; 0, 0, 1] ; xo := [-1; 0; 0] ; Записуємо параметри об'єкта:  і  регулятора:
# B := [0; 0; 1] ;  Ao := [0, 1, 0; 0, 0, 1; -a[1], -a[2], -a[3]] ;  K := [kr[1], kr[2], kr[3]]
# коефіцієнт підсилення в нелінійності беремо  k = 1.
# Тепер власне складаємо програму. Виводимо для контролю і осмислення те, що закладено в програмі:
# K*xo = 1.659  ; NO(K*xo, 5, 0.2, 1) = 1.459
# (I + Ao*T1) = [1, 0.1, 0; 0, 1, 0.1; 0.1, -0.2, 1.2]; B*K*T1 = [0, 0, 0; 0, 0, 0; -0.1659, 0.0486, -0.287] ;
PN(ob, ne) :=
    IAT ← (I + Ao*T1)
    BT ← B*T1
    x[:, 1] ← xo
    for i ∈ 1 .. N
        u ← K*x[:, i]
        un ← NO(u, ob, ne, 1 + 0.6*ne)
        x[:, i + 1] ← IAT*x[:, i] + BT*un
        Vyx[:, i + 1] ← stack(x[:, i + 1], u, un)
    Vyx
# Завдання. Напишіть коментарі до програми. Наберіть свою версію, або перенаберіть цю.
# Що є виходом програми?
PN(20, 0) =  # no stored result
# Пароль 123 нао
# Обчислюємо три перехідних процеси - номінальний  qq := PN(20, 0.0), при наявно- сті зони нечутливості qqn := PN(20, neh); при наявності обмеження qqo := PN(obm, 0) Будуємо графіки..
# [plot: qq[1, n], qqn[1, n] vs n]
# [plot: qq[4, n], qqn[4, n], qqn[5, n] vs n]
# Рис. 3  Вплив зони нечутливості  neh ≡ 0.6
# [plot: qq[1, n], qqo[1, n] vs n]
# [plot: qq[4, n], qqo[4, n], qqo[5, n] vs n]
# Рис. 4 Вплив обмеження  obm ≡ 1.15
#
# Підсумки і висновки
# Ми вибрали коливальну САУ з малим запасом стійкості. Бачимо (рис. 3 і 4), що  і поява зони нечутливості і обмеження при певних рівнях приводять САУ до нестій- кості. Можемо бачити на графіках управлінь як саме зона нечутливості і обмеження деформують  управління . Будуємо також фазові траєкторії перехідних процесів.
# [plot: qq[2, n], qqn[2, n], qqo[2, n] vs qq[1, n], qqn[1, n], qqo[1, n]]
# Знайдіть граничні значення нелінійностей та  проаналізуйте іх вплив на якість регулювання та стійкість САУ.
# Приклад аналізу: для даного об'єкта управління, для кожного рівня початкової помилки існує критичний рівень обмеження (в даному випадку обм = 1.05), при якому система стає нестійкою. Для деяких об'єктів ця границя стійкості дуже різка - ....... . Можна провести дослідження по розробці регуляторів, стійких до впливу обмежень...
# Контрольні запитання
# 1. Запишіть рівняння для нелінійностей "зона нечутливості" та "обмеження"  2 б
# 2. Як модіфікувати документ для дослідження впливу цих нелінійностей у вимірювачах -  координати, швидкості, прискорення.  10 б
# 3. Які методи і критерії для перевірки нелінійних САУ на стійкість ви знаєте?  4 б
# 4. Наведіть приклади елементів САУ із а) зоною нечутливості, б) обмеженнм,  в) зоною нечутливості та обмеженнм.  1 - 9б
# 5. Чи є вплив обмеження і зони нечутливості а) негативним, б) позитивним, а) різним,  залежно від обставин?  3 б
# 6. Чи бувають випадки, коли обмеження і зону нечутливості вводять навмисне? 2 б
# 7. Нижче подано схему пристрі. Що це за пристрій? Що є входом і що є виходом пристрію? Чи властиві цьому пристрію обмеження і (або) зона нечутливості?  5 б
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# 8. За рахунок чого у поданому вище пристрії виникають а) обмеження, б) зона нечутливості? Чи можна усунути зону нечутливості? Якщо можна, то як ? Чи буде це корисним?  6 б
# 9. Нарисуйте  пристрій у станах "зона нечутливості", "обмеження".  4 б
# 10. В яку сторону буде переміщуватись вихідний шток пристрію при зміщенні вхідного вправо?  1 б
# 11. Що подано на графіку? (вище)  2 б
# 12. Напишіть усі потрібні рівняння для побудови такого графіка?  1-11б
# 13. Що треба написати на осях (функції, змінні) графіка, щоб отримати те, що зображено  вище?  2 б
# 14. Нарисуйте  графіки функцій, рівняння яких подано нижче?  3  б
# максимум 50 балів за контрольні запитання
ω := 2.5
t := -5, -4.9 .. 5
x(t) := 2.5*sin(ω*t)
og := .9
zo := 1
u(t) := ОбмНеч(og, zo, t)  # error: This variable is undefined. Check that the label is set correctly.
y(t) := ОбмНеч(og, zo, x(t))  # error: This variable is undefined. Check that the label is set correctly.
# [plot: u(t), t, t - 4, y(t), 0 vs t, 0, x(t), t*2 + 11]
