# Т2.4.1 Синтез та дослідження релейної САУ
# з лінійним законом переключення
# Особливість системи в тому, що для підвищення температури включається нагрівач, а для зниження - більш складна холодильна система ("тепловий насос"). Ці виконавчі елементи працюють в одному - оптимальному режимі - це обумовлює релейний характер системи - тільки включаємо. або виключаємо систему. В певному діапазоні температур відключаються нагрівач і охолоджувач відключаються взагалі - це обумовлює зону нечутливості. За таким принципом працюють терморегулятори холодильників.
# Все це відображуємо на схемі системи. Бачимо - звичайна релейна САУ, але з особливостями: релейна характеристика з різними рівнями  для плюс- і мінус-дії (теплова потужність нашрівача і охолоджувача може бути різною).
# В системі завжди є збурення зовнішня температура, джерела виділення тепла, відкриті двері  таін.
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# 1. Обгрунтувати  вибір критерія оптимальності управління і методу синтезу імпульсної САУ  5
# Релейні регулятори мають багато позитивних  якостей - дешевизна, надійність, оптимальність (розв'язання оптимізаційних задач при обмеженнях на рівень управління приводить до релейних законів). І негативних теж, багато. Це, наприклад, виникнення вібраційних режимів. Специфічний недолік цих систем - брак аналітичних, точних методів, що обумовлене нелінійностю цих систем.
# Вирішення задачі синтезу більше базується на пошуку і виборі і менше - на розрахунку параметрів регулятора. Для синтезу релейних систем як базовий використовується метод фазової площини. По суті метод є графоаналітичним.
# Критерії синтезу - 1) стійкість та 2) економічність системи в стані рівноваги, 3)простота реалізації. Вибираємо лінійний закон переключення,  за рахунок нахилу лінії переключення забезпечуємо  -  стійкість, за рахунок зони нечутливості - економічність.
# 2. Отримати еквівалентну дискретну математичну модель об”єкта управління 10
# ь Для використання методу фазової площини потрібно отримати рівняння і побудувати фазові траекторії для можливих значень управління -  +u0,  0,  -u0.
# ь Потім необхідно отримати рівняння для ліній переключення і побудувати їх на фазовій площині.
# Синтез релейної САУ з лінійним законом переключення  зводиться до вибору  параметрів ліній переключення. Цей вибір робиться так, щоб мінімізувати вибрані критерії якості регулювання.
# Лінеаризоване рівняння  об'єкта  має вид:  a2*d^2x(t)/dt^2 + a1*dx(t)/dt + a0*x = u(.) + v(t),
#
# де a2, a1, a0 - параметри об"єкта, u(.) - управління, v(t) - збурення.
# Звичайно використовується релейний регулятор з лінійним законом переключення:
# u = k1*x + k2*dx/dt,
# де k1, k2- параметри закону переключення, що розраховуються  на основі вимог до якості регулювання.
# Отримання математичних моделей динаміки і побудова фазових траекторій
# Записуємо вихідні дифрівняння неперервного об'єкта управління і будуємо еквівалентну дискретну математичну модель третього порядку (тобто апроксимуємо ¿¿ 3-ма членами розкладення матричної експоненти у ступеневий ряд :
I := identity(2)
d^2/dt^2(x + a1*d/dt(x) + a0*x == 0)
A(a1_, a0_) := [0, 1; -a0_, -a1_]
ORIGIN := 1
M3(a1_, a0_, T_) := I + A(a1_, a0_)*T_ + A(a1_, a0_)^2*T_^2/2 + A(a1_, a0_)^3*T_^3/3!
X[:, 1] := [-1; 0]
# Вводимо (не тут, далі, там де зручно) задані значення параметрів об'єкта згідно варіанту:
a1 = 0
a0 = -0.2
# Лінійні об'єкти 2-го порядку по своїй поведінці класифікуються згідно значенням  коренів характеристичного рівняння динаміки об'єкта. Отримуємо загальні вирази для обчислення  коренів.
# L{.}
# р
d^2/dt^2(x(t)) + a1*d/dt(x(t)) + a0*x(t) == 0
s^2 + a1*s + a0 == 0
s1(a1, a0) := -1/2*a1 - 1/2*sqrt(a1^2 - 4*a0)
s2(a1, a0) := -1/2*a1 + 1/2*sqrt(a1^2 - 4*a0)
s1(a1, a0) = -0.447214
s2(a1, a0) = 0.447214
# Вводимо значення кроку обчислень, число кроків моделювання та число варіацій - одночасно обчислюваних фазових траекторій
Кроків_моделювання := 40
n := 1 .. Кроків_моделювання
Варіацій_початк_умов := 8
k_ := 1 .. 2*Варіацій_початк_умов
# Записуємо рівняння для  обчислення  одного перехідного процесу:
dT := 0.2
X[:, n + 1] := M3(a1, a0, dT)*X[:, n]
# Для аналізу загальних властивостей об'єкта управління бажано одним рівнянням  обчислювати одразу серію перехідних процесів з різними початковими умовами. Це можна зробити по-різному. Далі наводиться одна з альтернатив. Серію початкових умов теж можна задати по різному:
# 1F
n11[k_, 1] := sin(π*k_/Варіацій_початк_умов)
n12[k_, 1] := cos(π*k_/Варіацій_початк_умов)
# 2F
n21[k_, 1] := 0
n22[k_, 1] := (Варіацій_початк_умов - k_ + 1)/Варіацій_початк_умов
n32[k_, 1] := 1
n31[k_, 1] := (Варіацій_початк_умов - k_ + 1)/Варіацій_початк_умов
# 3F
# [plot: n12, n22, n32 vs n11, n21, n31]
# На цьому графіку показано  три типи розподілу початкових умов - "по вертикалі", "по горизонталі", "по колу"
# Залежно від класу фазових траекторій можемо вибрати  той тип початкових умов, при  якому фазові траекторії рівномірно покривають фазову площину:
x1 := n11
x2 := n12
u := -0.02
# Задаємо параметри матмоделі об'єкта ("нестійкий маятник"). Записуємо тепер різніцьові рівняння для моделювання  серії процесів і ДОСЛІДЖУЄМО:
[x1[k_, n + 1]; x2[k_, n + 1]] := M3(a1, a0, dT)*[x1[k_, n]; x2[k_, n]] + [0; uo]
a0 ≡ -0.2
uo ≡ 0
# [plot: x2, x2[k_, 1], uo*1 vs x1, x1[k_, 1]]
# Фазові траекторії при "0"-управлінні.Якщо вище встановлені  значення параметрів: а1 = 0;  а0 = -1, то те, що намалюється на графіку праворуч, має таку інтерпрета- цію: Стан рівноваги є, але він нестійкий. Якщо початковий стан в 1-му і 3-му квадрантах, то швидкість і координата ростуть одразу,  якщо ж - у 2-му і 4-му квадрантах, то швидкість і координата спочатку зменшуються, а потім зростають.
a1 ≡ 0.
um ≡ -.06
[x1[k_, n + 1]; x2[k_, n + 1]] := M3(a1, a0, dT)*[x1[k_, n]; x2[k_, n]] + [0; um]
# [plot: x2, x2[k_, 1], um*4 vs x1, x1[k_, 1]]
# .Фазові траекторії при "-"-управлінні.Спробуйте інші значення управління. Якщо вище встановлені такі значення параметрів: а1 = 0;  а0 = -1, то те, що намалюється на графіку праворуч, має таку інтерпрета- цію: Коли управ- ління мале (по модулю), фазові траєкторії з кола початкових умов розходяться в 1-ий і 3-ій квадранти, але можна так збільшити  управління,  що усі траєкторії підуть у 3-ій квадрант - об'єкт буде у певному сенсі керованим.
[x1[k_, n + 1]; x2[k_, n + 1]] := M3(a1, a0, dT)*[x1[k_, n]; x2[k_, n]] + [0; up]
up ≡ 0.06
# [plot: x2, x2[k_, 1], up*4 vs x1, x1[k_, 1]]
# .Фазові траекторії при "+"-управлінні.Спробуйте інші значення управління. Якщо вище встановлені такі значення параметрів: а1 = 0;  а0 = -1, то те, що намалюється на графіку праворуч, має таку інтерпрета- цію: Коли управління мале (по модулю), фазові траєкторії з кола початкових умов розходяться в 1-ий і 3-ій квадранти, але можна так збільшити  управління,  що усі траєкторії підутьв 1-ий квадрант, об'єкт буде у певному сенсі керованим.
# Розробка математичної моделі регулятора і побудова ліній переключення
# Математична модель релейного регулятора - це трьохпозіційне реле згістерезісом: . Альтернатива 1 моделі : :
sgn(z) ≡ z/|z|
rel(a, z) ≡ sgn(z)*Φ(|z| - a)
q := -10 .. 10
sign(-441) = -1  # ?
ryl(a, z) :=
    if z ≥ a
        1
    if -a < z < a
        0
    if z ≤ -a
        -1
u(x1, x2) == {
    if k*(x1 + T*x2) ≥ a
        1
    if -a < k*(x1 + T*x2) < a
        0
    if k*(x1 + T*x2) ≤ -a
        -1
}
# Альтернатива 2 моделі :
# Зона вводу параметрів Для зручності, щоб не переходити в початок документу, повторимо зону вводу пара- метрів:
dT = 0.2
n := 1 .. 120
# <— число кроків та  |  параметри —>
# <— крок моделювання  |  об'єкта  —>
# <— параметри  |
# <— регулятора  |
# зона нечутливості релейного елементу —>
a1 := 0.5
dT ≡ .08
a0 := 0
kr := 1
ko := 1
Tr := .6
a := .4
# Зауваження. Значення параметрів закона управління - k i T будуть вибиратись і розраховуватись далі. А тут введені їх попередні значення, для моделювання
# Отримання рівнянь ліній переключення управління на  фазовій площині  Записуємо:
# 1) Якщо  i > +a  u = +1  ;  Враховуємо рівняння регулятора:
# 2) Якщо  -a =< i =< +a  u = 0  ;  i = kr*(x + Tr*dx/dt)
# 3) Якщо  i < -a  u = -1  ;
# Лінії переключення отримаємо замінивши ">", "<" в умовах  1) i 3)
# на  "=" :  kr*(x+Tr*dx/dt) = a ;  kr*(x+Tr*dx/dt) = -a  (**)
# Вводимо індивідуальні означення для кожної ЛП :  x —>q
# dx/dt —> vp,  vm  та розв'язуємо рівняння (**) відносно vp, vm.
# Задаємо ранжовану змінну q для "розгортки" ліній переключення, враховуємо штуч- ний ефект дискретного моделювання з фіксованим кроком - спізнення.
# Записуємо рівняння ліній переключення
q := -2, -1.95 .. 2
Tz := Tr - dT*2  # <— спізнення від дискретизації
# <—Рівняння ліній переключення
vp(q_, Kr_, Tz_, a_) ≡ -Kr_/Tz_*q_ - 2*a_/Tz_
vm(q_, kr_, Tz_, a_) ≡ -kr_/Tz_*q_ + 2*a_/Tz_
# Одержання  математичної моделі динаміки релейної САУ
# Вище отримано еквівалентну дискретну модель динаміки САУ для побудови фазових траекторій. Ця модель придатна тільки для лінійних об'єктів управління. Тепер отримає- мо більш узагальнену модель, що дозволяла б ураховувати нелінійну динаміку об'єкта. Записуємо дифрівняння об'єкта у  формі  Коші та доповнюємо їх  рівнянням управління :  dx1/dt = x2  :=F1(x2)
# dx2/dt = -a0*x1 - a1*x2 + ko*u  :=F2(x1,x2,u)
# i = k*(x1+T*x2)  u:=x3  = -rel(a,k*(x1 + T*x2)  :=F3(x1,x2,a),
# звідки отримуємо систему еквівалентних різницевих рівнянь першого порядку:  x1[n+1] = x1[n] + F1(x2[n])*dT
# x2[n+1] = x2[n] + F2(x1[n],x2[n],x3[n])*dT
# x3[n+1] = F3(x1[n],x2[n],a)
# Подаємо праві частини дифрівнянь як функції користувача. Потім можна буде підставляти замість циx  F(.), що завгодно.
F1(x2) ≡ x2
F2(x1, x2, A1, A0, u, kr, збур) ≡ (-A0*x1 - A1*x2 + kr*u + збур)
F3(x1, x2, Aa, Tr) ≡ -rel(Aa, x1 + Tr*x2)
ko = 1
Kro := 200
n := 1 .. Kro
# Вводимо початкові умови:  (подані дві альтернативи)
x[:, 1] := [-1; 0; 0]
x[1, 1] := -1
x[2, 1] := 0
x[3, 1] := 0
# Записуємо систему рівнянь у матрично-векторному виді. Вводимо нові означення для параметрів моделі. Вводимо ці параметрі в режимі абсолютного присвоєння .  Це дає можливість розмістити ввод не тут, а нижче, біля графіків. Можемо змінювати параметри і одразу бачити наслідки...
x[:, n + 1] := [
    x[1, n] + F1(x[2, n])*dT;
    x[2, n] + F2(x[1, n], x[2, n], A1, A0, x[3, n], Kr, збур)*dT;
    F3(x[1, n], x[2, n], Aa, TR)
]
x[1, n] = [
    -1; -1; -1.0032; -0.999334; -0.98846; -0.970632; -0.945907; -0.91434; -0.875985; -0.830897
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]
# Будуємо графік перехідного процесу на фазовій площині і графіки перехідних процесів по координаті, швидкості і прискоренню (управлінню) в функції часу
# [plot: x[2, n], vp(x[1, n], Kr, TZ, Aa), vm(q, Kr, TZ, Aa), 0, q vs x[1, n], q, 0]
# Контроль:
# значення, що використовувались у попе-
# редніх розділах:
Aa = 0.4
x = [
    -1, -1, -1.0032, -0.999334, -0.98846, -0.970632, -0.945907, -0.91434, -0.875985, -0.830897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;
    0, -0.04, 0.04832, 0.135933, 0.222846, 0.309063, 0.394591, 0.479434, 0.563599, 0.64709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;
    0, 1, 1, 1, 1, 1, 1, 1, 1, 1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]
Kr = 1.6
a0 = 0
a1 = 0.5
Tz = 0.44
a = 0.4
transpose(x[1, :]) = [
    -1; -1; -1.0032; -0.999334; -0.98846; -0.970632; -0.945907; -0.91434; -0.875985; -0.830897
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]
# 1 Нахил лінії  2  Загальне  3  Зона  Параметри об'єкта  Збурення - (вища чи нижча температура )
# переключення  підсилення  нечутливості  4  5
TR ≡ .35
Kr ≡ 1.6
Aa ≡ 0.4
A1 ≡ 0.1
A0 ≡ 0
збур ≡ -0.5
# Оце вище маємо результати синтезу - вибору параметрів регулятора  TR , Kr  та зони нечутливості Аа .
# Нижче приклади перехідних процесів - для збурень "спека" - температура підтримується на верхній межі (наприклад 22 град С), і "холод" - температура підтримується на нижній межі  (наприклад 18 град С)  -(номінал 20 град, зона +2, -2 )
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# Система працездатна
# [plot: x[1, n], x[2, n], x[3, n], Aa, -Aa vs n]
# Для обнулення файла даних: Math | Toggle Equation | F9 | Toggle Equation
# Для створення іншого файла даних - замінити ім'я файла тут, вище, ще вище праворуч
# Якщо не бажано писати якісь прогони у файл - відключити аналогічно READPRN()
WRITEPRN("krels.prn", [0, 0, 0, 0, 0, 0, 0, 0, 0, 0]) =  # no stored result; disabled
# Факультатив
# 4. Розробка підсистеми обчислення критеріїв якості
# 4.1 Вибір критеріїв якості управління.
# Ціль даного розділу обгрунтування вибору критеріїв якості управління і  розробка документа (=програми для обчислення цих критеріїв). Підсистема обчислення потен- ційно є макетом відповідної підсистеми адаптивного релейного регулятора, що автоматично настроює свої параметри так, щоб підтримувати потрібне значення критерію оптимальності. На основі загальної практики САУ та специфіки об'єкта управління виберемо такі критерії:
# 1. Тривалість перехідного процесу
# 2.  Розход робочого тіла або енергії на управління
# 3.  Інтегральна помилка.
# Особливість обчислення цих критеріїв у тому, що, на відміну від лінійних систем, критерії залежатимуть також від рівня початкової помилки. Подамо ці критерії як функції від параметрів перехідних процесів і початкової помилки. Розглянемо іх послідовно.
# 1) Критерій тривалості перехідного процесу визначимо на обчисленому попередньо масиві даних перехідного процесу - виділяємо усі моменти входу процеса в допуск йдучі від кінця процесу а потім знаходимо максимальне значення.
# Припускається, що період моделювання взято таким що ПП на ньому з гарантією закінчується.
k := Kro, Kro - 1 .. 10
Tpp[k] := if(|x[1, k]| > Aa + .05, k*dT, 0)
KTp := max(Tpp)
# 2) Записуємо два альтернативних вираза для критерію розходу робочого тіла на управління, порівнюємо. 'Фізичний змисл' цього критерія - відносна доля періодів коли управління включено. Максимальне значення критерія, очевидно  = 1.
# Зауваження. Стрілка над виразом означає векторізацію обчислень - операція 'модуль' виконується над кожним елементом масива (вектора).
Krashod := 1/Kro*sum(|x[3, n]|, n)
Krashod = 0.32
mean(vectorize(|transpose(x)[:, 3]|)) = 0.318408
# Записуємо вираз для  критерію 'викид' або перерегулювання. Особливість цього виразу у тому що значення відраховується не від нуля а від зони нечутливості.
Kvybros := if((max(transpose(x)[:, 1]) - Aa) < 0, 0, max(transpose(x)[:, 1]) - Aa)
# Записуємо вирази для  критеріїв 'інтегральна квадратична помилка' і  "інтеграл від взваженого(часом) модуля помилки. Останній критерій не дає аналітичних розв"язань, але більш узгоджений з тим вимогами практики.
Kqvadr := sum(x[1, n]^2, n)
Kmodvz := sum(|x[1, n]|*n*dT, n)
# Заключне зауваження. Коли результатом розробки повинна бути програма для мікропроцесора чи мікроконтролера реальної системи, в якій ці критерії повинні
# обчислятися для забезпечення адаптації системи, то бажано для імітації онлайнового обчислення критеріїв в реальній системі подати процедури іх обчислення як різницьові рівняння і включити в систему рівнянь моделі динаміки. Коли такої задачі не ставиться раціонально використати вбудовані функції пакета
# 4.2. Розробка підсистеми  накопичення та обробки результатів
# обчислювальних  експериментів
# Ціль даного розділу розробка у даному середовищі програмної підсистеми, що дозволяє за бажанням користувача записувати результати деякого експерименту до файлу даних  з наступною обробкою цих даних.
# Наприклад, потрібно визначити оптимальне відносно деякого критерія значення параметра Tr - нахилу лінії переключення. Для релейних систем з нелінійними об'єктами навіть приблизних аналітичних методів розв'язання такої задачі нема. Інженерний підхід, коли в стислі строки треба мати конкретний результат, - обчислити серію перехідних процесів при вариації заданого параметра, побудувати залежність критеріїв від цього параметра і робити висновки.
# Далі подано рішення, орієнтоване на самі перші етапи ручного пошуку (розвідки?). Суть його в тому, що користквач пробує різні варіанти параметрів і деякі результати за своім бажанням записує до файла Потім ці дані обробляються і аналізуються.
# Формуємо вектор даних, що будуть записуватись у файл - це параметри регулятора, об'єкта і значення вибраних критеріів.
vyxdat := [Tr, Kr, Aa, A1, A0, KTp, Krashod, Kvybros, Kqvadr, Kmodvz]
# Оцей вираз використовується для обнулення файла даних. Для  цього його треба включити (курсор на вираз, меню Math, натиснути пункт Toggle Equation, натиснути F9, знову натиснути Тoggle Equation ).
WRITEPRN("krels.prn", [0, 0, 0, 0, 0, 0, 0, 0, 0, 0]) = [0, 0, 0, 0, 0, 0, 0, 0, 0, 0]
# Наступний вираз - поповнення файла даних виконується автоматично при кожному прогоні рівнянь моделювання релейної системи
vyxdat = [0.6, 1.6, 0.4, 0.1, 0, 5.2, 0.32, 0, 34.248, 592.773]
APPENDPRN("krels.prn", vyxdat) = [0, 0, 0, 0, 0, 0, 0, 0, 0, 0; 0.6, 1.6, 0.4, 0.1, 0, 5.2, 0.32, 0, 34.248, 592.773]
# Останній вираз - читання файла  даних - при першому обчисленні виконується автоматично, при наступних, треба натискати F9 для оновлення масиву зчитаних даних. У даному конкретному випадку це матриця з 10 стовпцями (подивись вектор даних) і кількістю рядків дорівнюючій числу прогонів.
Dat := READPRN("krels.prn")
N := rows(Dat)
N = 2
# 4.3 Аналіз даних обчислювальних  експериментів.
# Вибір параметрів регулятора
# Проводимо, наприклад,  дві серії експериментів:
# Змінюємо параметр ТR в диапазоні 0.2 - 1.0 при  Kr = 0.8. При менших значеннях система нестійка, при більших -критерії суттєво не змінюються, але росте кількість включень (неврахований критерій). Будуємо графіки для усіх критеріїв і
# вибираємо комплексно задовільне значення ТR = 0.6.
# Тепер змінюємо параметр Kr (це фактично потужність привода, а значить і його маса) від 0.5 до 1.1.  При менших значеннях система нестійка, при більших -критерії суттєво не змінюються. Вибираємо значення Kr = 1.0
Dat = [0, 0, 0, 0, 0, 0, 0, 0, 0, 0; 0.6, 1.6, 0.4, 0.1, 0, 5.2, 0.32, 0, 34.25, 592.8]
[Tr, Kr, Aa, A1, A0, KTp, Krashod, Kvybros, Kqvadr, Kmodvz]
y := 1 .. 10
u := 13 .. N
# [plot: Dat[y, 6], Dat[y, 7]*10, Dat[y, 8]*20, Dat[y, 9]*.2, Dat[y, 10]*.02 vs Dat[y, 1]]
# [plot: Dat[u, 6], Dat[u, 7]*10, Dat[u, 8]*20, Dat[u, 9]*.2, Dat[u, 10]*.02 vs Dat[u, 2]]
# Залежність критеріїв від  0.2<TR<1.0  Залежність критеріїв від  0.5<Kr<1.1
# Формуємо масив даних для передачі в документ наступного 3-ого розділу
transpose(Dat) = [0, 0.6; 0, 1.6; 0, 0.4; 0, 0.1; 0, 0; 0, 5.2; 0, 0.32; 0, 0; 0, 34.25; 0, 592.8]
Ы := cols(Dat)
Ы = 10
ы := 1 .. Ы
N = 2
Запишемо := transpose(transpose(Dat)[:, 16])  # error: This array index is invalid. The index must be an integer, not less than ORIGIN, and not greater than the last element.
# Оце пишемо у файл:
WRITEPRN("krels2_3.prn", Запишемо) =  # error: This variable is undefined. Check that the label is set correctly.
# При роботі з документом файл даних може очищатисть , доповнюватись, тому на виході треба
# не забути натиснути F9 на WRITEPRN(.)
# Оце виводимо для довідки, побачити щоб, ще, раз , що саме виводиться :
Запишемо == [Tr, Kr, Aa, A1, A0, KTp, Krashod, Kvybros, Kqvadr, Kmodvz]
# Читаємо, виводимо і порівнюємо:
Прочитали := READPRN("krels2_3.prn")  # error: Cannot open the data file.
Прочитали =  # error
Запишемо =  # error
# Висновки. Розроблено в середовищі пакета програмні систему для розрахунку параметрів та моделювання релейної САУ. Для заданого нестійкого об'єкта класу "нестійкий маятник без демпфування" знайдено границі стійкості в просторі параметрів регулятора. Знайдено оптимальні параметри регулятора.
# Tr = 0.6  Kr  = 0.9
