# footer: © Т.Боровська
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# Вінницький національний технічний університет
# Кафедра компютерних систем  управління
# Теорія автоматичного управлінння
#
# Лабораторна робота ¹ 3а. Дослідження термінальної САУ. Частина 3.1. Синтез термінальної САУ для задачі зближення
# Упрвління кінцевим станом
# Вступ
# Крім звичних задач управління поточним станом - регулювання температури, рівня, напруги, висоти польоту існує багато задач управління кінцевим станом. Це банальна задача стрільби, задача зупинки траспортного засобу в потрібній точці, задача стиковки космічних кораблів, задачі, що виконують підйомні крани, роботи-маніпулятори та ін.
# Особливість таких задач, на відміну від задач управління поточним станом, в тому, що треба забезпечити досягнення саме потрібного кінцевого стану. В кожен момент часу управління повинно обчислюватись із умови досягнення саме кінцевого стану. Траекторії руху до кінцевого стану можуть бути різними.
# Спеціфіка систем термінального управління в тому, що концеві помилки дорого коштують. Це «навали» (на причал - для кораблів), «наізди» (для наземного траспорту), "козли" (в авіації) з відповідними наслідками,  головне - кінцевий стан.
# . Задача виду  "за час Т перевести об'єкт з точки Хо фазового простору в точку Хк" називається задачею термінального управління.
#
# Постановка задачі
# Розглянемо задачу причалювання морських суден, зокрема великих танкерів і контейнеровозів. Причалювання - складна, часто і небезпечна операція. Навіть при кінцевій швидкості 0.5 м/с інерція великого танкера настільки велика, що в результаті “навала” деформується або причал, або корпус, або все разом. Задача ускладнюється тим, що треба в конечний момент забезпечити не тільки потрібні координати центра мас, але і кутове положення корпусу відносно причалу та ще й при малих допусках на відхилення траекторії  -  в портах завжди тісно. Точність проведення корабля до причалу менше 1 м.  Традиційно такі задачі виконувались лоцманами за допомогою декількох буксирів, але сьогодні кораблі мають спеціальні підрулюючі пристрої. Для вимірювання координат і швидкостей використовують надійні і високоточні лазерні вимірювачі. ЦОМ розраховує лінійні і кутові координати і швидкості , враховує наявність перешкод, в кожний момент часу обчислює для поточного стану траекторію, що приведе корабель в потрібну точку з нульовими кінцевими швидкостями, а також і прискореннями (останнє гарантує м'який контакт  з причалом навіть при збуреннях).
# Головне те, що система повинна бути високонадійною, а саме навіть при відхиленнях параметрів  ( незалежно від  ймовірнестей  таких ситуацій, тому що в практиці все негативне, що може бути, завжди збувається) забезпечувати задовільне управління.
# Система повинна управляти одночасно двома координатами (Х,У). Необхідно ураховевати обмеження на траекторію заходу до причалу.
# Необхідно розробити систему  термінального управління, яка по заданим граничним умовам переходу розраховує параметри закону термінального управляння і виконує цей перехід. На рис. 1 подано схему об'єкта управління, параметри об'єкта та вимоги до якості управління подано далі.
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# Завдання
# 1. Обгрунтувати  вибір метода  термінального управління і класу задачі
# термінального управління  10б
# 2. Обгрунтувати вибір способу врахування обмежень на траекторію заходу
# на причалювання  10б
# 3. Розробити блок-схему  термінальної САУ.  10б
# 4. Розробити програму  розрахунку параметрів термінального управління.
# Визначити  параметри регулятора для заданих даних .  20б
# 5. Розробити математичну модель і програму для моделювання динаміки
# термінальної САУ.  25б
# 6. Визначити список експериментів на моделі САУ для оцінки ¿¿ якості і
# нечутливості до помилок в САУ. Виконати дослідження.  15б
# 7. Оцінити складність реалізації алгоритмів управління на мікроконтролері.  10б
# Усього:  100б
# Зразок виконання
# У цьому зразку розглядається задача управління тільки однією з координат - один канал системи. Неважко розробити двохканальну систему управління - це робиться самостійно. Послідовність пунктів виконання завдання відповідає типовій послідовності розробки реальних систем управління.
#
# 1. Аналіз альтернатив побудови САУ. Побудува структурної схеми САУ
# Головне завдання підсистеми "причалювання" - швидко, точно і без "навалу" зупинити корабель біля причалу.  З доступних альтернатив побудови САУ вибираємо термінальне управління , задачу зближення,  для дуже відповідальних випадків -
# задачу м'якого зближення. Одна з проблем реалізації задачі - точне вимірювання відстаней, швидкостей.
# Для системи причалювання потрібно контролювати дві координати - Х та У, швид- кості та прискорення по цим координатам. Ці величини одночасно повинні стати =0 в точці причалювання. Канали управління цими координатами ідентичні, далі розгля- даємо тільки один канал.
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# 2. Обгрунтування  вибору методу і критерія оптимальності САУ
# Відомі такі альтернативні методи термінального управління:
# 1) модифікації управління поточним станом, 2) пряме розв'язання варіаційної задачі з локальним критерієм, 3) метод спряжених функцій для варіаційної задачі Лагранжа,
# 4) метод управління по вищій похідній. Вибираємо останній, переваги якого - простота реалізації (в ЦОМ), нечутливість до різних збурень (робастність).  Додатковий фактор - метод патентований і реально використовується!
# Цей метод забезпечує управління оптимальне по критерію розходу енергії на управління - а саме це і потрібно в більшості задач, починаючи з економічних . Головна перевага обраних методу і критерію оптимальності для нашої задачі в тому, що таке управління мінімізує і перевантаження  і забезпечує нульову швидкість в кінці процесу навіть при відхиленнях параметрів САУ від номінальних (це завжди має місце - змінюється маса корабля).
#
# 3. Розробка структурної схеми термінальної САУ з паралельними приводами
# Блок-схему робимо виходячи з того, що:
# 1) вибрано метод управління по вищій похідній;
# 2) в системі використовуються ефективні приводи з цифровим управлянням;
# 3) усім приводам подається один і той же сигнал помилки положення;
# 4) система повинна бути  астатичною по цій помилці (для цього ставимо інтегратор).
# 4. Розробка математичної моделі програми для синтезу регулятора
# Алгоритм процедури синтезу  термінального управління по вищій похідній такий:
# ц Дифрівняння об'єкта (за рахунок компенсуючих зворотних зв'язків) приводиться до стандартного виду.
#
# d^n/dt^n(x == ℑ(УпрСили(Ud) - ЗбурСили))
# цЗадаються m граничних  умов (згідно з вимогами задачі - зближення, розгон ,..)
# x1(Td) == x1k  ; x1(Td) == x1k ;  xm(Td) == xmk  ;
# Ud(t) == Utreb(t)  <=Бажана умова: дійсне управління дорівнює заданому.
# цЗаписується в параметричному виді закон управління з невідомими поки параметрами
# Utreb[n + 1] := k0 + k1*t[n + 1] + k2*t[n + 1]^2 + k3*t[n + 1]^3 + kv*v[n] + ks*s[n]
# |<----------------Uprogr------------------->|  |<---Uoc--->|
# цЗакон управління підставляється у дифрівняння об'єкта.
# цДифрівняння об'єкта n разів інтегрується, значення координат вектора стану в момент закінчення переходу  Тd  прирівнюються потрібним значенням - оце отримуємо систему рівнянь для визначення  невідомих параметрів закону управління.
# Саме цінне у цьому методі, що формули для коефіціентів залежать тільки від порядку дифрівняння об'єкта і числа граничних умов - вони визначаються раз і назавжди.
# Беремо з довідника  розрахункові формули для нашої задачі (порядок об'єкта n =2, число граничних умов m =2 (задача сближення). Вводимо параметри задачі
# Постiйна часу приводу  Tp = 1 Задана тривалість процесу Td := 100  Жорсткість управління  Tg = 4  Крок моделювання  T = 1 kg/(C*s)
# Задані граничні  умови(ввод на стор) :  s0 = 10 v0 = 1 sk := 0  vk := 0 .
# Зелене - задані в ККР дані. Червоне - те, що ми вибираємо і розраховуємо. Жорсткість Tg вибирається за умов  умов:  1) Tg=(0.2-0.3)*Td;  2) Tg=(2-5)*Tp
# Нечёткие ограничения
Tgg := 1
Td := 10
solve block
    # constraints
    0.01*Tdd ≤ Tgg ≤ .3*Tdd
    Tgg > 0
    2*Tpp ≤ Tgg ≤ 5*Tpp
    # solver
    Tgt(Tdd, Tpp) := Find(Tgg)
end solve block
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c0(s0, v0, Td) := 6*(sk - s0)/Td^2 - (4*v0 + 2*vk)/Td
c1(s0, v0, Td) := 12*(s0 - sk)/Td^3 + 6*(v0 + vk)/Td^2
Tgt(10, .1) = 0.5
K0(s0, v0, Tg) := 6*s0/Tg^2 + 4*v0/Tg + c0(s0, v0, Td)
Kv(Tg) := -4/Tg
Ks(Tg) := -6/Tg^2
K1(s0, v0, Tg) := 6*v0/Tg^2 + 4*c0(s0, v0, Td)/Tg + c1(s0, v0, Td)
K2(s0, v0, Tg) := 3*c0(s0, v0, Td)/Tg^2 + 2*c1(s0, v0, Td)/Tg
K3(s0, v0, Tg) := c1(s0, v0, Td)/Tg^2
# (1)
# 4.  Визначення параметрів регулятора
# Ну навмисне ми визначили параметри регулятора як функції граничних умов і параметра Tg - це далі буде зручним для моделювання, а при реалізації алгоритмів в МК  це будуть підпрограми. Сучасні системи програмування дозволяють автоматично отримати оптимізований асемблерний код із цих виразів
# K0(s0, v0, Tg) = 3.75; K1(s0, v0, Tg) = -0.445; K2(s0, v0, Tg) = -0.0975 ; K3(s0, v0, Tg) = 0.01125 ;
# Kv(Tg) = -1; Ks(Tg) = -0.375 ; K2(20, 0, Tg) = -0.105- для других даних.
# 5 Розробка математичної моделі і програми моделювання САУ
# Отримаємо спочатку систему диференційних рівнянь  (=неперервну ММ) термінальної САУ.  Згідно завданню дифрівняння об"єкта (матеріальної точки) та його параметри:
# а2*d2Y(t)/dt2 + a1*dY(t)/dt + a0*Y = ud(.)+v(t) ; a2 =10¸40; a1 = 0; a0 = 0
# тому маємо:  d^2Y(t)/dt^2= 1/а2*(ud(.)+v(t));
# Замінюємо: S = Y; V = dY/dt
# (для узгодження з літературою по термінальному управлінню)
# Для аналізу і синтезу САУ ми використовуємо ЦОМ - дискретний пристрій. ЦОМ використовується також і для реалізації САУ. Об'єкт управління є неперервним і  для його моделювання потрібно отримати еквивалентну дискретну математичну модель (можна використати вбудовані методи інтегрування дифрівнянь, але це не завжди зручні "чорні ящики").
# Подамо задачу у вигляді канонічної матрично-векторної системи дифрівнянь. Введемо вектор стану х з компонентами:
# x1 = s;  x2 = v;  x3 = u.
# Підставимо у дифрівняння приводу вираз для управління у вигляді:  Utreb = u(t)+k2*x2+k1*x1.
# Запишемо систему рівнянь САУ у формі Коші:
# dx1/dt =  0*x1 +  1*x2 +  0*x3
# dx2/dt =  0*x1 +  0*x2 +  1*x3  (2)
# dx3/dt = ks/Tp*x1 + kv/Tp*x2 -1/Tp*x3 + 1/Tp*u(t)
# Цю систему запишемо у матрично-векторному виді - виділяємо відповідні матриці:
# I := identity(3) ;  A(Tp, Tg) := [0, 1, 0; 0, 0, 1; Ks(Tg)/Tp, Kv(Tg)/Tp, -1/Tp]  ;  B(Tp) := [0; 0; 1/Tp] .
# Виділяємо програмну ( залежну від часу ) складову  в термінальному управлінні
# u(s0, v0, t, Tg) := K0(s0, v0, Tg) + K1(s0, v0, Tg)*t + K2(s0, v0, Tg)*t^2 + K3(s0, v0, Tg)*t^3  .
# Тепер отримуємо  еквівалентну дискретну  математичну модель (ЕДМ) термінальної САУ. Записуємо перехідні матриці  F( . )  І  G( . )  для ЕДМ.
# F(T, Tp, Tg) := I + A(Tp, Tg)*T + (A(Tp, Tg)*T)^2/2  ; G(T, Tp, Tg) := I*T + A(Tp, Tg)*T^2/2  (3)
# Вводимо кількість кроків процесу моделювання,  крок, початкові умови:  ORIGIN := 1
# kілкрок = 100; n := 1 .. kілкрок ;  T := Td/kілкрок  ;  T = 0.1 ; t[n] := T*n  ;  x[:, 1] := [s0; v0; 0]  .
# Тепер, можемо нарешті записати:  та ЕДМ (=різницьове рівняння САУ) .
#
# x[:, n + 1] := F(T, Tp, Tg)*x[:, n] + G(T, Tp, Tg)*B(Tp)*u(s0, v0, t[n], Tg)  (4)
# Вводимо короткі,  натуральні  масштабовані імена для змінних, що будуть виводитись  s1[n] := x[1, n]  ;  v1[n] := x[2, n] ;  ud[n] := x[3, n] .
#
# Окремо, для порівняння з дійсним, обчислюємо потрібне управління.
# Ut[n] := K0(s0, v0, Tg) + K1(s0, v0, Tg)*t[n] + K2(s0, v0, Tg)*t[n]^2 + K3(s0, v0, Tg)*t[n]^3 + Ks(Tg)*s1[n] + Kv(Tg)*v1[n]
# 6. Моделювання і дослідження САУ. Вибір параметрів закону управління
# Будуємо графіки перехідних процесів. (Використовуємо різні масштаби для змінних!) Виводимо значення термінальних помилок. Ставимо біля графіка зони вводу. Можемо вести прості, попередні  дослідження системи: змінюємо параметри - дивимось наслідки.  dSk := (x[1, kілкрок] - sk)/(sk - s0)  ;  dVk := (x[2, kілкрок] - vk)/1
# [plot: s1[n]*0.1, v1[n], (-ud)[n]*4, -Ut[n]*4 vs n*T]
# Термінальні помилки: координата  dSk = 3.67253*1% ; швидкість  dVk = 0.0390277*1%
# Початковий стан:  координата  s0 ≡ 10 ; швидкість  v0 ≡ 1
# Параметри закону управління жорсткість управління Tg ≡ 4. ; пост.часу приводу  Tp ≡ 1
# кроків обчислень  kілкрок ≡ 100
# 6. Пошукова оптимізація параметрів закону управління.
# Дослідження САУ при варіації параметрів об'єкту
# Проведемо дослідження впливу параметру Тg - він вибирається при моделюванні, бо не може бути визначеним аналітично. Наша програма універсальна - еквівалентному різницьовому рівнянні (3) перехідна функція  записана як функція від Тр,Тg.  Копіюємо рівняння (3), задаємо різні Тg і виводимо для порівняльного аналізу два графіки.
#
# var := .865 ;  x[:, n + 1] := F(T, Tp, Tg*var)*x[:, n] + G(T, Tp, Tg*var)*B(Tp)*u(s0, v0, t[n], Tg*var) .
# s2[n] := x[1, n] ;  v2[n] := x[2, n]  помилки:  s1[kілкрок] = -0.367253 ;
# Tg1 := Tg  ; Tg2 := Tg*var ; Tg1 = 4  ;  Tg2 = 3.46
# [plot: s1[n], v1[n], s2[n], v2[n] vs n]
# Вище наведено приклад визначення мінімального допустимого Tg (в даному випадку Tgmin= ???) - головний висновок: "Вчора інженер повинен вміти коректно розраховувати ЧИСЛА за відомими моделями;  сьогодні - знаходити і конструювати коректні МОДЕЛІ, за якими усе обчислить ЦОМ".
# 7 Оцінка складності реалізації алгоритмів управління на мікроконтролері (МК)
# МК повинен обчислити, один раз перед початком заданого процесу переходу,  параметри закону управління за  рівняннями (1) = приблизно 150-200 команд і потім на кожному кроці процесу обчислювати в реальному часі 1/Тквант  раз на секунду необхідне управління Uпотр  =  приблизно 20 команд  асемблера. В перерахунку на короткі операції  при кроці квантування Тквант = 0.1 с. потрібно виконувати 200-1000 операцій/секунду (враховуються операції введення-виведення, звернення до зовнішньої пам"яті, самоконтроль). Це не є великим навантаженням для МК48, МК51, тим більше для МК196.
# Висновки
# Підтверджена функціональна придатність термінальної САУ з управлінням по вищій похідній для підключення паралельно працюючих приводів без їх попереднього узгодження при значних нелінійностях  характеристик. В більш широкому контексті ця властивість є базою для забезпечення відмовонечутливості і відмовостійкості САУ без реконфігурації.
